Simulations: Version=70
  DataStore
  Folder Soils
    Folder CQld_vertosol
      Soil north_vertosol_10oc_80_PAWC: ASCOrder=Vertosol; ASCSubOrder=Black; SoilType=Clay; Site=Banana; NearestTown=Banana; Region=Central Highlands; State=Queensland; Country=Australia; ApsoilNumber=911; Latitude=-23.5211; Longitude=148.123; DataSource=Collected by Brett Cocks (CES) for NVT.
        Physical
          Thickness  BD    AirDry  LL15   DUL    SAT
          150        0.99  0.1     0.31   0.5    0.6
          150        1.06  0.1525  0.331  0.485  0.57
          300        1.13  0.31    0.36   0.455  0.54
          SoilCrop WheatSoil: LL=[0.31, 0.331, 0.36]; KL=[0.06, 0.06, 0.06]; XF=[1, 1, 1]
            LL source: Field measured and checked for sensibility
          SoilCrop MaizeSoil: LL=[0.31, 0.331, 0.36]; KL=[0.1, 0.1, 0.08]; XF=[1, 1, 1]
          SoilCrop SorghumSoil: LL=[0.31, 0.331, 0.36]; KL=[0.08, 0.08, 0.08]; XF=[1, 1, 1]
          SoilCrop ChickpeaSoil: LL=[0.31, 0.331, 0.36]; KL=[0.08, 0.08, 0.08]; XF=[1, 1, 1]
          SoilCrop MungbeanSoil: LL=[0.31, 0.331, 0.36]; KL=[0.08, 0.08, 0.08]; XF=[1, 1, 1]
          SoilCrop CottonSoil: LL=[0.31, 0.331, 0.36]; KL=[0.08, 0.08, 0.08]; XF=[1, 1, 1]
          SoilCrop SunflowerSoil: LL=[0.31, 0.331, 0.36]; KL=[0.08, 0.08, 0.08]; XF=[1, 1, 1]
          SoilCrop PeanutSoil: LL=[0.31, 0.331, 0.36]; KL=[0.08, 0.08, 0.08]; XF=[1, 1, 1]
          SoilCrop RiceSoil: LL=[0.31, 0.331, 0.36]; KL=[0.08, 0.08, 0.08]; XF=[1, 1, 1]
          SoilCrop SoybeanSoil: LL=[0.31, 0.331, 0.36]; KL=[0.08, 0.08, 0.08]; XF=[1, 1, 1]
          SoilCrop CanolaSoil: LL=[0.31, 0.331, 0.36]; KL=[0.08, 0.08, 0.08]; XF=[1, 1, 1]
        SoilWater: SummerDate=1-Nov; SummerU=6; SummerCona=3.5; WinterDate=1-Apr; WinterU=2; WinterCona=2; DiffusConst=40; DiffusSlope=16; Salb=0.13; CN2Bare=73; CNRed=20; CNCov=0.8; max_pond=0; Thickness=[150, 150, 300]; SWCON=[0.3, 0.3, 0.3]; PrecipitationInterception=0
        SoilNitrogen: fom_types=[default, manure, mucuna, lablab, shemp, stable]; fract_carb=[0.2, 0.3, 0.54, 0.57, 0.45, 0]; fract_cell=[0.7, 0.3, 0.37, 0.37, 0.47, 0.1]; fract_lign=[0.1, 0.4, 0.09, 0.06, 0.08, 0.9]
          SoilNitrogenNO3 NO3
          SoilNitrogenNH4 NH4
          SoilNitrogenUrea Urea
          SoilNitrogenPlantAvailableNO3 PlantAvailableNO3
          SoilNitrogenPlantAvailableNH4 PlantAvailableNH4
        Organic: FOMCNRatio=40
          Thickness  Carbon  SoilCNRatio  FBiom  FInert  FOM
          150        1       12           0.025  0.4     633.808
          150        0.8     12           0.012  0.5     299.39
          300        0.6     12           0.005  0.6     66.8028
        Chemical
          Thickness  NO3N  NH4N  PH   EC
          150        0     1     8.2  0.2
          150        0     0.5   8.7  0.3
          300        0     0.3   8.9  0.5
        InitialWater: PercentMethod=0; FractionFull=0; RelativeTo=LL15
        Sample InitialNitrogen: Thickness=[150, 150, 300]; SWUnits=Volumetric; OCUnits=Total; PHUnits=Water
        CERESSoilTemperature
      Soil north_vertosol_10oc_120_PAWC: ASCOrder=Vertosol; ASCSubOrder=Black; SoilType=Clay; Site=Banana; NearestTown=Banana; Region=Central Highlands; State=Queensland; Country=Australia; ApsoilNumber=911; Latitude=-23.5211; Longitude=148.123; DataSource=Collected by Brett Cocks (CES) for NVT.
        Physical
          Thickness  BD    AirDry  LL15   DUL    SAT
          150        0.99  0.1     0.3    0.505  0.6
          150        1.06  0.1525  0.305  0.5    0.57
          300        1.13  0.31    0.335  0.475  0.54
          150        1.11  0.32    0.35   0.47   0.55
          SoilCrop WheatSoil: LL=[0.3, 0.305, 0.335, 0.35]; KL=[0.06, 0.06, 0.06, 0.04]; XF=[1, 1, 1, 1]
            LL source: Field measured and checked for sensibility
          SoilCrop MaizeSoil: LL=[0.3, 0.305, 0.335, 0.35]; KL=[0.1, 0.1, 0.08, 0.06]; XF=[1, 1, 1, 1]
          SoilCrop SorghumSoil: LL=[0.3, 0.305, 0.335, 0.35]; KL=[0.08, 0.08, 0.08, 0.08]; XF=[1, 1, 1, 1]
          SoilCrop ChickpeaSoil: LL=[0.3, 0.305, 0.335, 0.35]; KL=[0.08, 0.08, 0.08, 0.08]; XF=[1, 1, 1, 1]
          SoilCrop MungbeanSoil: LL=[0.3, 0.305, 0.335, 0.35]; KL=[0.08, 0.08, 0.08, 0.08]; XF=[1, 1, 1, 1]
          SoilCrop CottonSoil: LL=[0.3, 0.305, 0.335, 0.35]; KL=[0.08, 0.08, 0.08, 0.08]; XF=[1, 1, 1, 1]
          SoilCrop SunflowerSoil: LL=[0.3, 0.305, 0.335, 0.35]; KL=[0.08, 0.08, 0.08, 0.08]; XF=[1, 1, 1, 1]
          SoilCrop PeanutSoil: LL=[0.3, 0.305, 0.335, 0.35]; KL=[0.08, 0.08, 0.08, 0.08]; XF=[1, 1, 1, 1]
          SoilCrop RiceSoil: LL=[0.3, 0.305, 0.335, 0.35]; KL=[0.08, 0.08, 0.08, 0.08]; XF=[1, 1, 1, 1]
          SoilCrop SoybeanSoil: LL=[0.3, 0.305, 0.335, 0.35]; KL=[0.08, 0.08, 0.08, 0.08]; XF=[1, 1, 1, 1]
          SoilCrop CanolaSoil: LL=[0.3, 0.305, 0.335, 0.35]; KL=[0.08, 0.08, 0.08, 0.08]; XF=[1, 1, 1, 1]
        SoilWater: SummerDate=1-Nov; SummerU=6; SummerCona=3.5; WinterDate=1-Apr; WinterU=2; WinterCona=2; DiffusConst=40; DiffusSlope=16; Salb=0.13; CN2Bare=73; CNRed=20; CNCov=0.8; max_pond=0; Thickness=[150, 150, 300, 150]; SWCON=[0.3, 0.3, 0.3, 0.3]; PrecipitationInterception=0
        SoilNitrogen: same as Soils.CQld_vertosol.north_vertosol_10oc_80_PAWC.SoilNitrogen
        Organic: FOMCNRatio=40
          Thickness  Carbon  SoilCNRatio  FBiom  FInert  FOM
          150        1       12           0.025  0.4     554.069
          150        0.8     12           0.012  0.5     304.08
          300        0.6     12           0.005  0.6     91.587
          150        0.5     12           0.005  0.8     50.264
        Chemical
          Thickness  NO3N  NH4N  PH   EC
          150        0     1     8.2  0.2
          150        0     0.5   8.7  0.3
          300        0     0.3   8.9  0.5
          150        0     0.2   8.1  0.8
        InitialWater: PercentMethod=0; FractionFull=0; RelativeTo=LL15
        Sample InitialNitrogen: Thickness=[150, 150, 300, 150]; SWUnits=Volumetric; OCUnits=Total; PHUnits=Water
        CERESSoilTemperature
      Soil north_vertosol_10oc_150_PAWC: ASCOrder=Vertosol; ASCSubOrder=Black; SoilType=Clay; Site=Banana; NearestTown=Banana; Region=Central Highlands; State=Queensland; Country=Australia; ApsoilNumber=911; Latitude=-23.5211; Longitude=148.123; DataSource=Collected by Brett Cocks (CES) for NVT.
        Physical
          Thickness  BD    AirDry  LL15  DUL    SAT
          150        0.99  0.1     0.3   0.52   0.6
          150        1.06  0.1525  0.31  0.5    0.57
          300        1.13  0.31    0.32  0.48   0.54
          300        1.11  0.32    0.34  0.475  0.55
          SoilCrop WheatSoil: LL=[0.3, 0.305, 0.32, 0.34]; KL=[0.06, 0.06, 0.06, 0.04]; XF=[1, 1, 1, 1]
            LL source: Field measured and checked for sensibility
          SoilCrop MaizeSoil: LL=[0.3, 0.305, 0.32, 0.34]; KL=[0.1, 0.1, 0.08, 0.06]; XF=[1, 1, 1, 1]
          SoilCrop SorghumSoil: LL=[0.3, 0.305, 0.32, 0.34]; KL=[0.08, 0.08, 0.08, 0.08]; XF=[1, 1, 1, 1]
          SoilCrop ChickpeaSoil: LL=[0.3, 0.305, 0.32, 0.34]; KL=[0.08, 0.08, 0.08, 0.08]; XF=[1, 1, 1, 1]
          SoilCrop MungbeanSoil: LL=[0.3, 0.305, 0.32, 0.34]; KL=[0.08, 0.08, 0.08, 0.08]; XF=[1, 1, 1, 1]
          SoilCrop CottonSoil: LL=[0.3, 0.305, 0.32, 0.34]; KL=[0.08, 0.08, 0.08, 0.08]; XF=[1, 1, 1, 1]
          SoilCrop SunflowerSoil: LL=[0.3, 0.305, 0.32, 0.34]; KL=[0.08, 0.08, 0.08, 0.08]; XF=[1, 1, 1, 1]
          SoilCrop PeanutSoil: LL=[0.3, 0.305, 0.32, 0.34]; KL=[0.08, 0.08, 0.08, 0.08]; XF=[1, 1, 1, 1]
          SoilCrop RiceSoil: LL=[0.3, 0.305, 0.32, 0.34]; KL=[0.08, 0.08, 0.08, 0.08]; XF=[1, 1, 1, 1]
          SoilCrop SoybeanSoil: LL=[0.3, 0.305, 0.32, 0.34]; KL=[0.08, 0.08, 0.08, 0.08]; XF=[1, 1, 1, 1]
          SoilCrop CanolaSoil: LL=[0.3, 0.305, 0.32, 0.34]; KL=[0.08, 0.08, 0.08, 0.08]; XF=[1, 1, 1, 1]
        SoilWater: SummerDate=1-Nov; SummerU=6; SummerCona=3.5; WinterDate=1-Apr; WinterU=2; WinterCona=2; DiffusConst=40; DiffusSlope=16; Salb=0.13; CN2Bare=73; CNRed=20; CNCov=0.8; max_pond=0; Thickness=[150, 150, 300, 300]; SWCON=[0.3, 0.3, 0.3, 0.3]; PrecipitationInterception=0
        SoilNitrogen: same as Soils.CQld_vertosol.north_vertosol_10oc_80_PAWC.SoilNitrogen
        Organic: FOMCNRatio=40
          Thickness  Carbon  SoilCNRatio  FBiom  FInert  FOM
          150        1       12           0.025  0.4     523.082
          150        0.8     12           0.012  0.5     317.265
          300        0.6     12           0.005  0.6     116.715
          300        0.5     12           0.005  0.8     42.9372
        Chemical
          Thickness  NO3N  NH4N  PH   EC
          150        0     1     8.2  0.2
          150        0     0.5   8.7  0.3
          300        0     0.3   8.9  0.5
          300        0     0.2   8.1  0.8
        InitialWater: PercentMethod=0; FractionFull=0; RelativeTo=LL15
        Sample InitialNitrogen: Thickness=[150, 150, 300, 300]; SWUnits=Volumetric; OCUnits=Total; PHUnits=Water
        CERESSoilTemperature
      Soil north_vertosol_10oc_190_PAWC: ASCOrder=Vertosol; ASCSubOrder=Black; SoilType=Clay; Site=Banana; NearestTown=Banana; Region=Central Highlands; State=Queensland; Country=Australia; ApsoilNumber=911; Latitude=-23.5211; Longitude=148.123; DataSource=Collected by Brett Cocks (CES) for NVT.
        Physical
          Thickness  BD    AirDry  LL15   DUL    SAT
          150        0.99  0.1     0.3    0.5    0.6
          150        1.06  0.1525  0.305  0.495  0.57
          300        1.13  0.31    0.32   0.48   0.54
          300        1.11  0.32    0.34   0.475  0.55
          300        1.12  0.34    0.36   0.47   0.55
          100        1.15  0.35    0.365  0.465  0.53
          SoilCrop WheatSoil: LL=[0.3, 0.305, 0.32, 0.34, 0.355, 0.365]; KL=[0.06, 0.06, 0.06, 0.04, 0.04, 0.02]; XF=[1, 1, 1, 1, 1, 1]
            LL source: Field measured and checked for sensibility
          SoilCrop MaizeSoil: LL=[0.3, 0.305, 0.32, 0.34, 0.355, 0.365]; KL=[0.1, 0.1, 0.08, 0.06, 0.05, 0.03]; XF=[1, 1, 1, 1, 1, 1]
          SoilCrop SorghumSoil: LL=[0.3, 0.305, 0.32, 0.34, 0.355, 0.365]; KL=[0.08, 0.08, 0.08, 0.08, 0.06, 0.04]; XF=[1, 1, 1, 1, 1, 1]
          SoilCrop ChickpeaSoil: LL=[0.3, 0.305, 0.32, 0.34, 0.355, 0.365]; KL=[0.08, 0.08, 0.08, 0.08, 0.07, 0.06]; XF=[1, 1, 1, 1, 1, 1]
          SoilCrop MungbeanSoil: LL=[0.3, 0.305, 0.32, 0.34, 0.355, 0.365]; KL=[0.08, 0.08, 0.08, 0.08, 0.07, 0.06]; XF=[1, 1, 1, 1, 1, 1]
          SoilCrop CottonSoil: LL=[0.3, 0.305, 0.32, 0.34, 0.355, 0.365]; KL=[0.08, 0.08, 0.08, 0.08, 0.07, 0.06]; XF=[1, 1, 1, 1, 1, 1]
          SoilCrop SunflowerSoil: LL=[0.3, 0.305, 0.32, 0.34, 0.355, 0.365]; KL=[0.08, 0.08, 0.08, 0.08, 0.07, 0.06]; XF=[1, 1, 1, 1, 1, 1]
          SoilCrop PeanutSoil: LL=[0.3, 0.305, 0.32, 0.34, 0.355, 0.365]; KL=[0.08, 0.08, 0.08, 0.08, 0.07, 0.06]; XF=[1, 1, 1, 1, 1, 1]
          SoilCrop SoybeanSoil: LL=[0.3, 0.305, 0.32, 0.34, 0.355, 0.365]; KL=[0.08, 0.08, 0.08, 0.08, 0.07, 0.06]; XF=[1, 1, 1, 1, 1, 1]
          SoilCrop RiceSoil: LL=[0.3, 0.305, 0.32, 0.34, 0.355, 0.365]; KL=[0.08, 0.08, 0.08, 0.08, 0.07, 0.06]; XF=[1, 1, 1, 1, 1, 1]
          SoilCrop CanolaSoil: LL=[0.3, 0.305, 0.32, 0.34, 0.355, 0.365]; KL=[0.08, 0.08, 0.08, 0.08, 0.07, 0.06]; XF=[1, 1, 1, 1, 1, 1]
        SoilWater: SummerDate=1-Nov; SummerU=6; SummerCona=3.5; WinterDate=1-Apr; WinterU=2; WinterCona=2; DiffusConst=40; DiffusSlope=16; Salb=0.13; CN2Bare=73; CNRed=20; CNCov=0.8; max_pond=0; Thickness=[150, 150, 300, 300, 300, 100]; SWCON=[0.3, 0.3, 0.3, 0.3, 0.3, 0.3]; PrecipitationInterception=0
        SoilNitrogen: same as Soils.CQld_vertosol.north_vertosol_10oc_80_PAWC.SoilNitrogen
        Organic: FOMCNRatio=40
          Thickness  Carbon  SoilCNRatio  FBiom  FInert  FOM
          150        1       12           0.025  0.4     417.087
          150        0.8     12           0.012  0.5     295.049
          300        0.6     12           0.005  0.6     147.648
          300        0.5     12           0.005  0.8     73.8862
          300        0.4     12           0.005  0.9     36.9741
          100        0.4     12           0.005  0.9     29.3546
        Chemical
          Thickness  NO3N  NH4N      PH   EC
          150        0     1         8.2  0.2
          150        0     0.5       8.7  0.3
          300        0     0.3       8.9  0.5
          300        0     0.188288  8.1  0.8
          300        0     0.2       8    1
          100        0     0.2       8    1.3
        InitialWater: PercentMethod=0; FractionFull=0; RelativeTo=LL15
        Sample InitialNitrogen: Thickness=[150, 150, 300, 300, 300, 100]; SWUnits=Volumetric; OCUnits=Total; PHUnits=Water
        CERESSoilTemperature
      Soil north_vertosol_10oc_240_PAWC: ASCOrder=Vertosol; ASCSubOrder=Black; SoilType=Clay; Site=Banana; NearestTown=Banana; Region=Central Highlands; State=Queensland; Country=Australia; ApsoilNumber=911; Latitude=-23.5211; Longitude=148.123; DataSource=Collected by Brett Cocks (CES) for NVT.
        Physical
          Thickness  BD    AirDry  LL15   DUL    SAT
          150        0.99  0.1     0.3    0.5    0.6
          150        1.06  0.1525  0.305  0.495  0.57
          300        1.13  0.31    0.32   0.48   0.54
          300        1.11  0.32    0.34   0.475  0.55
          300        1.12  0.34    0.355  0.47   0.55
          300        1.15  0.35    0.365  0.465  0.53
          300        1.19  0.36    0.37   0.465  0.52
          SoilCrop WheatSoil: LL=[0.3, 0.305, 0.32, 0.34, 0.355, 0.365, 0.37]; KL=[0.06, 0.06, 0.06, 0.04, 0.04, 0.02, 0.01]; XF=[1, 1, 1, 1, 1, 1, 1]
            LL source: Field measured and checked for sensibility
          SoilCrop MaizeSoil: LL=[0.3, 0.305, 0.32, 0.34, 0.355, 0.365, 0.37]; KL=[0.1, 0.1, 0.08, 0.06, 0.05, 0.03, 0.01]; XF=[1, 1, 1, 1, 1, 1, 1]
          SoilCrop SorghumSoil: LL=[0.3, 0.305, 0.32, 0.34, 0.355, 0.365, 0.37]; KL=[0.08, 0.08, 0.08, 0.08, 0.06, 0.04, 0.02]; XF=[1, 1, 1, 1, 1, 1, 1]
          SoilCrop ChickpeaSoil: LL=[0.3, 0.305, 0.32, 0.34, 0.355, 0.365, 0.37]; KL=[0.08, 0.08, 0.08, 0.08, 0.07, 0.06, 0.05]; XF=[1, 1, 1, 1, 1, 1, 1]
          SoilCrop MungbeanSoil: LL=[0.3, 0.305, 0.32, 0.34, 0.355, 0.365, 0.37]; KL=[0.08, 0.08, 0.08, 0.08, 0.07, 0.06, 0.05]; XF=[1, 1, 1, 1, 1, 1, 1]
          SoilCrop CottonSoil: LL=[0.3, 0.305, 0.32, 0.34, 0.355, 0.365, 0.37]; KL=[0.08, 0.08, 0.08, 0.08, 0.07, 0.06, 0.05]; XF=[1, 1, 1, 1, 1, 1, 1]
          SoilCrop SunflowerSoil: LL=[0.3, 0.305, 0.32, 0.34, 0.355, 0.365, 0.37]; KL=[0.08, 0.08, 0.08, 0.08, 0.07, 0.06, 0.05]; XF=[1, 1, 1, 1, 1, 1, 1]
          SoilCrop PeanutSoil: LL=[0.3, 0.305, 0.32, 0.34, 0.355, 0.365, 0.37]; KL=[0.08, 0.08, 0.08, 0.08, 0.07, 0.06, 0.05]; XF=[1, 1, 1, 1, 1, 1, 1]
          SoilCrop SoybeanSoil: LL=[0.3, 0.305, 0.32, 0.34, 0.355, 0.365, 0.37]; KL=[0.08, 0.08, 0.08, 0.08, 0.07, 0.06, 0.05]; XF=[1, 1, 1, 1, 1, 1, 1]
          SoilCrop RiceSoil: LL=[0.3, 0.305, 0.32, 0.34, 0.355, 0.365, 0.37]; KL=[0.08, 0.08, 0.08, 0.08, 0.07, 0.06, 0.05]; XF=[1, 1, 1, 1, 1, 1, 1]
          SoilCrop CanolaSoil: LL=[0.3, 0.305, 0.32, 0.34, 0.355, 0.365, 0.37]; KL=[0.08, 0.08, 0.08, 0.08, 0.07, 0.06, 0.05]; XF=[1, 1, 1, 1, 1, 1, 1]
        SoilWater: SummerDate=1-Nov; SummerU=6; SummerCona=3.5; WinterDate=1-Apr; WinterU=2; WinterCona=2; DiffusConst=40; DiffusSlope=16; Salb=0.13; CN2Bare=73; CNRed=20; CNCov=0.8; max_pond=0; Thickness=[150, 150, 300, 300, 300, 300, 300]; SWCON=[0.3, 0.3, 0.3, 0.3, 0.3, 0.3, 0.3]; PrecipitationInterception=0
        SoilNitrogen: same as Soils.CQld_vertosol.north_vertosol_10oc_80_PAWC.SoilNitrogen
        Organic: FOMCNRatio=40
          Thickness  Carbon  SoilCNRatio  FBiom  FInert  FOM
          150        1       12           0.025  0.4     347.129
          150        0.8     12           0.012  0.5     270.344
          300        0.6     12           0.005  0.6     163.972
          300        0.5     12           0.005  0.8     99.4541
          300        0.4     12           0.005  0.9     60.322
          300        0.4     12           0.005  0.9     36.5871
          300        0.4     12           0.005  0.9     22.1912
        Chemical
          Thickness  NO3N  NH4N      PH   EC
          150        0     1         8.2  0.2
          150        0     0.5       8.7  0.3
          300        0     0.3       8.9  0.5
          300        0     0.188288  8.1  0.8
          300        0     0.2       8    1
          300        0     0.2       8    1.3
          300        0     0.2       8    1.3
        InitialWater: PercentMethod=0; FractionFull=0; RelativeTo=LL15
        Sample InitialNitrogen: Thickness=[150, 150, 300, 300, 300, 300, 300]; SWUnits=Volumetric; OCUnits=Total; PHUnits=Water
        CERESSoilTemperature
    Folder SQld_NNSW_vertosol
      Soil south_vertosol_10oc_100_PAWC: ASCOrder=Vertosol; ASCSubOrder=Black; SoilType=Clay; Site=Generic-Qld; State=Generic; Country=Australia; ApsoilNumber=497-GENERIC; Latitude=-27.564333; Longitude=151.953991; LocationAccuracy=Regional Soil Type; DataSource=Generic soil.; Comments=Generic soil.
        Physical
          Thickness  BD    AirDry  LL15   DUL   SAT
          150        0.99  0.1     0.305  0.51  0.6
          150        1.06  0.1525  0.31   0.49  0.57
          300        1.13  0.3     0.33   0.47  0.54
          SoilCrop WheatSoil: LL=[0.305, 0.31, 0.33]; KL=[0.06, 0.06, 0.06]; XF=[1, 1, 1]
            LL source: Estimated based on local knowledge
          SoilCrop PeanutSoil: LL=[0.305, 0.31, 0.33]; KL=[0.08, 0.08, 0.08]; XF=[1, 1, 1]
          SoilCrop SunflowerSoil: LL=[0.305, 0.31, 0.33]; KL=[0.08, 0.08, 0.08]; XF=[1, 1, 1]
          SoilCrop MaizeSoil: LL=[0.305, 0.31, 0.33]; KL=[0.06, 0.06, 0.06]; XF=[1, 1, 1]
          SoilCrop SorghumSoil: LL=[0.305, 0.31, 0.33]; KL=[0.06, 0.06, 0.06]; XF=[1, 1, 1]
          SoilCrop CottonSoil: LL=[0.305, 0.31, 0.33]; KL=[0.08, 0.08, 0.08]; XF=[1, 1, 1]
          SoilCrop MungbeanSoil: LL=[0.305, 0.31, 0.33]; KL=[0.08, 0.08, 0.08]; XF=[1, 1, 1]
          SoilCrop ChickpeaSoil: LL=[0.305, 0.31, 0.33]; KL=[0.08, 0.08, 0.08]; XF=[1, 1, 1]
          SoilCrop CanolaSoil: LL=[0.305, 0.31, 0.33]; KL=[0.08, 0.08, 0.08]; XF=[1, 1, 1]
          SoilCrop RiceSoil: LL=[0.305, 0.31, 0.33]; KL=[0.08, 0.08, 0.08]; XF=[1, 1, 1]
          SoilCrop SoybeanSoil: LL=[0.305, 0.31, 0.33]; KL=[0.08, 0.08, 0.08]; XF=[1, 1, 1]
        SoilWater: SummerDate=1-Nov; SummerU=6; SummerCona=3.5; WinterDate=1-Apr; WinterU=4; WinterCona=2.5; DiffusConst=40; DiffusSlope=16; Salb=0.12; CN2Bare=73; CNRed=20; CNCov=0.8; max_pond=0; Thickness=[150, 150, 300]; SWCON=[0.5, 0.5, 0.5]; PrecipitationInterception=0
        SoilNitrogen: same as Soils.CQld_vertosol.north_vertosol_10oc_80_PAWC.SoilNitrogen
        Organic: FOMCNRatio=50
          Thickness  Carbon  SoilCNRatio  FBiom  FInert  FOM
          150        1.3     12.5         0.025  0.4     633.808
          150        1.04    12.5         0.012  0.5     299.39
          300        0.78    12.5         0.005  0.6     66.8028
        Chemical
          Thickness  NO3N  NH4N  PH   EC
          150        0     1     8.2  0.2
          150        0     0.5   8.7  0.3
          300        0     0.3   8.9  0.3
        InitialWater: PercentMethod=0; FractionFull=0; RelativeTo=LL15
        Sample InitialNitrogen: Thickness=[150, 150, 300]; SWUnits=Volumetric; OCUnits=Total; PHUnits=Water
        CERESSoilTemperature
      Soil south_vertosol_10oc_150_PAWC: ASCOrder=Vertosol; ASCSubOrder=Black; SoilType=Clay; Site=Generic-Qld; State=Generic; Country=Australia; ApsoilNumber=497-GENERIC; Latitude=-27.564333; Longitude=151.953991; LocationAccuracy=Regional Soil Type; DataSource=Generic soil.; Comments=Generic soil.
        Physical
          Thickness  BD    AirDry  LL15   DUL    SAT
          150        0.99  0.1     0.29   0.525  0.6
          150        1.06  0.1525  0.3    0.51   0.57
          300        1.13  0.3     0.315  0.505  0.54
          150        1.11  0.31    0.325  0.5    0.55
          SoilCrop WheatSoil: LL=[0.29, 0.3, 0.315, 0.325]; KL=[0.06, 0.06, 0.06, 0.06]; XF=[1, 1, 1, 1]
            LL source: Estimated based on local knowledge
          SoilCrop PeanutSoil: LL=[0.28, 0.3, 0.32, 0.33]; KL=[0.08, 0.08, 0.08, 0.08]; XF=[1, 1, 1, 1]
          SoilCrop SunflowerSoil: LL=[0.28, 0.3, 0.32, 0.33]; KL=[0.08, 0.08, 0.08, 0.08]; XF=[1, 1, 1, 1]
          SoilCrop MaizeSoil: LL=[0.29, 0.3, 0.315, 0.325]; KL=[0.06, 0.06, 0.06, 0.06]; XF=[1, 1, 1, 1]
          SoilCrop SorghumSoil: LL=[0.29, 0.3, 0.315, 0.325]; KL=[0.06, 0.06, 0.06, 0.06]; XF=[1, 1, 1, 1]
          SoilCrop CottonSoil: LL=[0.28, 0.3, 0.32, 0.33]; KL=[0.08, 0.08, 0.08, 0.08]; XF=[1, 1, 1, 1]
          SoilCrop MungbeanSoil: LL=[0.28, 0.3, 0.32, 0.33]; KL=[0.08, 0.08, 0.08, 0.08]; XF=[1, 1, 1, 1]
          SoilCrop ChickpeaSoil: LL=[0.28, 0.3, 0.32, 0.33]; KL=[0.08, 0.08, 0.08, 0.08]; XF=[1, 1, 1, 1]
          SoilCrop RiceSoil: LL=[0.28, 0.3, 0.32, 0.33]; KL=[0.08, 0.08, 0.08, 0.08]; XF=[1, 1, 1, 1]
          SoilCrop CanolaSoil: LL=[0.28, 0.3, 0.32, 0.33]; KL=[0.08, 0.08, 0.08, 0.08]; XF=[1, 1, 1, 1]
          SoilCrop SoybeanSoil: LL=[0.28, 0.3, 0.32, 0.33]; KL=[0.08, 0.08, 0.08, 0.08]; XF=[1, 1, 1, 1]
        SoilWater: SummerDate=1-Nov; SummerU=6; SummerCona=3.5; WinterDate=1-Apr; WinterU=4; WinterCona=2.5; DiffusConst=40; DiffusSlope=16; Salb=0.12; CN2Bare=73; CNRed=20; CNCov=0.8; max_pond=0; Thickness=[150, 150, 300, 150]; SWCON=[0.5, 0.5, 0.5, 0.5]; PrecipitationInterception=0
        SoilNitrogen: same as Soils.CQld_vertosol.north_vertosol_10oc_80_PAWC.SoilNitrogen
        Organic: FOMCNRatio=50
          Thickness  Carbon  SoilCNRatio  FBiom  FInert  FOM
          150        1.3     12.5         0.025  0.4     554.069
          150        1.04    12.5         0.012  0.5     304.08
          300        0.78    12.5         0.005  0.6     91.587
          150        0.65    12.5         0.005  0.8     50.264
        Chemical
          Thickness  NO3N  NH4N  PH   EC
          150        0     1     8.2  0.2
          150        0     0.5   8.7  0.3
          300        0     0.3   8.9  0.3
          150        0     0.2   8.1  0.4
        InitialWater: PercentMethod=0; FractionFull=0; RelativeTo=LL15
        Sample InitialNitrogen: Thickness=[150, 150, 300, 150]; SWUnits=Volumetric; OCUnits=Total; PHUnits=Water
        CERESSoilTemperature
      Soil south_vertosol_10oc_190_PAWC: ASCOrder=Vertosol; ASCSubOrder=Black; SoilType=Clay; Site=Generic-Qld; State=Generic; Country=Australia; ApsoilNumber=497-GENERIC; Latitude=-27.564333; Longitude=151.953991; LocationAccuracy=Regional Soil Type; DataSource=Generic soil.; Comments=Generic soil.
        Physical
          Thickness  BD    AirDry  LL15   DUL    SAT
          150        0.99  0.1     0.29   0.525  0.6
          150        1.06  0.1525  0.29   0.52   0.57
          300        1.13  0.3     0.305  0.515  0.54
          300        1.11  0.31    0.32   0.51   0.55
          SoilCrop WheatSoil: LL=[0.29, 0.29, 0.305, 0.32]; KL=[0.06, 0.06, 0.06, 0.06]; XF=[1, 1, 1, 1]
            LL source: Estimated based on local knowledge
          SoilCrop PeanutSoil: LL=[0.28, 0.29, 0.305, 0.325]; KL=[0.08, 0.08, 0.08, 0.08]; XF=[1, 1, 1, 1]
          SoilCrop SunflowerSoil: LL=[0.28, 0.29, 0.305, 0.325]; KL=[0.08, 0.08, 0.08, 0.08]; XF=[1, 1, 1, 1]
          SoilCrop MaizeSoil: LL=[0.29, 0.29, 0.305, 0.32]; KL=[0.06, 0.06, 0.06, 0.06]; XF=[1, 1, 1, 1]
          SoilCrop SorghumSoil: LL=[0.29, 0.29, 0.305, 0.32]; KL=[0.06, 0.06, 0.06, 0.06]; XF=[1, 1, 1, 1]
          SoilCrop CottonSoil: LL=[0.28, 0.29, 0.305, 0.325]; KL=[0.08, 0.08, 0.08, 0.08]; XF=[1, 1, 1, 1]
          SoilCrop MungbeanSoil: LL=[0.28, 0.29, 0.305, 0.325]; KL=[0.08, 0.08, 0.08, 0.08]; XF=[1, 1, 1, 1]
          SoilCrop ChickpeaSoil: LL=[0.28, 0.29, 0.305, 0.325]; KL=[0.08, 0.08, 0.08, 0.08]; XF=[1, 1, 1, 1]
          SoilCrop RiceSoil: LL=[0.28, 0.29, 0.305, 0.325]; KL=[0.08, 0.08, 0.08, 0.08]; XF=[1, 1, 1, 1]
          SoilCrop CanolaSoil: LL=[0.28, 0.29, 0.305, 0.325]; KL=[0.08, 0.08, 0.08, 0.08]; XF=[1, 1, 1, 1]
          SoilCrop SoybeanSoil: LL=[0.28, 0.29, 0.305, 0.325]; KL=[0.08, 0.08, 0.08, 0.08]; XF=[1, 1, 1, 1]
        SoilWater: SummerDate=1-Nov; SummerU=6; SummerCona=3.5; WinterDate=1-Apr; WinterU=4; WinterCona=2.5; DiffusConst=40; DiffusSlope=16; Salb=0.12; CN2Bare=73; CNRed=20; CNCov=0.8; max_pond=0; Thickness=[150, 150, 300, 300]; SWCON=[0.5, 0.5, 0.5, 0.5]; PrecipitationInterception=0
        SoilNitrogen: same as Soils.CQld_vertosol.north_vertosol_10oc_80_PAWC.SoilNitrogen
        Organic: FOMCNRatio=50
          Thickness  Carbon  SoilCNRatio  FBiom  FInert  FOM
          150        1.3     12.5         0.025  0.4     523.082
          150        1.04    12.5         0.012  0.5     317.265
          300        0.78    12.5         0.005  0.6     116.715
          300        0.65    12.5         0.005  0.8     42.9372
        Chemical
          Thickness  NO3N  NH4N  PH   EC
          150        0     1     8.2  0.2
          150        0     0.5   8.7  0.3
          300        0     0.3   8.9  0.3
          300        0     0.2   8.1  0.4
        InitialWater: PercentMethod=0; FractionFull=0; RelativeTo=LL15
        Sample InitialNitrogen: Thickness=[150, 150, 300, 300]; SWUnits=Volumetric; OCUnits=Total; PHUnits=Water
        CERESSoilTemperature
      Soil south_vertosol_10oc_240_PAWC: ASCOrder=Vertosol; ASCSubOrder=Black; SoilType=Clay; Site=Generic-Qld; State=Generic; Country=Australia; ApsoilNumber=497-GENERIC; Latitude=-27.564333; Longitude=151.953991; LocationAccuracy=Regional Soil Type; DataSource=Generic soil.; Comments=Generic soil.
        Physical
          Thickness  BD    AirDry  LL15  DUL    SAT
          150        0.99  0.1     0.28  0.51   0.6
          150        1.06  0.153   0.3   0.51   0.57
          300        1.13  0.3     0.31  0.5    0.54
          300        1.11  0.31    0.32  0.495  0.55
          300        1.12  0.32    0.33  0.49   0.55
          100        1.15  0.35    0.35  0.49   0.53
          SoilCrop WheatSoil: LL=[0.28, 0.3, 0.31, 0.32, 0.33, 0.35]; KL=[0.06, 0.06, 0.06, 0.06, 0.05, 0.04]; XF=[1, 1, 1, 1, 1, 1]
            LL source: Estimated based on local knowledge
          SoilCrop PeanutSoil: LL=[0.26, 0.28, 0.31, 0.33, 0.34, 0.35]; KL=[0.08, 0.08, 0.08, 0.08, 0.07, 0.06]; XF=[1, 1, 1, 1, 1, 1]
          SoilCrop SunflowerSoil: LL=[0.26, 0.28, 0.31, 0.33, 0.34, 0.35]; KL=[0.08, 0.08, 0.08, 0.08, 0.07, 0.06]; XF=[1, 1, 1, 1, 1, 1]
          SoilCrop MaizeSoil: LL=[0.28, 0.3, 0.31, 0.32, 0.33, 0.35]; KL=[0.1, 0.1, 0.08, 0.06, 0.05, 0.03]; XF=[1, 1, 1, 1, 1, 1]
          SoilCrop SorghumSoil: LL=[0.28, 0.3, 0.31, 0.32, 0.33, 0.35]; KL=[0.1, 0.1, 0.08, 0.06, 0.05, 0.03]; XF=[1, 1, 1, 1, 1, 1]
          SoilCrop CottonSoil: LL=[0.26, 0.28, 0.31, 0.33, 0.34, 0.35]; KL=[0.08, 0.08, 0.08, 0.08, 0.07, 0.06]; XF=[1, 1, 1, 1, 1, 1]
          SoilCrop MungbeanSoil: LL=[0.26, 0.28, 0.31, 0.33, 0.34, 0.35]; KL=[0.08, 0.08, 0.08, 0.08, 0.07, 0.06]; XF=[1, 1, 1, 1, 1, 1]
          SoilCrop ChickpeaSoil: LL=[0.26, 0.28, 0.31, 0.33, 0.34, 0.35]; KL=[0.08, 0.08, 0.08, 0.08, 0.07, 0.06]; XF=[1, 1, 1, 1, 1, 1]
          SoilCrop RiceSoil: LL=[0.26, 0.28, 0.31, 0.33, 0.34, 0.35]; KL=[0.08, 0.08, 0.08, 0.08, 0.07, 0.06]; XF=[1, 1, 1, 1, 1, 1]
          SoilCrop CanolaSoil: LL=[0.26, 0.28, 0.31, 0.33, 0.34, 0.35]; KL=[0.08, 0.08, 0.08, 0.08, 0.07, 0.06]; XF=[1, 1, 1, 1, 1, 1]
          SoilCrop SoybeanSoil: LL=[0.26, 0.28, 0.31, 0.33, 0.34, 0.35]; KL=[0.08, 0.08, 0.08, 0.08, 0.07, 0.06]; XF=[1, 1, 1, 1, 1, 1]
        SoilWater: SummerDate=1-Nov; SummerU=6; SummerCona=3.5; WinterDate=1-Apr; WinterU=4; WinterCona=2.5; DiffusConst=40; DiffusSlope=16; Salb=0.12; CN2Bare=73; CNRed=20; CNCov=0.8; max_pond=0; Thickness=[150, 150, 300, 300, 300, 100]; SWCON=[0.5, 0.5, 0.5, 0.5, 0.5, 0.5]; PrecipitationInterception=0
        SoilNitrogen: same as Soils.CQld_vertosol.north_vertosol_10oc_80_PAWC.SoilNitrogen
        Organic: FOMCNRatio=50
          Thickness  Carbon  SoilCNRatio  FBiom  FInert  FOM
          150        1.3     12.5         0.025  0.4     417.087
          150        1.04    12.5         0.012  0.5     295.049
          300        0.78    12.5         0.005  0.6     147.648
          300        0.65    12.5         0.005  0.8     73.8862
          300        0.52    12.5         0.005  0.9     36.9741
          100        0.52    12.5         0.005  0.9     29.3546
        Chemical
          Thickness  NO3N  NH4N  PH   EC
          150        0     1     8.2  0.2
          150        0     0.5   8.7  0.3
          300        0     0.3   8.9  0.3
          300        0     0.2   8.1  0.4
          300        0     0.2   8    0.6
          100        0     0.6   8    0.8
        InitialWater: PercentMethod=0; FractionFull=0; RelativeTo=LL15
        Sample InitialNitrogen: Thickness=[150, 150, 300, 300, 300, 100]; SWUnits=Volumetric; OCUnits=Total; PHUnits=Water
        CERESSoilTemperature
      Soil south_vertosol_10oc_290_PAWC: ASCOrder=Vertosol; ASCSubOrder=Black; SoilType=Clay; Site=Generic-Qld; State=Generic; Country=Australia; ApsoilNumber=497-GENERIC; Latitude=-27.564333; Longitude=151.953991; LocationAccuracy=Regional Soil Type; DataSource=Generic soil.; Comments=Generic soil.
        Physical
          Thickness  BD    AirDry  LL15   DUL    SAT
          150        0.99  0.1     0.3    0.51   0.6
          150        1.06  0.1525  0.305  0.5    0.57
          300        1.13  0.3     0.315  0.495  0.54
          300        1.11  0.32    0.325  0.495  0.55
          300        1.12  0.34    0.34   0.49   0.55
          300        1.15  0.35    0.355  0.49   0.53
          300        1.19  0.36    0.36   0.49   0.52
          SoilCrop WheatSoil: LL=[0.3, 0.305, 0.315, 0.325, 0.34, 0.355, 0.36]; KL=[0.06, 0.06, 0.06, 0.04, 0.04, 0.02, 0.02]; XF=[1, 1, 1, 1, 1, 1, 1]
            LL source: Estimated based on local knowledge
          SoilCrop PeanutSoil: LL=[0.28, 0.29, 0.31, 0.33, 0.35, 0.36, 0.365]; KL=[0.08, 0.08, 0.08, 0.08, 0.07, 0.06, 0.05]; XF=[1, 1, 1, 1, 1, 1, 1]
          SoilCrop SunflowerSoil: LL=[0.28, 0.29, 0.31, 0.33, 0.35, 0.36, 0.365]; KL=[0.08, 0.08, 0.08, 0.08, 0.07, 0.06, 0.05]; XF=[1, 1, 1, 1, 1, 1, 1]
          SoilCrop MaizeSoil: LL=[0.3, 0.305, 0.315, 0.325, 0.34, 0.355, 0.36]; KL=[0.1, 0.1, 0.08, 0.06, 0.05, 0.03, 0.01]; XF=[1, 1, 1, 1, 1, 1, 1]
          SoilCrop SorghumSoil: LL=[0.3, 0.305, 0.315, 0.325, 0.34, 0.355, 0.36]; KL=[0.08, 0.08, 0.08, 0.08, 0.06, 0.04, 0.02]; XF=[1, 1, 1, 1, 1, 1, 1]
          SoilCrop CottonSoil: LL=[0.28, 0.29, 0.31, 0.33, 0.35, 0.36, 0.365]; KL=[0.08, 0.08, 0.08, 0.08, 0.07, 0.06, 0.05]; XF=[1, 1, 1, 1, 1, 1, 1]
          SoilCrop MungbeanSoil: LL=[0.28, 0.29, 0.31, 0.33, 0.35, 0.36, 0.365]; KL=[0.08, 0.08, 0.08, 0.08, 0.07, 0.06, 0.05]; XF=[1, 1, 1, 1, 1, 1, 1]
          SoilCrop ChickpeaSoil: LL=[0.28, 0.29, 0.31, 0.33, 0.35, 0.36, 0.365]; KL=[0.08, 0.08, 0.08, 0.08, 0.07, 0.06, 0.05]; XF=[1, 1, 1, 1, 1, 1, 1]
          SoilCrop RiceSoil: LL=[0.28, 0.29, 0.31, 0.33, 0.35, 0.36, 0.365]; KL=[0.08, 0.08, 0.08, 0.08, 0.07, 0.06, 0.05]; XF=[1, 1, 1, 1, 1, 1, 1]
          SoilCrop CanolaSoil: LL=[0.28, 0.29, 0.31, 0.33, 0.35, 0.36, 0.365]; KL=[0.08, 0.08, 0.08, 0.08, 0.07, 0.06, 0.05]; XF=[1, 1, 1, 1, 1, 1, 1]
          SoilCrop SoybeanSoil: LL=[0.28, 0.29, 0.31, 0.33, 0.35, 0.36, 0.365]; KL=[0.08, 0.08, 0.08, 0.08, 0.07, 0.06, 0.05]; XF=[1, 1, 1, 1, 1, 1, 1]
        SoilWater: SummerDate=1-Nov; SummerU=6; SummerCona=3.5; WinterDate=1-Apr; WinterU=4; WinterCona=2.5; DiffusConst=40; DiffusSlope=16; Salb=0.12; CN2Bare=73; CNRed=20; CNCov=0.8; max_pond=0; Thickness=[150, 150, 300, 300, 300, 300, 300]; SWCON=[0.5, 0.5, 0.5, 0.5, 0.5, 0.5, 0.5]; PrecipitationInterception=0
        SoilNitrogen: same as Soils.CQld_vertosol.north_vertosol_10oc_80_PAWC.SoilNitrogen
        Organic: FOMCNRatio=50
          Thickness  Carbon  SoilCNRatio  FBiom  FInert  FOM
          150        1.3     12.5         0.025  0.4     347.129
          150        1.04    12.5         0.012  0.5     270.344
          300        0.78    12.5         0.005  0.6     163.972
          300        0.65    12.5         0.005  0.8     99.4541
          300        0.52    12.5         0.005  0.9     60.322
          300        0.52    12.5         0.005  0.9     36.5871
          300        0.52    12.5         0.005  0.9     22.1912
        Chemical
          Thickness  NO3N  NH4N  PH   EC
          150        0     1     8.2  0.2
          150        0     0.5   8.7  0.3
          300        0     0.3   8.9  0.3
          300        0     0.2   8.1  0.4
          300        0     0.2   8    0.6
          300        0     0.2   8    0.8
          300        0     0.2   8    0.9
        InitialWater: PercentMethod=0; FractionFull=0; RelativeTo=LL15
        Sample InitialNitrogen: Thickness=[150, 150, 300, 300, 300, 300, 300]; SWUnits=Volumetric; OCUnits=Total; PHUnits=Water
        CERESSoilTemperature
    Folder NQld_ferrosol
      Soil ferrosol_10oc_80_PAWC: ASCOrder=Ferrosol; ASCSubOrder=Red; SoilType=?; Site=Redvale; NearestTown=Kingaroy, Q 4610; Region=Wide Bay and Burnett; State=Queensland; Country=Australia; ApsoilNumber=65; Latitude=-26.54; Longitude=151.875; LocationAccuracy=Regional Soil Type; DataSource=Qld DPIandF (M Bell)
        Physical
          Thickness  BD    AirDry  LL15  DUL   SAT
          100        1.2   0.07    0.2   0.31  0.51
          100        1.23  0.12    0.23  0.34  0.5
          300        1.27  0.23    0.24  0.36  0.49
          250        1.32  0.27    0.28  0.37  0.47
          SoilCrop PeanutSoil: LL=[0.2, 0.23, 0.24, 0.28]; KL=[0.08, 0.08, 0.08, 0.08]; XF=[1, 1, 1, 1]
            LL source: Unknown source or quality of data
          SoilCrop WheatSoil: LL=[0.2, 0.23, 0.24, 0.28]; KL=[0.06, 0.06, 0.06, 0.04]; XF=[1, 1, 1, 1]
          SoilCrop SunflowerSoil: LL=[0.2, 0.23, 0.24, 0.28]; KL=[0.08, 0.08, 0.08, 0.08]; XF=[1, 1, 1, 1]
          SoilCrop MaizeSoil: LL=[0.2, 0.23, 0.24, 0.28]; KL=[0.1, 0.1, 0.08, 0.06]; XF=[1, 1, 1, 1]
          SoilCrop SorghumSoil: LL=[0.2, 0.23, 0.24, 0.28]; KL=[0.08, 0.08, 0.08, 0.08]; XF=[1, 1, 1, 1]
          SoilCrop CottonSoil: LL=[0.2, 0.23, 0.24, 0.28]; KL=[0.08, 0.08, 0.08, 0.08]; XF=[1, 1, 1, 1]
          SoilCrop MungbeanSoil: LL=[0.2, 0.23, 0.24, 0.28]; KL=[0.08, 0.08, 0.08, 0.08]; XF=[1, 1, 1, 1]
          SoilCrop ChickpeaSoil: LL=[0.2, 0.23, 0.24, 0.28]; KL=[0.08, 0.08, 0.08, 0.08]; XF=[1, 1, 1, 1]
          SoilCrop SoybeanSoil: LL=[0.2, 0.23, 0.24, 0.28]; KL=[0.08, 0.08, 0.08, 0.08]; XF=[1, 1, 1, 1]
          SoilCrop RiceSoil: LL=[0.2, 0.23, 0.24, 0.28]; KL=[0.08, 0.08, 0.08, 0.08]; XF=[1, 1, 1, 1]
        SoilWater: SummerDate=1-Nov; SummerU=6; SummerCona=3.5; WinterDate=1-Apr; WinterU=4; WinterCona=2.5; DiffusConst=40; DiffusSlope=16; Salb=0.12; CN2Bare=73; CNRed=20; CNCov=0.8; max_pond=0; Thickness=[100, 100, 300, 250]; SWCON=[0.9, 0.9, 0.9, 0.9]; PrecipitationInterception=0
        SoilNitrogen: same as Soils.CQld_vertosol.north_vertosol_10oc_80_PAWC.SoilNitrogen
        Organic: FOMCNRatio=40
          Thickness  Carbon  SoilCNRatio  FBiom  FInert  FOM
          100        1.3     12           0.025  0.4     513.745
          100        1.43    12           0.012  0.5     344.374
          300        0.78    12           0.005  0.6     103.723
          250        0.39    12           0.005  0.7     38.1577
        Chemical
          Thickness  NO3N  NH4N      PH
          100        0     1.2375    6
          100        0     0.646341  6
          300        0     0.266929  5.8
          250        0     0.19      5.7
        InitialWater: PercentMethod=0; FractionFull=0; RelativeTo=LL15
        Sample InitialNitrogen: Thickness=[100, 100, 300, 250]; SWUnits=Volumetric; OCUnits=Total; PHUnits=Water
        CERESSoilTemperature
      Soil ferrosol_10oc_120_PAWC: ASCOrder=Ferrosol; ASCSubOrder=Red; SoilType=?; Site=Redvale; NearestTown=Kingaroy, Q 4610; Region=Wide Bay and Burnett; State=Queensland; Country=Australia; ApsoilNumber=65; Latitude=-26.54; Longitude=151.875; LocationAccuracy=Regional Soil Type; DataSource=Qld DPIandF (M Bell)
        Physical
          Thickness  BD    AirDry  LL15  DUL    SAT
          100        1.2   0.07    0.2   0.31   0.51
          100        1.23  0.12    0.23  0.34   0.5
          300        1.27  0.23    0.24  0.36   0.49
          300        1.32  0.27    0.28  0.37   0.47
          300        1.39  0.27    0.28  0.395  0.45
          SoilCrop PeanutSoil: LL=[0.2, 0.23, 0.24, 0.28, 0.28]; KL=[0.08, 0.08, 0.08, 0.08, 0.07]; XF=[1, 1, 1, 1, 1]
            LL source: Unknown source or quality of data
          SoilCrop WheatSoil: LL=[0.2, 0.23, 0.24, 0.28, 0.28]; KL=[0.06, 0.06, 0.06, 0.04, 0.04]; XF=[1, 1, 1, 1, 1]
          SoilCrop SunflowerSoil: LL=[0.2, 0.23, 0.24, 0.28, 0.28]; KL=[0.08, 0.08, 0.08, 0.08, 0.07]; XF=[1, 1, 1, 1, 1]
          SoilCrop MaizeSoil: LL=[0.2, 0.23, 0.24, 0.28, 0.28]; KL=[0.1, 0.1, 0.08, 0.06, 0.05]; XF=[1, 1, 1, 1, 1]
          SoilCrop SorghumSoil: LL=[0.2, 0.23, 0.24, 0.28, 0.28]; KL=[0.08, 0.08, 0.08, 0.08, 0.06]; XF=[1, 1, 1, 1, 1]
          SoilCrop CottonSoil: LL=[0.2, 0.23, 0.24, 0.28, 0.28]; KL=[0.08, 0.08, 0.08, 0.08, 0.07]; XF=[1, 1, 1, 1, 1]
          SoilCrop MungbeanSoil: LL=[0.2, 0.23, 0.24, 0.28, 0.28]; KL=[0.08, 0.08, 0.08, 0.08, 0.07]; XF=[1, 1, 1, 1, 1]
          SoilCrop ChickpeaSoil: LL=[0.2, 0.23, 0.24, 0.28, 0.28]; KL=[0.08, 0.08, 0.08, 0.08, 0.07]; XF=[1, 1, 1, 1, 1]
          SoilCrop SoybeanSoil: LL=[0.2, 0.23, 0.24, 0.28, 0.28]; KL=[0.08, 0.08, 0.08, 0.08, 0.07]; XF=[1, 1, 1, 1, 1]
          SoilCrop RiceSoil: LL=[0.2, 0.23, 0.24, 0.28, 0.28]; KL=[0.08, 0.08, 0.08, 0.08, 0.07]; XF=[1, 1, 1, 1, 1]
        SoilWater: SummerDate=1-Nov; SummerU=6; SummerCona=3.5; WinterDate=1-Apr; WinterU=4; WinterCona=2.5; DiffusConst=40; DiffusSlope=16; Salb=0.12; CN2Bare=73; CNRed=20; CNCov=0.8; max_pond=0; Thickness=[100, 100, 300, 300, 300]; SWCON=[0.9, 0.9, 0.9, 0.9, 0.9]; PrecipitationInterception=0
        SoilNitrogen: same as Soils.CQld_vertosol.north_vertosol_10oc_80_PAWC.SoilNitrogen
        Organic: FOMCNRatio=40
          Thickness  Carbon  SoilCNRatio  FBiom  FInert  FOM
          100        1.326   12           0.025  0.4     432.746
          100        1.43    12           0.012  0.5     329.45
          300        0.78    12           0.005  0.6     145.364
          300        0.39    12           0.005  0.7     64.1395
          300        0.26    12           0.005  0.9     28.3005
        Chemical
          Thickness  NO3N  NH4N      PH
          100        0     1.2375    6
          100        0     0.646341  6
          300        0     0.266929  5.8
          300        0     0.158333  5.7
          300        0     0.161151  5.4
        InitialWater: PercentMethod=0; FractionFull=0; RelativeTo=LL15
        Sample InitialNitrogen: Thickness=[100, 100, 300, 300, 300]; SWUnits=Volumetric; OCUnits=Total; PHUnits=Water
        CERESSoilTemperature
      Soil ferrosol_10oc_150_PAWC: ASCOrder=Ferrosol; ASCSubOrder=Red; SoilType=?; Site=Redvale; NearestTown=Kingaroy, Q 4610; Region=Wide Bay and Burnett; State=Queensland; Country=Australia; ApsoilNumber=65; Latitude=-26.54; Longitude=151.875; LocationAccuracy=Regional Soil Type; DataSource=Qld DPIandF (M Bell)
        Physical
          Thickness  BD    AirDry  LL15   DUL    SAT
          100        1.2   0.07    0.2    0.31   0.51
          100        1.23  0.12    0.23   0.34   0.5
          300        1.27  0.23    0.24   0.36   0.49
          300        1.32  0.27    0.28   0.37   0.47
          300        1.39  0.27    0.28   0.395  0.45
          300        1.45  0.29    0.295  0.395  0.45
          SoilCrop PeanutSoil: LL=[0.2, 0.23, 0.24, 0.28, 0.28, 0.295]; KL=[0.08, 0.08, 0.08, 0.08, 0.07, 0.06]; XF=[1, 1, 1, 1, 1, 1]
            LL source: Unknown source or quality of data
          SoilCrop WheatSoil: LL=[0.2, 0.23, 0.24, 0.28, 0.28, 0.295]; KL=[0.06, 0.06, 0.06, 0.04, 0.04, 0.02]; XF=[1, 1, 1, 1, 1, 1]
          SoilCrop SunflowerSoil: LL=[0.2, 0.23, 0.24, 0.28, 0.28, 0.295]; KL=[0.08, 0.08, 0.08, 0.08, 0.07, 0.06]; XF=[1, 1, 1, 1, 1, 1]
          SoilCrop MaizeSoil: LL=[0.2, 0.23, 0.24, 0.28, 0.28, 0.295]; KL=[0.1, 0.1, 0.08, 0.06, 0.05, 0.03]; XF=[1, 1, 1, 1, 1, 1]
          SoilCrop SorghumSoil: LL=[0.2, 0.23, 0.24, 0.28, 0.28, 0.295]; KL=[0.08, 0.08, 0.08, 0.08, 0.06, 0.04]; XF=[1, 1, 1, 1, 1, 1]
          SoilCrop CottonSoil: LL=[0.2, 0.23, 0.24, 0.28, 0.28, 0.295]; KL=[0.08, 0.08, 0.08, 0.08, 0.07, 0.06]; XF=[1, 1, 1, 1, 1, 1]
          SoilCrop MungbeanSoil: LL=[0.2, 0.23, 0.24, 0.28, 0.28, 0.295]; KL=[0.08, 0.08, 0.08, 0.08, 0.07, 0.06]; XF=[1, 1, 1, 1, 1, 1]
          SoilCrop ChickpeaSoil: LL=[0.2, 0.23, 0.24, 0.28, 0.28, 0.295]; KL=[0.08, 0.08, 0.08, 0.08, 0.07, 0.06]; XF=[1, 1, 1, 1, 1, 1]
          SoilCrop SoybeanSoil: LL=[0.2, 0.23, 0.24, 0.28, 0.28, 0.295]; KL=[0.08, 0.08, 0.08, 0.08, 0.07, 0.06]; XF=[1, 1, 1, 1, 1, 1]
          SoilCrop RiceSoil: LL=[0.2, 0.23, 0.24, 0.28, 0.28, 0.295]; KL=[0.08, 0.08, 0.08, 0.08, 0.07, 0.06]; XF=[1, 1, 1, 1, 1, 1]
        SoilWater: SummerDate=1-Nov; SummerU=6; SummerCona=3.5; WinterDate=1-Apr; WinterU=4; WinterCona=2.5; DiffusConst=40; DiffusSlope=16; Salb=0.12; CN2Bare=73; CNRed=20; CNCov=0.8; max_pond=0; Thickness=[100, 100, 300, 300, 300, 300]; SWCON=[0.9, 0.9, 0.9, 0.9, 0.9, 0.9]; PrecipitationInterception=0
        SoilNitrogen: same as Soils.CQld_vertosol.north_vertosol_10oc_80_PAWC.SoilNitrogen
        Organic: FOMCNRatio=40
          Thickness  Carbon  SoilCNRatio  FBiom  FInert  FOM
          100        1.326   12           0.025  0.4     379.705
          100        1.43    12           0.012  0.5     306.466
          300        0.78    12           0.005  0.6     161.136
          300        0.39    12           0.005  0.7     84.7236
          300        0.26    12           0.005  0.9     44.5466
          300        0.13    12           0.005  0.95    23.4221
        Chemical
          Thickness  NO3N  NH4N      PH
          100        0     1.2375    6
          100        0     0.646341  6
          300        0     0.266929  5.8
          300        0     0.158333  5.7
          300        0     0.161151  5.4
          300        0     0.164138  5
        InitialWater: PercentMethod=0; FractionFull=0; RelativeTo=LL15
        Sample InitialNitrogen: Thickness=[100, 100, 300, 300, 300, 300]; SWUnits=Volumetric; OCUnits=Total; PHUnits=Water
        CERESSoilTemperature
      Soil NQld_yellow_dermosol_135_PAWC: ASCOrder=Dermosol; ASCSubOrder=Yellow; SoilType=?; Site=Tully; NearestTown=Tully; Region=North Tropical Coast and Tablelands; State=Queensland; Country=Australia; ApsoilNumber=647; Latitude=-17.935; Longitude=145.923; LocationAccuracy=Regional Soil Type; DataSource=M.G. Cannon
        Comments=74656 reference site. TU-03; Cannon etal 1992, Soils of the Cardwell-Tully Area, North Queensland; 1. Thorburn, P.J., Jakku, E., Webster, A.J. and Everingham, Y.L. (2011). Agricultural decision support systems facilitating co-learning: a case study on environmental impacts of sugarcane production. International Journal of Agricultural Sustainability, 9, 322-333 (doi: 10.1080/14735903.2011. 582359).
        Physical
          Thickness  BD    AirDry  LL15   DUL    SAT
          150        1.62  0.05    0.1    0.22   0.363
          150        1.57  0.05    0.135  0.24   0.38
          150        1.53  0.05    0.175  0.26   0.395
          150        1.52  0.05    0.188  0.265  0.395
          300        1.52  0.05    0.18   0.265  0.397
          300        1.6   0.05    0.14   0.22   0.37
          300        1.58  0.05    0.145  0.235  0.375
          SoilCrop SugarSoil: LL=[0.1, 0.135, 0.175, 0.188, 0.18, 0.14, 0.145]; KL=[0.1, 0.1, 0.1, 0.1, 0.08, 0.08, 0.04]; XF=[1, 1, 1, 1, 1, 0.5, 0.2]
            LL source: Estimated based on local knowledge
          SoilCrop RiceSoil: LL=[0.1, 0.135, 0.175, 0.188, 0.18, 0.14, 0.145]; KL=[0.1, 0.1, 0.1, 0.1, 0.08, 0.08, 0.04]; XF=[1, 1, 1, 1, 1, 0.5, 0.2]
          SoilCrop MungbeanSoil: LL=[0.1, 0.135, 0.175, 0.188, 0.18, 0.14, 0.145]; KL=[0.1, 0.1, 0.1, 0.1, 0.08, 0.08, 0.04]; XF=[1, 1, 1, 1, 1, 0.5, 0.2]
          SoilCrop ChickpeaSoil: LL=[0.1, 0.135, 0.175, 0.188, 0.18, 0.14, 0.145]; KL=[0.1, 0.1, 0.1, 0.1, 0.08, 0.08, 0.04]; XF=[1, 1, 1, 1, 1, 0.5, 0.2]
          SoilCrop SoybeanSoil: LL=[0.1, 0.135, 0.175, 0.188, 0.18, 0.14, 0.145]; KL=[0.1, 0.1, 0.1, 0.1, 0.08, 0.08, 0.04]; XF=[1, 1, 1, 1, 1, 0.5, 0.2]
          SoilCrop SorghumSoil: LL=[0.1, 0.135, 0.175, 0.188, 0.18, 0.14, 0.145]; KL=[0.1, 0.1, 0.1, 0.1, 0.08, 0.08, 0.04]; XF=[1, 1, 1, 1, 1, 0.5, 0.2]
          SoilCrop MaizeSoil: LL=[0.1, 0.135, 0.175, 0.188, 0.18, 0.14, 0.145]; KL=[0.1, 0.1, 0.1, 0.1, 0.08, 0.08, 0.04]; XF=[1, 1, 1, 1, 1, 0.5, 0.2]
          SoilCrop WheatSoil: LL=[0.1, 0.135, 0.175, 0.188, 0.18, 0.14, 0.145]; KL=[0.1, 0.1, 0.1, 0.1, 0.08, 0.08, 0.04]; XF=[1, 1, 1, 1, 1, 0.5, 0.2]
          SoilCrop PeanutSoil: LL=[0.1, 0.135, 0.175, 0.188, 0.18, 0.14, 0.145]; KL=[0.1, 0.1, 0.1, 0.1, 0.08, 0.08, 0.04]; XF=[1, 1, 1, 1, 1, 0.5, 0.2]
        SoilWater: SummerDate=1-Nov; SummerU=4; SummerCona=3; WinterDate=1-Apr; WinterU=4; WinterCona=3; DiffusConst=88; DiffusSlope=35.4; Salb=0.28; CN2Bare=64; CNRed=10; CNCov=0.8; max_pond=0; Thickness=[150, 150, 150, 150, 300, 300, 300]; SWCON=[0.4, 0.4, 0.4, 0.5, 0.6, 0.6, 0.7]; PrecipitationInterception=0
        SoilNitrogen: same as Soils.CQld_vertosol.north_vertosol_10oc_80_PAWC.SoilNitrogen
        Organic: FOMCNRatio=70
          Thickness  Carbon  SoilCNRatio  FBiom  FInert  FOM
          150        1.5     18           0.12   0.3     964.943
          150        0.7     18           0.1    0.4     714.847
          150        0.37    18           0.05   0.6     529.572
          150        0.21    18           0.01   0.9     392.317
          300        0.21    18           0.01   0.9     215.308
          300        0.21    18           0.01   0.9     118.163
          300        0.21    18           0.01   0.9     64.8495
        Chemical
          Thickness  NO3N  NH4N  PH
          150        0     1.5   6.35
          150        0     1     6.75
          150        0     0.8   6.25
          150        0     0.7   6.2
          300        0     0.6   6.1
          300        0     0.5   5.9
          300        0     0.5   6
        InitialWater: PercentMethod=0; FractionFull=0; RelativeTo=LL15
        Sample InitialNitrogen: Thickness=[150, 150, 150, 150, 300, 300, 300]; SWUnits=Volumetric; OCUnits=Total; PHUnits=Water
        CERESSoilTemperature
      Soil NQld_brown_dermosol_200_PAWC: ASCOrder=Dermosol; ASCSubOrder=Brown; SoilType=?; Site=Tully; NearestTown=Tully; Region=North Tropical Coast and Tablelands; State=Queensland; Country=Australia; ApsoilNumber=648; Latitude=-17.935; Longitude=145.923; LocationAccuracy=Regional Soil Type; DataSource=M.G. Cannon
        Comments=Coom site. TU-02; Cannon etal 1992, Soils of the Cardwell-Tully Area, North Queensland; 1. Thorburn, P.J., Jakku, E., Webster, A.J. and Everingham, Y.L. (2011). Agricultural decision support systems facilitating co-learning: a case study on environmental impacts of sugarcane production. International Journal of Agricultural Sustainability, 9, 322-333 (doi: 10.1080/14735903.2011. 582359).; 1. Thorburn, P.J., Jakku, E., Webster, A.J. and Everingham, Y.L. (2011). Agricultural decision support systems facilitating co-learning: a case study on environmental impacts of sugarcane production. International Journal of Agricultural Sustainability, 9, 322-333 (doi: 10.1080/14735903.2011. 582359).
        Physical
          Thickness  BD    AirDry  LL15  DUL   SAT
          100        1.3   0.05    0.23  0.37  0.46
          150        1.33  0.05    0.22  0.36  0.45
          250        1.37  0.05    0.22  0.35  0.43
          250        1.33  0.05    0.22  0.36  0.45
          250        1.36  0.05    0.22  0.35  0.44
          250        1.33  0.05    0.22  0.36  0.45
          250        1.37  0.05    0.22  0.35  0.43
          SoilCrop SugarSoil: LL=[0.23, 0.22, 0.22, 0.22, 0.22, 0.22, 0.22]; KL=[0.16, 0.16, 0.16, 0.16, 0.12, 0.08, 0.04]; XF=[1, 1, 1, 1, 1, 0.5, 0.2]
            LL source: Estimated based on local knowledge
          SoilCrop RiceSoil: LL=[0.23, 0.22, 0.22, 0.22, 0.22, 0.22, 0.22]; KL=[0.16, 0.16, 0.16, 0.16, 0.12, 0.08, 0.04]; XF=[1, 1, 1, 1, 1, 0.5, 0.2]
          SoilCrop MungbeanSoil: LL=[0.23, 0.22, 0.22, 0.22, 0.22, 0.22, 0.22]; KL=[0.16, 0.16, 0.16, 0.16, 0.12, 0.08, 0.04]; XF=[1, 1, 1, 1, 1, 0.5, 0.2]
          SoilCrop ChickpeaSoil: LL=[0.23, 0.22, 0.22, 0.22, 0.22, 0.22, 0.22]; KL=[0.16, 0.16, 0.16, 0.16, 0.12, 0.08, 0.04]; XF=[1, 1, 1, 1, 1, 0.5, 0.2]
          SoilCrop SoybeanSoil: LL=[0.23, 0.22, 0.22, 0.22, 0.22, 0.22, 0.22]; KL=[0.16, 0.16, 0.16, 0.16, 0.12, 0.08, 0.04]; XF=[1, 1, 1, 1, 1, 0.5, 0.2]
          SoilCrop MaizeSoil: LL=[0.23, 0.22, 0.22, 0.22, 0.22, 0.22, 0.22]; KL=[0.16, 0.16, 0.16, 0.16, 0.12, 0.08, 0.04]; XF=[1, 1, 1, 1, 1, 0.5, 0.2]
          SoilCrop WheatSoil: LL=[0.23, 0.22, 0.22, 0.22, 0.22, 0.22, 0.22]; KL=[0.16, 0.16, 0.16, 0.16, 0.12, 0.08, 0.04]; XF=[1, 1, 1, 1, 1, 0.5, 0.2]
          SoilCrop PeanutSoil: LL=[0.23, 0.22, 0.22, 0.22, 0.22, 0.22, 0.22]; KL=[0.16, 0.16, 0.16, 0.16, 0.12, 0.08, 0.04]; XF=[1, 1, 1, 1, 1, 0.5, 0.2]
        SoilWater: SummerDate=1-Nov; SummerU=4; SummerCona=3; WinterDate=1-Apr; WinterU=4; WinterCona=3; DiffusConst=40; DiffusSlope=16; Salb=0.1; CN2Bare=82; CNRed=6; CNCov=0.8; max_pond=0; Thickness=[100, 150, 250, 250, 250, 250, 250]; SWCON=[0.6, 0.4, 0.4, 0.4, 0.4, 0.4, 0.4]; PrecipitationInterception=0
        SoilNitrogen: same as Soils.CQld_vertosol.north_vertosol_10oc_80_PAWC.SoilNitrogen
        Organic: FOMCNRatio=70
          Thickness  Carbon  SoilCNRatio  FBiom  FInert  FOM
          100        1.33    10.3         0.1    0.2     1075.64
          150        1.06    10.3         0.07   0.4     796.851
          250        0.66    10.3         0.05   0.55    483.315
          250        0.35    10.3         0.025  0.85    293.145
          250        0.24    10.3         0.015  0.95    177.801
          250        0.2     10.3         0.01   0.95    107.842
          250        0.16    10.3         0.01   0.99    65.4095
        Chemical
          Thickness  NO3N  NH4N  PH
          100        0     1.5   5
          150        0     1     5
          250        0     0.8   5
          250        0     0.7   5.5
          250        0     0.6   6
          250        0     0.5   6
          250        0     0.5   6
        InitialWater: PercentMethod=0; FractionFull=0; RelativeTo=LL15
        Sample InitialNitrogen: Thickness=[100, 150, 250, 250, 250, 250, 250]; SWUnits=Volumetric; OCUnits=Total; PHUnits=Water
        CERESSoilTemperature
      Soil NQld_ferrosol_80_PAWC: ASCOrder=Ferrosol; SoilType=?; Site=Babinda; NearestTown=Babinda; Region=North Tropical Coast and Tablelands; State=Queensland; Country=Australia; ApsoilNumber=649; Latitude=-17.457; Longitude=145.992; LocationAccuracy=+/- 200m; DataSource=CSIRO Sustainable Ecosystems, Brisbane
        Comments=BA-01; Meier, E.A., Thorburn, P.J., Probert, M.E., 2006. Occurrence and simulation of nitrification in two contrasting sugarcane soils from the Australian wet tropics. Aust. J. Soil Res. 44, 1–9.
        Physical
          Thickness  BD     AirDry  LL15  DUL   SAT
          150        1.4    0.05    0.3   0.38  0.47
          150        1.43   0.05    0.33  0.39  0.46
          150        1.351  0.05    0.31  0.39  0.49
          150        1.351  0.05    0.32  0.39  0.49
          300        1.43   0.05    0.34  0.39  0.46
          300        1.377  0.05    0.32  0.38  0.48
          300        1.536  0.05    0.38  0.4   0.42
          SoilCrop SugarSoil: LL=[0.3, 0.33, 0.31, 0.32, 0.34, 0.32, 0.38]; KL=[0.1, 0.1, 0.1, 0.1, 0.08, 0.08, 0.04]; XF=[1, 1, 1, 1, 1, 0.5, 0.2]
            LL source: Estimated based on local knowledge
          SoilCrop RiceSoil: LL=[0.3, 0.33, 0.31, 0.32, 0.34, 0.32, 0.38]; KL=[0.1, 0.1, 0.1, 0.1, 0.08, 0.08, 0.04]; XF=[1, 1, 1, 1, 1, 0.5, 0.2]
          SoilCrop MungbeanSoil: LL=[0.3, 0.33, 0.31, 0.32, 0.34, 0.32, 0.38]; KL=[0.1, 0.1, 0.1, 0.1, 0.08, 0.08, 0.04]; XF=[1, 1, 1, 1, 1, 0.5, 0.2]
          SoilCrop ChickpeaSoil: LL=[0.3, 0.33, 0.31, 0.32, 0.34, 0.32, 0.38]; KL=[0.1, 0.1, 0.1, 0.1, 0.08, 0.08, 0.04]; XF=[1, 1, 1, 1, 1, 0.5, 0.2]
          SoilCrop SoybeanSoil: LL=[0.3, 0.33, 0.31, 0.32, 0.34, 0.32, 0.38]; KL=[0.1, 0.1, 0.1, 0.1, 0.08, 0.08, 0.04]; XF=[1, 1, 1, 1, 1, 0.5, 0.2]
          SoilCrop MaizeSoil: LL=[0.3, 0.33, 0.31, 0.32, 0.34, 0.32, 0.38]; KL=[0.1, 0.1, 0.1, 0.1, 0.08, 0.08, 0.04]; XF=[1, 1, 1, 1, 1, 0.5, 0.2]
          SoilCrop WheatSoil: LL=[0.3, 0.33, 0.31, 0.32, 0.34, 0.32, 0.38]; KL=[0.1, 0.1, 0.1, 0.1, 0.08, 0.08, 0.04]; XF=[1, 1, 1, 1, 1, 0.5, 0.2]
          SoilCrop PeanutSoil: LL=[0.3, 0.33, 0.31, 0.32, 0.34, 0.32, 0.38]; KL=[0.1, 0.1, 0.1, 0.1, 0.08, 0.08, 0.04]; XF=[1, 1, 1, 1, 1, 0.5, 0.2]
        SoilWater: SummerDate=1-Nov; SummerU=4; SummerCona=3; WinterDate=1-Apr; WinterU=4; WinterCona=3; DiffusConst=88; DiffusSlope=35.4; Salb=0.11; CN2Bare=75; CNRed=6; CNCov=0.8; max_pond=0; Thickness=[150, 150, 150, 150, 300, 300, 300]; SWCON=[0.3, 0.3, 0.3, 0.25, 0.25, 0.25, 0.25]; PrecipitationInterception=0
        SoilNitrogen: same as Soils.CQld_vertosol.north_vertosol_10oc_80_PAWC.SoilNitrogen
        Organic: FOMCNRatio=70
          Thickness  Carbon  SoilCNRatio  FBiom  FInert  FOM
          150        2.54    16.7         0.08   0.3     964.943
          150        2.11    16.7         0.07   0.35    714.847
          150        1.47    16.7         0.04   0.55    529.572
          150        1.07    16.7         0.01   0.9     392.317
          300        0.97    16.7         0.01   0.95    215.308
          300        0.81    16.7         0.01   0.95    118.163
          300        0.45    16.7         0.01   0.99    64.8495
        Chemical
          Thickness  NO3N  NH4N  PH
          150        0     1.5   4.9
          150        0     1     4.9
          150        0     0.8   4.9
          150        0     0.7   4.9
          300        0     0.6   4.9
          300        0     0.5   4.9
          300        0     0.5   4.9
        InitialWater: PercentMethod=0; FractionFull=0; RelativeTo=LL15
        Sample InitialNitrogen: Thickness=[150, 150, 150, 150, 300, 300, 300]; SWUnits=Volumetric; OCUnits=Total; PHUnits=Water
        CERESSoilTemperature
      Folder NQld Coastal tully atherton
        Soil Yellow Dermosol (Tully No647): same as Soils.NQld_ferrosol.NQld_yellow_dermosol_135_PAWC
        Soil Brown Dermosol (Tully No 648): same as Soils.NQld_ferrosol.NQld_brown_dermosol_200_PAWC
        Soil Ferrosol (Babinda No649): same as Soils.NQld_ferrosol.NQld_ferrosol_80_PAWC
    Folder MidQld_soils
      Soil MidQld_black_vertosol_100_PAWC: ASCOrder=Vertosol; ASCSubOrder=Black; SoilType=Clay; Site=Generic; NearestTown=Childers; Region=Wide Bay and Burnett; State=Queensland; Country=Australia; ApsoilNumber=1073; Latitude=-25.236343; Longitude=152.27813; LocationAccuracy=Regional Soil Type
        Physical
          Thickness  BD    AirDry  LL15   DUL    SAT
          200        1.15  0.05    0.39   0.552  0.559
          200        1.1   0.05    0.413  0.582  0.583
          100        1.15  0.05    0.404  0.55   0.558
          100        1.15  0.05    0.404  0.55   0.558
          70         1.15  0.05    0.404  0.55   0.558
          100        1.15  0.05    0.404  0.55   0.558
          300        1.15  0.05    0.404  0.55   0.558
          300        1.15  0.05    0.404  0.55   0.558
          300        1.15  0.05    0.404  0.55   0.558
          SoilCrop PeanutSoil
            LL=[0.39, 0.413, 0.404, 0.404, 0.404, 0.404, 0.404, 0.404, 0.404]
            KL=[0.08, 0.07, 0.06, 0.05, 0.04, 0.03, 0.02, 0.02, 0.02]
            XF=[1, 1, 1, 1, 1, 1, 1, 1, 1]
            LL source: Unknown source or quality of data
          SoilCrop SoybeanSoil: same as Soils.MidQld_soils.MidQld_black_vertosol_100_PAWC.Physical.PeanutSoil
          SoilCrop SugarSoil
            LL=[0.39, 0.413, 0.404, 0.404, 0.404, 0.404, 0.404, 0.404, 0.404]
            KL=[0.1, 0.1, 0.08, 0.07, 0.06, 0.05, 0.05, 0.05, 0.05]
            XF=[1, 1, 1, 1, 1, 0, 0, 0, 0]
            LL source: Unknown source or quality of data
          SoilCrop RiceSoil
            LL=[0.39, 0.413, 0.404, 0.404, 0.404, 0.404, 0.404, 0.404, 0.404]
            KL=[0.1, 0.1, 0.08, 0.07, 0.06, 0.05, 0.05, 0.05, 0.05]
            XF=[1, 1, 1, 1, 1, 0, 0, 0, 0]
          SoilCrop ChickpeaSoil
            LL=[0.39, 0.413, 0.404, 0.404, 0.404, 0.404, 0.404, 0.404, 0.404]
            KL=[0.1, 0.1, 0.08, 0.07, 0.06, 0.05, 0.05, 0.05, 0.05]
            XF=[1, 1, 1, 1, 1, 0, 0, 0, 0]
          SoilCrop MungbeanSoil
            LL=[0.39, 0.413, 0.404, 0.404, 0.404, 0.404, 0.404, 0.404, 0.404]
            KL=[0.1, 0.1, 0.08, 0.07, 0.06, 0.05, 0.05, 0.05, 0.05]
            XF=[1, 1, 1, 1, 1, 0, 0, 0, 0]
          SoilCrop MaizeSoil
            LL=[0.39, 0.413, 0.404, 0.404, 0.404, 0.404, 0.404, 0.404, 0.404]
            KL=[0.1, 0.1, 0.08, 0.07, 0.06, 0.05, 0.05, 0.05, 0.05]
            XF=[1, 1, 1, 1, 1, 0, 0, 0, 0]
        SoilWater: SummerDate=1-Nov; SummerU=8; SummerCona=3; WinterDate=1-Apr; WinterU=8; WinterCona=3; DiffusConst=40; DiffusSlope=16; Salb=0.1; CN2Bare=85; CNRed=20; CNCov=0.8; max_pond=0; Thickness=[200, 200, 100, 100, 70, 100, 300, 300, 300]; SWCON=[0.5, 0.5, 0.5, 0.5, 0.5, 0.5, 0.5, 0.5, 0.5]; PrecipitationInterception=0
        SoilNitrogen: same as Soils.CQld_vertosol.north_vertosol_10oc_80_PAWC.SoilNitrogen
        Organic: FOMCNRatio=40
          Thickness  Carbon  SoilCNRatio  FBiom  FInert  FOM
          200        1       12           0.015  0.5     252.454
          200        0.8     12           0.01   0.75    176.258
          100        0.8     12           0.01   0.75    147.276
          100        0.7     12           0.005  0.85    123.059
          70         0.6     12           0.005  0.9     108.518
          100        0.6     12           0.005  0.95    90.6747
          300        0.6     12           0.005  0.95    52.8975
          300        0.6     12           0.005  0.95    30.8592
          300        0.6     12           0.005  0.95    18.0025
        Chemical
          Thickness  NO3N  NH4N  PH
          200        0     1.5   6
          200        0     1     6
          100        0     0.8   6
          100        0     0.7   6
          70         0     0.6   6
          100        0     0.5   6
          300        0     0.5   6
          300        0     0.5   6
          300        0     0.5   6
        InitialWater: PercentMethod=0; FractionFull=0; RelativeTo=LL15
        Sample InitialNitrogen: Thickness=[200, 200, 100, 100, 70, 100, 300, 300, 300]; SWUnits=Volumetric; OCUnits=Total; PHUnits=Water
        CERESSoilTemperature
      Soil MidQld_yellow_dermosol_150_PAWC: ASCOrder=Dermosol; ASCSubOrder=Yellow; SoilType=Sandy clay loam; Site=Generic; NearestTown=Childers; Region=Wide Bay and Burnett; State=Queensland; Country=Australia; ApsoilNumber=1070; Latitude=-25.236343; Longitude=152.27813; LocationAccuracy=Regional Soil Type
        Physical
          Thickness  BD    AirDry  LL15   DUL    SAT
          200        1.43  0.05    0.175  0.293  0.377
          200        1.5   0.05    0.2    0.307  0.37
          100        1.5   0.05    0.225  0.326  0.38
          100        1.53  0.05    0.242  0.332  0.378
          200        1.46  0.05    0.222  0.289  0.369
          200        1.46  0.05    0.222  0.289  0.369
          300        1.8   0.05    0.222  0.289  0.305
          300        1.8   0.05    0.222  0.289  0.305
          300        1.8   0.05    0.222  0.289  0.305
          SoilCrop PeanutSoil
            LL=[0.175, 0.2, 0.225, 0.242, 0.222, 0.222, 0.222, 0.222, 0.222]
            KL=[0.08, 0.07, 0.06, 0.05, 0.04, 0.03, 0.02, 0.02, 0.02]
            XF=[1, 1, 1, 1, 1, 1, 1, 1, 1]
            LL source: Unknown source or quality of data
          SoilCrop SoybeanSoil: same as Soils.MidQld_soils.MidQld_yellow_dermosol_150_PAWC.Physical.PeanutSoil
          SoilCrop SugarSoil
            LL=[0.175, 0.2, 0.225, 0.242, 0.222, 0.222, 0.222, 0.222, 0.222]
            KL=[0.1, 0.1, 0.08, 0.07, 0.06, 0.05, 0.05, 0.05, 0.05]
            XF=[1, 1, 1, 1, 1, 1, 1, 1, 1]
            LL source: Unknown source or quality of data
          SoilCrop RiceSoil
            LL=[0.175, 0.2, 0.225, 0.242, 0.222, 0.222, 0.222, 0.222, 0.222]
            KL=[0.08, 0.07, 0.06, 0.05, 0.04, 0.03, 0.02, 0.02, 0.02]
            XF=[1, 1, 1, 1, 1, 1, 1, 1, 1]
          SoilCrop ChickpeaSoil
            LL=[0.175, 0.2, 0.225, 0.242, 0.222, 0.222, 0.222, 0.222, 0.222]
            KL=[0.08, 0.07, 0.06, 0.05, 0.04, 0.03, 0.02, 0.02, 0.02]
            XF=[1, 1, 1, 1, 1, 1, 1, 1, 1]
          SoilCrop MungbeanSoil
            LL=[0.175, 0.2, 0.225, 0.242, 0.222, 0.222, 0.222, 0.222, 0.222]
            KL=[0.08, 0.07, 0.06, 0.05, 0.04, 0.03, 0.02, 0.02, 0.02]
            XF=[1, 1, 1, 1, 1, 1, 1, 1, 1]
          SoilCrop MaizeSoil
            LL=[0.175, 0.2, 0.225, 0.242, 0.222, 0.222, 0.222, 0.222, 0.222]
            KL=[0.08, 0.07, 0.06, 0.05, 0.04, 0.03, 0.02, 0.02, 0.02]
            XF=[1, 1, 1, 1, 1, 1, 1, 1, 1]
        SoilWater: SummerDate=1-Nov; SummerU=6; SummerCona=3; WinterDate=1-Apr; WinterU=6; WinterCona=3; DiffusConst=40; DiffusSlope=16; Salb=0.1; CN2Bare=75; CNRed=20; CNCov=0.8; max_pond=0; Thickness=[200, 200, 100, 100, 200, 200, 300, 300, 300]; SWCON=[0.8, 0.8, 0.8, 0.8, 0.8, 0.8, 0.3, 0.3, 0.3]; PrecipitationInterception=0
        SoilNitrogen: same as Soils.CQld_vertosol.north_vertosol_10oc_80_PAWC.SoilNitrogen
        Organic: FOMCNRatio=40
          Thickness  Carbon  SoilCNRatio  FBiom  FInert  FOM
          200        1       12           0.015  0.5     240.729
          100        0.8     12           0.01   0.75    207.197
          100        0.8     12           0.01   0.75    178.336
          200        0.7     12           0.005  0.85    132.115
          200        0.6     12           0.005  0.9     97.873
          300        0.6     12           0.005  0.95    62.4066
          300        0.6     12           0.005  0.95    39.7922
          300        0.6     12           0.005  0.95    25.3726
          300        0.6     12           0.005  0.95    16.1783
        Chemical
          Thickness  NO3N  NH4N  PH
          200        0     1.5   6
          100        0     1     6
          100        0     0.8   6
          200        0     0.7   6
          200        0     0.6   6
          300        0     0.5   6
          300        0     0.5   6
          300        0     0.5   6
          300        0     0.5   6
        InitialWater: PercentMethod=0; FractionFull=0; RelativeTo=LL15
        Sample InitialNitrogen: Thickness=[200, 100, 100, 200, 200, 300, 300, 300, 300]; SWUnits=Volumetric; OCUnits=Total; PHUnits=Water
        CERESSoilTemperature
      Soil MidQld_red_ferrosol_140_PAWC: ASCOrder=Ferrosol; ASCSubOrder=Red; SoilType=Loam; Site=Generic; NearestTown=Kepnock; Region=Wide Bay and Burnett; State=Queensland; Country=Australia; ApsoilNumber=1072; Latitude=-24.8777; Longitude=152.37375; LocationAccuracy=Regional Soil Type
        Comments=Changed SWCON from 0.5 to 0.9 based on local advice about this regions Ferrosols from Mike Bell, Graeme Wright, Yash Chauhan
        Physical
          Thickness  BD   AirDry  LL15   DUL    SAT
          200        1.4  0.05    0.252  0.433  0.452
          200        1.4  0.05    0.263  0.427  0.449
          100        1.4  0.05    0.274  0.424  0.448
          100        1.4  0.05    0.289  0.421  0.446
          200        1.4  0.05    0.301  0.413  0.442
          200        1.4  0.05    0.301  0.413  0.442
          300        1.4  0.05    0.301  0.413  0.442
          300        1.4  0.05    0.301  0.413  0.442
          300        1.4  0.05    0.301  0.413  0.442
          SoilCrop PeanutSoil
            LL=[0.252, 0.263, 0.274, 0.289, 0.301, 0.301, 0.301, 0.301, 0.301]
            KL=[0.08, 0.07, 0.06, 0.05, 0.04, 0.03, 0.02, 0.02, 0.02]
            XF=[1, 1, 1, 1, 1, 1, 1, 1, 1]
            LL source: Unknown source or quality of data
          SoilCrop SoybeanSoil: same as Soils.MidQld_soils.MidQld_red_ferrosol_140_PAWC.Physical.PeanutSoil
          SoilCrop SugarSoil
            LL=[0.252, 0.263, 0.274, 0.289, 0.301, 0.301, 0.301, 0.301, 0.301]
            KL=[0.1, 0.1, 0.08, 0.07, 0.06, 0.05, 0.05, 0.05, 0.05]
            XF=[1, 1, 1, 1, 1, 1, 0, 0, 0]
            LL source: Unknown source or quality of data
          SoilCrop RiceSoil
            LL=[0.252, 0.263, 0.274, 0.289, 0.301, 0.301, 0.301, 0.301, 0.301]
            KL=[0.08, 0.07, 0.06, 0.05, 0.04, 0.03, 0.02, 0.02, 0.02]
            XF=[1, 1, 1, 1, 1, 1, 1, 1, 1]
          SoilCrop ChickpeaSoil
            LL=[0.252, 0.263, 0.274, 0.289, 0.301, 0.301, 0.301, 0.301, 0.301]
            KL=[0.08, 0.07, 0.06, 0.05, 0.04, 0.03, 0.02, 0.02, 0.02]
            XF=[1, 1, 1, 1, 1, 1, 1, 1, 1]
          SoilCrop MungbeanSoil
            LL=[0.252, 0.263, 0.274, 0.289, 0.301, 0.301, 0.301, 0.301, 0.301]
            KL=[0.08, 0.07, 0.06, 0.05, 0.04, 0.03, 0.02, 0.02, 0.02]
            XF=[1, 1, 1, 1, 1, 1, 1, 1, 1]
          SoilCrop MaizeSoil
            LL=[0.252, 0.263, 0.274, 0.289, 0.301, 0.301, 0.301, 0.301, 0.301]
            KL=[0.08, 0.07, 0.06, 0.05, 0.04, 0.03, 0.02, 0.02, 0.02]
            XF=[1, 1, 1, 1, 1, 1, 1, 1, 1]
        SoilWater: SummerDate=1-Nov; SummerU=8; SummerCona=3; WinterDate=1-Apr; WinterU=8; WinterCona=3; DiffusConst=40; DiffusSlope=16; Salb=0.1; CN2Bare=75; CNRed=20; CNCov=0.8; max_pond=0; Thickness=[200, 200, 100, 100, 200, 200, 300, 300, 300]; SWCON=[0.9, 0.9, 0.9, 0.9, 0.9, 0.9, 0.9, 0.9, 0.9]; PrecipitationInterception=0
        SoilNitrogen: same as Soils.CQld_vertosol.north_vertosol_10oc_80_PAWC.SoilNitrogen
        Organic: FOMCNRatio=40
          Thickness  Carbon  SoilCNRatio  FBiom  FInert  FOM
          200        1       12           0.015  0.5     255.873
          200        0.8     12           0.01   0.75    186.586
          100        0.8     12           0.01   0.75    159.333
          100        0.7     12           0.005  0.85    136.061
          200        0.6     12           0.005  0.9     99.2175
          200        0.6     12           0.005  0.95    72.3507
          300        0.6     12           0.005  0.95    45.0531
          300        0.6     12           0.005  0.95    28.0547
          300        0.6     12           0.005  0.95    17.4698
        Chemical
          Thickness  NO3N  NH4N  PH
          200        0     1.5   6
          200        0     1     6
          100        0     0.8   6
          100        0     0.7   6
          200        0     0.6   6
          200        0     0.5   6
          300        0     0.5   6
          300        0     0.5   6
          300        0     0.5   6
        InitialWater: PercentMethod=0; FractionFull=0; RelativeTo=LL15
        Sample InitialNitrogen: Thickness=[200, 200, 100, 100, 200, 200, 300, 300, 300]; SWUnits=Volumetric; OCUnits=Total; PHUnits=Water
        CERESSoilTemperature
      Soil MidQld_red_ferrosol_185_PAWC: ASCOrder=Ferrosol; ASCSubOrder=Red; SoilType=Loam; Site=Generic; NearestTown=Kepnock; Region=Wide Bay and Burnett; State=Queensland; Country=Australia; ApsoilNumber=1065; Latitude=-24.8777; Longitude=152.37375; LocationAccuracy=Regional Soil Type
        Comments=Changed SWCON from 0.5 to 0.9 based on local advice about this regions Ferrosols from Mike Bell, Graeme Wright, Yash Chauhan
        Physical
          Thickness  BD   AirDry  LL15   DUL    SAT
          200        1.3  0.05    0.274  0.478  0.494
          200        1.3  0.05    0.286  0.468  0.489
          100        1.3  0.05    0.298  0.46   0.485
          100        1.3  0.05    0.314  0.453  0.481
          200        1.3  0.05    0.331  0.453  0.481
          200        1.3  0.05    0.347  0.452  0.481
          300        1.3  0.05    0.347  0.452  0.481
          300        1.3  0.05    0.347  0.452  0.481
          300        1.3  0.05    0.347  0.452  0.481
          SoilCrop PeanutSoil
            LL=[0.274, 0.286, 0.298, 0.314, 0.331, 0.347, 0.347, 0.347, 0.347]
            KL=[0.08, 0.07, 0.06, 0.05, 0.04, 0.03, 0.02, 0.02, 0.02]
            XF=[1, 1, 1, 1, 1, 1, 1, 1, 1]
            LL source: Unknown source or quality of data
          SoilCrop SoybeanSoil: same as Soils.MidQld_soils.MidQld_red_ferrosol_185_PAWC.Physical.PeanutSoil
          SoilCrop SugarSoil
            LL=[0.274, 0.286, 0.298, 0.314, 0.331, 0.347, 0.347, 0.347, 0.347]
            KL=[0.01, 0.01, 0.08, 0.07, 0.06, 0.05, 0.05, 0.05, 0.05]
            XF=[1, 1, 1, 1, 1, 1, 1, 1, 1]
            LL source: Unknown source or quality of data
          SoilCrop RiceSoil
            LL=[0.274, 0.286, 0.298, 0.314, 0.331, 0.347, 0.347, 0.347, 0.347]
            KL=[0.08, 0.07, 0.06, 0.05, 0.04, 0.03, 0.02, 0.02, 0.02]
            XF=[1, 1, 1, 1, 1, 1, 1, 1, 1]
          SoilCrop ChickpeaSoil
            LL=[0.274, 0.286, 0.298, 0.314, 0.331, 0.347, 0.347, 0.347, 0.347]
            KL=[0.08, 0.07, 0.06, 0.05, 0.04, 0.03, 0.02, 0.02, 0.02]
            XF=[1, 1, 1, 1, 1, 1, 1, 1, 1]
          SoilCrop MungbeanSoil
            LL=[0.274, 0.286, 0.298, 0.314, 0.331, 0.347, 0.347, 0.347, 0.347]
            KL=[0.08, 0.07, 0.06, 0.05, 0.04, 0.03, 0.02, 0.02, 0.02]
            XF=[1, 1, 1, 1, 1, 1, 1, 1, 1]
          SoilCrop MaizeSoil
            LL=[0.274, 0.286, 0.298, 0.314, 0.331, 0.347, 0.347, 0.347, 0.347]
            KL=[0.08, 0.07, 0.06, 0.05, 0.04, 0.03, 0.02, 0.02, 0.02]
            XF=[1, 1, 1, 1, 1, 1, 1, 1, 1]
        SoilWater: SummerDate=1-Nov; SummerU=6; SummerCona=3; WinterDate=1-Apr; WinterU=6; WinterCona=3; DiffusConst=40; DiffusSlope=16; Salb=0.1; CN2Bare=75; CNRed=20; CNCov=0.8; max_pond=0; Thickness=[200, 200, 100, 100, 200, 200, 300, 300, 300]; SWCON=[0.9, 0.9, 0.9, 0.9, 0.9, 0.9, 0.9, 0.9, 0.9]; PrecipitationInterception=0
        SoilNitrogen: same as Soils.CQld_vertosol.north_vertosol_10oc_80_PAWC.SoilNitrogen
        Organic: same as Soils.MidQld_soils.MidQld_red_ferrosol_140_PAWC.Organic
        Chemical: same as Soils.MidQld_soils.MidQld_red_ferrosol_140_PAWC.Chemical
        InitialWater: PercentMethod=0; FractionFull=0; RelativeTo=LL15
        Sample InitialNitrogen: Thickness=[200, 200, 100, 100, 200, 200, 300, 300, 300]; SWUnits=Volumetric; OCUnits=Total; PHUnits=Water
        CERESSoilTemperature
      Folder Wide Bay bundaberg
        Soil Black Vertosol (PAWC102mm) (Childers No1073): ASCOrder=Vertosol; ASCSubOrder=Black; SoilType=Clay; Site=Generic; NearestTown=Childers; Region=Wide Bay and Burnett; State=Queensland; Country=Australia; ApsoilNumber=1073; Latitude=-25.236343; Longitude=152.27813; LocationAccuracy=Regional Soil Type
          Physical
            Thickness  BD    AirDry  LL15   DUL    SAT
            200        1.15  0.05    0.39   0.552  0.559
            200        1.1   0.05    0.413  0.582  0.583
            100        1.15  0.05    0.404  0.55   0.558
            100        1.15  0.05    0.404  0.55   0.558
            70         1.15  0.05    0.404  0.55   0.558
            100        1.15  0.05    0.404  0.55   0.558
            300        1.15  0.05    0.404  0.55   0.558
            300        1.15  0.05    0.404  0.55   0.558
            300        1.15  0.05    0.404  0.55   0.558
            SoilCrop PeanutSoil: same as Soils.MidQld_soils.MidQld_black_vertosol_100_PAWC.Physical.PeanutSoil
            SoilCrop SoybeanSoil: same as Soils.MidQld_soils.MidQld_black_vertosol_100_PAWC.Physical.PeanutSoil
            SoilCrop SugarSoil: same as Soils.MidQld_soils.MidQld_black_vertosol_100_PAWC.Physical.SugarSoil
          SoilWater: same as Soils.MidQld_soils.MidQld_black_vertosol_100_PAWC.SoilWater
          SoilNitrogen: same as Soils.CQld_vertosol.north_vertosol_10oc_80_PAWC.SoilNitrogen
          Organic: same as Soils.MidQld_soils.MidQld_black_vertosol_100_PAWC.Organic
          Chemical: Thickness=[200, 200, 100, 100, 70, 100, 300, 300, 300]; PH=[6, 6, 6, 6, 6, 6, 6, 6, 6]
          InitialWater: PercentMethod=0; FractionFull=1
          Sample InitialNitrogen: Thickness=[200, 200, 100, 100, 70, 100, 300, 300, 300]; SWUnits=Volumetric; OCUnits=Total; PHUnits=Water
          CERESSoilTemperature
        Soil Yellow Dermosol (PAWC150mm) (Childers No1070): ASCOrder=Dermosol; ASCSubOrder=Yellow; SoilType=Sandy clay loam; Site=Generic; NearestTown=Childers; Region=Wide Bay and Burnett; State=Queensland; Country=Australia; ApsoilNumber=1070; Latitude=-25.236343; Longitude=152.27813; LocationAccuracy=Regional Soil Type
          Physical
            Thickness  BD    AirDry  LL15   DUL    SAT
            200        1.43  0.05    0.175  0.293  0.377
            200        1.5   0.05    0.2    0.307  0.37
            100        1.5   0.05    0.225  0.326  0.38
            100        1.53  0.05    0.242  0.332  0.378
            200        1.46  0.05    0.222  0.289  0.369
            200        1.46  0.05    0.222  0.289  0.369
            300        1.8   0.05    0.222  0.289  0.305
            300        1.8   0.05    0.222  0.289  0.305
            300        1.8   0.05    0.222  0.289  0.305
            SoilCrop PeanutSoil: same as Soils.MidQld_soils.MidQld_yellow_dermosol_150_PAWC.Physical.PeanutSoil
            SoilCrop SoybeanSoil: same as Soils.MidQld_soils.MidQld_yellow_dermosol_150_PAWC.Physical.PeanutSoil
            SoilCrop SugarSoil: same as Soils.MidQld_soils.MidQld_yellow_dermosol_150_PAWC.Physical.SugarSoil
          SoilWater: same as Soils.MidQld_soils.MidQld_yellow_dermosol_150_PAWC.SoilWater
          SoilNitrogen: same as Soils.CQld_vertosol.north_vertosol_10oc_80_PAWC.SoilNitrogen
          Organic: same as Soils.MidQld_soils.MidQld_yellow_dermosol_150_PAWC.Organic
          Chemical: Thickness=[200, 100, 100, 200, 200, 300, 300, 300, 300]; PH=[6, 6, 6, 6, 6, 6, 6, 6, 6]
          InitialWater: PercentMethod=0; FractionFull=1
          Sample InitialNitrogen: Thickness=[200, 100, 100, 200, 200, 300, 300, 300, 300]; SWUnits=Volumetric; OCUnits=Total; PHUnits=Water
          CERESSoilTemperature
        Soil Red Ferrosol (PAWC142mm) (Kepnock No1072): ASCOrder=Ferrosol; ASCSubOrder=Red; SoilType=Loam; Site=Generic; NearestTown=Kepnock; Region=Wide Bay and Burnett; State=Queensland; Country=Australia; ApsoilNumber=1072; Latitude=-24.8777; Longitude=152.37375; LocationAccuracy=Regional Soil Type
          Comments=Changed SWCON from 0.5 to 0.9 based on local advice about this regions Ferrosols from Mike Bell, Graeme Wright, Yash Chauhan
          Physical
            Thickness  BD   AirDry  LL15   DUL    SAT
            200        1.4  0.05    0.252  0.433  0.452
            200        1.4  0.05    0.263  0.427  0.449
            100        1.4  0.05    0.274  0.424  0.448
            100        1.4  0.05    0.289  0.421  0.446
            200        1.4  0.05    0.301  0.413  0.442
            200        1.4  0.05    0.301  0.413  0.442
            300        1.4  0.05    0.301  0.413  0.442
            300        1.4  0.05    0.301  0.413  0.442
            300        1.4  0.05    0.301  0.413  0.442
            SoilCrop PeanutSoil: same as Soils.MidQld_soils.MidQld_red_ferrosol_140_PAWC.Physical.PeanutSoil
            SoilCrop SoybeanSoil: same as Soils.MidQld_soils.MidQld_red_ferrosol_140_PAWC.Physical.PeanutSoil
            SoilCrop SugarSoil: same as Soils.MidQld_soils.MidQld_red_ferrosol_140_PAWC.Physical.SugarSoil
          SoilWater: same as Soils.MidQld_soils.MidQld_red_ferrosol_140_PAWC.SoilWater
          SoilNitrogen: same as Soils.CQld_vertosol.north_vertosol_10oc_80_PAWC.SoilNitrogen
          Organic: same as Soils.MidQld_soils.MidQld_red_ferrosol_140_PAWC.Organic
          Chemical: Thickness=[200, 200, 100, 100, 200, 200, 300, 300, 300]; PH=[6, 6, 6, 6, 6, 6, 6, 6, 6]
          InitialWater: PercentMethod=0; FractionFull=1
          Sample InitialNitrogen: Thickness=[200, 200, 100, 100, 200, 200, 300, 300, 300]; SWUnits=Volumetric; OCUnits=Total; PHUnits=Water
          CERESSoilTemperature
        Soil Red Ferrosol (PAWC184mm) (Kepnock No1065): ASCOrder=Ferrosol; ASCSubOrder=Red; SoilType=Loam; Site=Generic; NearestTown=Kepnock; Region=Wide Bay and Burnett; State=Queensland; Country=Australia; ApsoilNumber=1065; Latitude=-24.8777; Longitude=152.37375; LocationAccuracy=Regional Soil Type
          Comments=Changed SWCON from 0.5 to 0.9 based on local advice about this regions Ferrosols from Mike Bell, Graeme Wright, Yash Chauhan
          Physical
            Thickness  BD   AirDry  LL15   DUL    SAT
            200        1.3  0.05    0.274  0.478  0.494
            200        1.3  0.05    0.286  0.468  0.489
            100        1.3  0.05    0.298  0.46   0.485
            100        1.3  0.05    0.314  0.453  0.481
            200        1.3  0.05    0.331  0.453  0.481
            200        1.3  0.05    0.347  0.452  0.481
            300        1.3  0.05    0.347  0.452  0.481
            300        1.3  0.05    0.347  0.452  0.481
            300        1.3  0.05    0.347  0.452  0.481
            SoilCrop PeanutSoil: same as Soils.MidQld_soils.MidQld_red_ferrosol_185_PAWC.Physical.PeanutSoil
            SoilCrop SoybeanSoil: same as Soils.MidQld_soils.MidQld_red_ferrosol_185_PAWC.Physical.PeanutSoil
            SoilCrop SugarSoil: same as Soils.MidQld_soils.MidQld_red_ferrosol_185_PAWC.Physical.SugarSoil
          SoilWater: same as Soils.MidQld_soils.MidQld_red_ferrosol_185_PAWC.SoilWater
          SoilNitrogen: same as Soils.CQld_vertosol.north_vertosol_10oc_80_PAWC.SoilNitrogen
          Organic: same as Soils.MidQld_soils.MidQld_red_ferrosol_140_PAWC.Organic
          Chemical: Thickness=[200, 200, 100, 100, 200, 200, 300, 300, 300]; PH=[6, 6, 6, 6, 6, 6, 6, 6, 6]
          InitialWater: PercentMethod=0; FractionFull=1
          Sample InitialNitrogen: Thickness=[200, 200, 100, 100, 200, 200, 300, 300, 300]; SWUnits=Volumetric; OCUnits=Total; PHUnits=Water
          CERESSoilTemperature
  Simulation SingleSim_Clermont wheat 80 PAW
    Weather: FileName=Clermont.met
    Clock: Start=1998-01-01; End=2015-12-31
    Summary summaryfile
    SoilArbitrator
    Zone paddock: Area=1; Slope=0; AspectAngle=0; Altitude=50
      MicroClimate: a_interception=0; b_interception=0; c_interception=0; d_interception=0; soil_albedo=0; SoilHeatFluxFraction=0; NightInterceptionFraction=0; ReferenceHeight=0
      SurfaceOrganicMatter SurfaceOrganicMatter1000: InitialResidueName=wheat_stubble; InitialResidueType=wheat; InitialResidueMass=1000; InitialStandingFraction=0; InitialCPR=0; InitialCNR=80; FractionFaecesAdded=0.5
      Fertiliser
      Irrigation
      Plant wheat: CropType=Wheat; IsEnding=false; DaysAfterEnding=0; ResourceName=Wheat
      Report outputfile_for_passing
        VariableNames:
          [Clock].Today.Year
          [CQ_Wheat].Script.dry_grain_or_lint_yield_t_ha_or_ba_ha as dry_grain_or_lint_yield_t_ha_or_ba_ha
          [CQ_Wheat].Script.wet_grain_or_lint_yield_t_ha_or_ba_ha as wet_grain_or_lint_yield_t_ha_or_ba_ha
          [CQ_Wheat].Script.grain_protein_percent as grain_protein_%
          [CQ_Wheat].Script.biomass_at_harvest_t_ha as biomass_at_harvest_t_ha
          [CQ_Wheat].Script.in_crop_rain_mm as in_crop_rain_mm
          [CQ_Wheat].Script.days_to_harvevst as days_to_harvevst
          [CQ_Wheat].Script.PAW_at_harvest_mm as PAW_at_harvest_mm
          [CQ_Wheat].Script.mineral_N_at_harvest_kg_ha as mineral_N_at_harvest_kg_ha
          [CQ_Wheat].Script.av_max_temp_4_weeks_after_sowing_deg_C as av_max_temp_4_weeks_after_sowing_deg_C
          [CQ_Wheat].Script.av_min_temp_4_weeks_after_sowing_deg_C as av_min_temp_4_weeks_after_sowing_deg_C
          [CQ_Wheat].Script.av_max_temp_2_weeks_pre_and_post_flowering_deg_C as av_max_temp_2_weeks_pre_and_post_flowering_deg_C
          [CQ_Wheat].Script.av_min_temp_2_weeks_pre_and_post_flowering_deg_C as av_min_temp_2_weeks_pre_and_post_flowering_deg_C
          [CQ_Wheat].Script.av_max_temp_4_weeks_prior_to_harvest_C as av_max_temp_4_weeks_prior_to_harvest_C
          [CQ_Wheat].Script.av_min_temp_4_weeks_prior_to_harvest_C as av_min_temp_4_weeks_prior_to_harvest_C
          [CQ_Wheat].Script.incrop_min_temp_deg_C as incrop_min_temp_deg_C
          [CQ_Wheat].Script.number_of_days_frost_stress_2_weeks_pre_and_post_flowering as number_of_days_frost_stress_2_weeks_pre_and_post_flowering
          [CQ_Wheat].Script.number_of_days_heat_stress_2_weeks_pre_and_post_flowering as number_of_days_heat_stress_2_weeks_pre_and_post_flowering
          [CQ_Wheat].Script.water_used_mm as water_used_mm
          [CQ_Wheat].Script.irrigation_water_applied as irrigation_water_applied
          [CQ_Wheat].Script.WUE_yield_kg_or_ba_per_mm as WUE_yield_kg_or_ba_per_mm
          [CQ_Wheat].Script.WUE_biomass_kg_per_mm as WUE_biomass_kg_per_mm
          [CQ_Wheat].Script.crop_failure_flag as crop_failure_flag
      Report outputfile_full
        VariableNames:
          [Clock].Today
          [Clock].Today.DayOfWeek as day_of_week
          [Clock].Today.Day as day
          [Clock].Today.Month as month
          [Clock].Today.Year as year
          [Weather].FileName as station_name
          [Weather].Latitude as latitude
          [Weather].Longitude as longitude
          [CQ_Factors].Script.OC_Percent as OC_%
          [CQ_Factors].Script.PAWC as PAWC
          [CQ_Factors].Script.initial_soil_mineral_N_kg_ha as initial_soil_mineral_N_kg_ha
          [CQ_Factors].Script.initialWater as initial_PAWC_%
          [CQ_Factors].Script.maturity_type as maturity_type
          [CQ_Factors].Script.sowdate as sowdate
          [CQ_Factors].Script.density as density
          [CQ_Factors].Script.sow_fert_kg_N_ha as sow_fert_kg_N_ha
          [CQ_Factors].Script.row_arrangement as row_arrangement
          [CQ_Factors].Script.side_fert_kg_N_ha as side_fert_kg_N_ha
          [CQ_Factors].Script.irrigation_treat as irrigation_treat
          [CQ_Wheat].Script.dry_grain_or_lint_yield_t_ha_or_ba_ha as dry_grain_or_lint_yield_t_ha_or_ba_ha
          [CQ_Wheat].Script.wet_grain_or_lint_yield_t_ha_or_ba_ha as wet_grain_or_lint_yield_t_ha_or_ba_ha
          [CQ_Wheat].Script.grain_protein_percent as grain_protein_%
          [CQ_Wheat].Script.biomass_at_harvest_t_ha as biomass_at_harvest_t_ha
          [CQ_Wheat].Script.in_crop_rain_mm as in_crop_rain_mm
          [CQ_Wheat].Script.days_to_harvevst as days_to_harvest
          [CQ_Wheat].Script.PAW_at_harvest_mm as PAW_at_harvest_mm
          [CQ_Wheat].Script.mineral_N_at_harvest_kg_ha as mineral_N_at_harvest_kg_ha
          [CQ_Wheat].Script.av_max_temp_4_weeks_after_sowing_deg_C as av_max_temp_4_weeks_after_sowing_deg_C
          [CQ_Wheat].Script.av_min_temp_4_weeks_after_sowing_deg_C as av_min_temp_4_weeks_after_sowing_deg_C
          [CQ_Wheat].Script.av_max_temp_2_weeks_pre_and_post_flowering_deg_C as av_max_temp_2_weeks_pre_and_post_flowering_deg_C
          [CQ_Wheat].Script.av_min_temp_2_weeks_pre_and_post_flowering_deg_C as av_min_temp_2_weeks_pre_and_post_flowering_deg_C
          [CQ_Wheat].Script.av_max_temp_4_weeks_prior_to_harvest_C as av_max_temp_4_weeks_prior_to_harvest_C
          [CQ_Wheat].Script.av_min_temp_4_weeks_prior_to_harvest_C as av_min_temp_4_weeks_prior_to_harvest_C
          [CQ_Wheat].Script.incrop_min_temp_deg_C as incrop_min_temp_deg_C
          [CQ_Wheat].Script.number_of_days_frost_stress_2_weeks_pre_and_post_flowering as number_of_days_frost_stress_2_weeks_pre_and_post_flowering
          [CQ_Wheat].Script.number_of_days_heat_stress_2_weeks_pre_and_post_flowering as number_of_days_heat_stress_2_weeks_pre_and_post_flowering
          [CQ_Wheat].Script.water_used_mm as water_used_mm
          [CQ_Wheat].Script.irrigation_water_applied as irrigation_water_applied
          [CQ_Wheat].Script.WUE_yield_kg_or_ba_per_mm as WUE_yield_kg_or_ba_per_mm
          [CQ_Wheat].Script.WUE_biomass_kg_per_mm as WUE_biomass_kg_per_mm
      Report SoilWaterReport
        VariableNames:
          [Clock].Today
          [north_vertosol_10oc_80_PAWC].LL15mm
          [north_vertosol_10oc_80_PAWC].PAWCmm
          [north_vertosol_10oc_80_PAWC].PAWmm
          [north_vertosol_10oc_80_PAWC].SoilWater.SWmm
          [north_vertosol_10oc_80_PAWC].SoilWater.Thickness
        EventNames:
          [wheat].Harvesting
          [wheat].Sowing
      Manager CQ_Factors
        soilModule = MidQld_black_vertosol_100_PAWC
        surfaceomModule = SurfaceOrganicMatter1000
        pModule =
        resetWater = Yes
        resetN = Yes
        resetSOM = Yes
        resetP =
        outputReport = outputfile_for_passing
        initialN = 25
        initialWater = 90
        crop = [wheat]
        cultivarNumber = 2
        plant_density_number = 2
        sow_date_number = 3
        sowing_N_number = 2
        row_arrangement_number = 1
        side_dressing_N_number = 1
        irrigation_number = 1
        runOutput = False
        dt_sowDate = 01/01/0001 00:00:00
        myReportPoint =
        total_sw = 0
        total_PAW = 0
        total_soil_PAW = 0
        total_LL15 = 0
        water_to_top_up = 0
        sowdate =
        irr_tot = 0
        skiprow = 0
        cult =
        density = 0
        depth = 0
        spacing = 0
        sow_fert_kg_N_ha = 0
        high_temp_threshold = 0
        low_temp_threshold = 0
        grain_moisture_content_percent = 0
        maxPAWClayer = 0
        PAWC = 0
        max_PAWC = 0
        crop_name =
        maturity_type =
        row_arrangement =
        side_fert_kg_N_ha = 0
        irrigation_treat =
        OC_Percent = 0
        initial_soil_mineral_N_kg_ha = 0
        LL15mm =
        DULmm =
        PAWCmm =
        swNow = 0
        PAWNow = 0
        nh4Now = 0
        no3Now = 0
        LL15pawc = 0
```csharp
using System;
using System.Collections;
using System.Collections.Generic;

using Models.Core;
using Models.PMF;
using Models.Soils;
using Models.Utilities;
using Models.Surface;

using APSIM.Shared.Utilities;


// Central Qld Factors - APSIM-NextGen Script
// ===================
//
//    This script sets up the ARMonline simulations for Central Queensland Crops:  
//         Maize, Wheat
//
//    Properties (Factors) referenced for setting up simulation parameters are:  
//
//
// ==============================================================================
// DBJ  August 2019     Created (conversion from KGP Manager1 Script)
// ==============================================================================
//


namespace Models
{
    [Serializable]
    [System.Xml.Serialization.XmlInclude(typeof(Model))]
    public class Script : Model
    {

        // Define links to simulation model components
        
         [Link] Clock Clock;
        [Link] Weather Met;
        [Link] Plant Wheat ;
        [Link] Soil soil;
        [Link] SoilWater SoilWater ;
        [Link] SoilNitrogen SoilN ;
        [Link] SoilNitrogenNH4 SoilNH4;
        [Link] SoilNitrogenNO3 SoilNO3;
        [Link] SurfaceOrganicMatter SOM ;
        [Link] Fertiliser Fertiliser ;
        [Link] Irrigation Irrig ;
        [Link] Summary Summary;  // Summary file for debug output


        
           // Define Parameters (Properties). These appear as enterable values on the 'Properties tab'.
        [Separator("Names of components to be used")]

        [Description("Name of Soil module")]
        public string soilModule {get;set;}        // The module name of this simulation's soil

        [Description("Name of SurfaceOM module")]
        public string surfaceomModule {get;set;}   // The module name of this simulation's surface organic matter module  // needed??

        [Description("Name of Phosphorus module")]
        public string pModule {get;set;}           // Name of your phosphorus module  // needed??

        [Separator("Reset Options")]

        [Description("Reset Water?")]
        public string resetWater {get;set;}

        [Description("Reset Nitrogen?")]
        public string resetN {get;set;}

        [Description("Reset Surface Organic Matter?")]
        public string resetSOM {get;set;}

        [Description("Reset Soil Phosphorus?")]
        public string resetP {get;set;}               //  needed?

        [Separator("Reporting")]

        [Description("Name of report module")]
        public string outputReport {get;set;}        //  needed?

        [Separator("Factor settings")]

        [Description("Starting soil N (kgN/ha)")]
        public int initialN {get;set;}        

        [Description("Starting soil AWC (%)")]
        public int initialWater {get;set;}        

        [Description("Crop")]
        public Plant crop {get;set;}        

        [Description("Cultivar number (factorised alias for cultivar name)")]
        public int cultivarNumber {get;set;}        

        [Description("Plant density number (factorised alias for Planting Density options)")]
        public int plant_density_number {get;set;}        

        [Description("Sow Date number (factorised alias for Sowing Date options)")]
        public int sow_date_number {get;set;}        

        [Description("Sowing N number (factorised alias for N application at sowing options)")]
        public int sowing_N_number {get;set;}        

        [Description("Row arrangement number (factorised alias for skip row options)")]
        public int row_arrangement_number {get;set;}        

        [Description("Side dressings of N number (factorised alias for number of N side dressings)")]
        public int side_dressing_N_number {get;set;}        

        [Description("Irrigation number (factorised alias for number of irrigations / irrigation options)")]
        public int irrigation_number {get;set;}        


          // Define PUBLIC properties that other components can read (get).
     
     
        public bool runOutput { get; set; }
        public DateTime dt_sowDate { get; set; }
        public string myReportPoint { get; set; }
        public double total_sw { get; set; }
        public double total_PAW { get; set; }
        public double total_soil_PAW { get; set; }
        public double total_LL15 { get; set; }
        public double water_to_top_up { get; set; }
        public string sowdate { get; set; }
        public int irr_tot { get; set; }
        public int skiprow { get; set; }
        public string cult {get; set; }
        public double density { get; set; }
        public int depth { get; set; }
        public double spacing { get; set; }
        public double sow_fert_kg_N_ha { get; set; }
        public double high_temp_threshold { get; set; }
        public double low_temp_threshold { get; set; }
        public double grain_moisture_content_percent { get; set; }
        public int maxPAWClayer { get; set; }  // set the max soil layer being considered for this soil PAWC
        public double PAWC { get; set; }
        public double max_PAWC { get; set; }
        public string crop_name { get; set; }
        public string maturity_type { get; set; }
        public string row_arrangement { get; set; }
        public double side_fert_kg_N_ha { get; set; }
        public string irrigation_treat { get; set; }
        public double OC_Percent  { get; set; }
        public int initial_soil_mineral_N_kg_ha { get; set; }
    

        // Constant Soil values
        public double[] LL15mm { get; set; } 
        public double[] DULmm  { get; set; }
        public double[] PAWCmm { get; set; }
     
        // Soil values which change 
        public double swNow
            {get
                {
                 double totalSW = 0.0;
                 for(int i = 0; i < maxPAWClayer; i++)   //number of layers to accumulate is soil / PAWC specific
                 {
                   totalSW += SoilWater.SWmm[i];
                 }
                 return (totalSW);
                }
             set { }
            }

        public double PAWNow
            {get
                {
                 double totalPAW = 0.0;
                 for(int i = 0; i < maxPAWClayer; i++)   //number of layers to accumulate is soil / PAWC specific
                 {
                   totalPAW += soil.PAWmm[i];
                 }
                 return (totalPAW);
                }
             set { }
            }

          
        public double nh4Now
           {
          get
          {
             double totalnh4 = 0.0;
             for (int i = 0; i < maxPAWClayer; i++)   //number of layers to accumulate is soil / PAWC specific
             {
                totalnh4 += SoilNH4.kgha[i];
             }
             return (totalnh4);
          }
          set { }
           }
   
 
          public double no3Now
        {
          get
          {
             double totalno3 = 0.0;
             for (int i = 0; i < maxPAWClayer; i++)   //number of layers to accumulate is soil / PAWC specific
             {
                totalno3 += SoilNO3.kgha[i];
             }
             return (totalno3);
          }
          set { }
        }


          public double LL15pawc
        {
          get
          {
             double ll15total = 0.0;
             for (int i = 0; i < maxPAWClayer; i++)   //number of layers to accumulate is soil / PAWC specific
             {
                ll15total += LL15mm[i];
             }
             return (ll15total);
          }
          set { }
        }





   // Script level variables

       // triggers
       //private Outputfile reportReset; //debug

       // clasification of soil and SOM

       private double total_DUL;
       private double total_nh4;
       private double total_no3;

       private double total_inorganic_N;
       private double [] propNByLayer;
       private double [] applyInitNLayerDep ;
       private double [] layerCapacity;


       // initial N and water
      
       private double N_to_top_up;
       private int start_SOM_wt_kg_per_ha;




   //===========================================================================================
   // Event Handlers
   //===========================================================================================

   // The following event handler will be called once at the beginning of the simulation

    [EventSubscribe("Commencing")]
    private void OnSimulationCommencing(object sender, EventArgs e)
    {
       runOutput = true;     // Set default to produce output
      
      // reportReset = (Outputfile) MyPaddock.LinkByName("reportReset");  //debug
      
      // triggers
      // initial irrigation count
      irr_tot = 0;

      // initial N and water
      initial_soil_mineral_N_kg_ha = initialN;

      // clasification of soil and SOM
      maxPAWClayer = 0;  // number of soil layers to be considered based on PAWC

      switch (soilModule)
      {
         case "north_vertosol_10oc_80_PAWC":
            OC_Percent = 1.0;
            PAWC = 80.0;
            maxPAWClayer = 3;
            propNByLayer = new double[] { 0.35, 0.25, 0.40 };    // proportions should sum to 1.0
            applyInitNLayerDep = new double[] { 75, 225, 525 };  // depth in mm
            break;         

         case "north_vertosol_10oc_120_PAWC":
            OC_Percent = 1.0;
            PAWC = 120.0;
            maxPAWClayer = 4;
            propNByLayer = new double[] { 0.29, 0.23, 0.38, 0.09 };    // proportions should sum to 1.0
            applyInitNLayerDep = new double[] { 75, 225, 525, 675 };  // depth in mm
            break;

         case "north_vertosol_10oc_150_PAWC":
            OC_Percent = 1.0;
            PAWC = 150.0;
            maxPAWClayer = 4;
            propNByLayer = new double[] { 0.27, 0.21, 0.35, 0.17 };    // proportions should sum to 1.0
            applyInitNLayerDep = new double[] { 75, 225, 525, 825 };  // depth in mm
            break;

         case "north_vertosol_10oc_190_PAWC":
            OC_Percent = 1.0;
            PAWC = 190.0;
            maxPAWClayer = 6;
            propNByLayer = new double[] { 0.29, 0.20, 0.32, 0.11, 0.05, 0.02 };    // proportions should sum to 1.0
            applyInitNLayerDep = new double[] { 75, 225, 525, 825, 1125, 1250 };  // depth in mm
            break;

         case "north_vertosol_10oc_240_PAWC":
            OC_Percent = 1.0;
            PAWC = 240.0;
            maxPAWClayer = 7;
            propNByLayer = new double[] { 0.21, 0.16, 0.28, 0.14, 0.10, 0.07, 0.04 };    // proportions should sum to 1.0
            applyInitNLayerDep = new double[] { 75, 225, 525, 825, 1125, 1425, 1725 };  // depth in mm
            break;


         case "south_vertisol_10oc_100_PAWC":
            OC_Percent = 1.0;
            PAWC = 100.0;
            maxPAWClayer = 3;
            propNByLayer = new double[] {0.35, 0.25, 0.40};    // proportions should sum to 1.0
            applyInitNLayerDep = new double[]  {75, 225, 525};  // depth in mm
            break;


         case "MidQld_black_vertosol_100_PAWC":
            OC_Percent = 1.0;
            PAWC = 100.0;
            maxPAWClayer = 3;
            propNByLayer = new double[] {0.35, 0.25, 0.40};    // proportions should sum to 1.0
            applyInitNLayerDep = new double[]  {75, 225, 525};  // depth in mm
            break;



         // The value of soil type is not in the collection for CQ Factors.
         //  No factor combinations are going to be valid  - so abort this run
         default:
            runOutput = false;         // set flag to stop output for this simualtion run
            throw new InvalidOperationException("unknown soil type " + soilModule + " in CQ Factors");
            // break;
      }

      start_SOM_wt_kg_per_ha = 1000;  //1000kg is the default, adjust it if necessary.
      if (string.Equals(surfaceomModule, "SurfaceOrganicMatter1000"))
      {
         start_SOM_wt_kg_per_ha = 1000;
      }


      //***********************************************************************************************
      // set up the crop specific values  [Maize, Wheat]
      crop_name = crop.Name.ToLower();

      // Call the CropFactors constructor for selected crop.
      CropFactors simCrop = new CropFactors(crop_name);

      // Non-factored values
      depth = simCrop.sowDepth;
      spacing = simCrop.sowSpacing;
      grain_moisture_content_percent = simCrop.grain_moisture_content_percent;
      high_temp_threshold = simCrop.high_temp_threshold;  // Stone and Nicolas 1994 Porter and Gawith 1994  http://plantsinaction.science.uq.edu.au/book/export/html/158
      low_temp_threshold = simCrop.low_temp_threshold;     // frost threshold see canola modeling paper
         
      // Factored values ( lists are zero based arrays, so subtract 1 from the list entry value )
      // Check list indexes are valid for the lists referenced, then assign the value
      if (cultivarNumber == 0 || cultivarNumber > simCrop.cultivarNameList.Length || cultivarNumber > simCrop.cultivarMaturityList.Length) 
      {
          Summary.WriteError(this, "*** Unknown " + crop_name + " cultivar number  " + cultivarNumber + " in CQ Factors");
          runOutput = false;
      }
      if (sow_date_number == 0 || sow_date_number > simCrop.sowDateList.Length) 
      {
          Summary.WriteError(this, "*** Invalid sowing date number " + sow_date_number + " for crop " + crop_name + " in CQ Factors");
          runOutput = false;
      }
      if (plant_density_number == 0 || plant_density_number > simCrop.plantDensityList.Length) 
      {
          Summary.WriteError(this, "*** Invalid plant_density_number " + plant_density_number + " for crop " + crop_name + " in CQ Factors");
          runOutput = false;
      }
      if (row_arrangement_number == 0 || row_arrangement_number > simCrop.skiprowList.Length || row_arrangement_number > simCrop.rowArrangementList.Length) 
      {
          Summary.WriteError(this, "*** Invalid row configuration " + row_arrangement_number + " for crop " + crop_name + " in CQ Factors");
          runOutput = false;
      }
      if (sowing_N_number == 0 || sowing_N_number > simCrop.sowingNList.Length) 
      {
          Summary.WriteError(this, "*** Invalid sowing_N_number " + sowing_N_number + " for crop " + crop_name + " in CQ Factors");
          runOutput = false;
      }
      if (side_dressing_N_number == 0 || side_dressing_N_number > simCrop.sideDressNList.Length) 
      {
          Summary.WriteError(this, "*** Invalid side_dressing_N_number " + side_dressing_N_number + " for crop " + crop_name + " in CQ Factors");
          runOutput = false;
      }
      if (irrigation_number == 0 || irrigation_number > simCrop.irrigationTypeList.Length) 
      {
          Summary.WriteError(this, "*** Invalid irrigation number " + irrigation_number + " for crop " + crop_name + " in CQ Factors");
          runOutput = false;
      }

      if (runOutput)
      {   // assign the values
          // sowing details
          cult = simCrop.cultivarNameList[cultivarNumber - 1];
          maturity_type = simCrop.cultivarMaturityList[cultivarNumber - 1];
          sowdate = simCrop.sowDateList[sow_date_number - 1];
          density = simCrop.plantDensityList[plant_density_number - 1];
          skiprow = simCrop.skiprowList[row_arrangement_number - 1];     
          row_arrangement = simCrop.rowArrangementList[row_arrangement_number - 1];
          sow_fert_kg_N_ha = simCrop.sowingNList[sowing_N_number - 1];

          // side dress fertiliser
          side_fert_kg_N_ha = simCrop.sideDressNList[side_dressing_N_number - 1];

          // irrigation
          irrigation_treat = simCrop.irrigationTypeList[irrigation_number - 1];
      
      
          // convert sow date to DateTime format  
          //  must be done after setting of factors for the crop (sets sowdate_number to a sowdate literal)
          dt_sowDate = DateUtilities.GetDate(sowdate);

          LL15mm = soil.LL15mm;
          DULmm = soil.DULmm;
          PAWCmm = soil.PAWCmm;

          max_PAWC = 0.0;
          for(int i = 0; i < maxPAWClayer; i++)   //number of layers to accumulate is soil / PAWC specific
          {
            max_PAWC += PAWCmm[i];
          }


      }  // end if factors are okay (runOutput)
 
   } // end "Commencing"



   //==================================================================================

   // The following event handler will be called each day at the beginning of the day
   [EventSubscribe("DoManagement")]
   private void OnDoManagement(object sender, EventArgs e)
   {
      if (runOutput)   //skip the daily processing if any errors were found in the init section (runOutput set to 'false')
      {
         // if this is the day before sowing, then reset for a new season
         if (DateUtilities.Equals((dt_sowDate.DayOfYear - 1), Clock.Today.DayOfYear ))
         {
            ResetForNewSowing();
         }
 
      } // end runOutput

   }  // end "DoManagement"


   //===========================================================================================
   // Private Methods ( Subroutines / Functions )
   //===========================================================================================

          private void ResetForNewSowing()
       {

          // reseting soil
          if (resetWater.ToLower().Equals("yes")) 
            {
                SoilWater.Reset();
            }
          if (resetN.ToLower().Equals("yes"))
            {
                SoilN.Reset();
            }
          if (resetSOM.ToLower().Equals("yes"))  
            {
                SOM.Reset();
            }

          //if (resetP.ToLower().Equals("yes"))          soilP.Reset();  //Add Phosphorus reset if needed

          // --------------------------------------------------------------------------------
          // Adjusting 'Starting' water (day before sowing each year) to % of AWC set for this soils PAWC.
          // This is done by calculating the mm of water needed to add to the soil from a starting point of LL15 (RESET effect) 
          //  to bring the total up to the %AWC. This amount is split over each layer by adding water to each layer 
          //  from the top until the layer reaches DUL or the total water-to-apply is exhausted.
          // A direct application of the total amount of irrigation is not applied to the surface as this would 
          //  cause too much leaching of Nitrates.
          // Setting each layer to DUL until the water-to-apply is exhausted avoids this unwanted side-effect.
          //
          // Nitrogen levels are then Reset as well.
          //

          // Need to set Soil water values to DUL to achieve Initial Water value (30, 60 or 90% AWC) 
          // NOTE: sw is initialised / reset to LL15 each year. PAW should always be 0 at this point,
          //          thus waterToTopUp should always be a positive value.
          //

          double waterToApply = 0.0;
          double depthToApply = 0.0;
          double waterToTopUp = PAWC * ((double)initialWater / 100.0) ;

          //Summary.WriteMessage(this,"PAW calc at Reset: Soil.PAW = " + total_soil_PAW + " Calc waterToTopUp  = " + waterToTopUp  );
          //Summary.WriteMessage(this,"PAWC calc at Reset: PAWC = " + PAWC + " initialWater  = " + initialWater  );

          for (int i = 0; i < maxPAWClayer; i++)   //number of layers to process is soil / PAWC specific
          {
             waterToApply = 0.0;

             if (waterToTopUp < 0)  // error trap
             { waterToTopUp = 0.0; 
             } 

             if (waterToTopUp == 0.0)  // if there is no water left for top up - break out of loop 
             { break;   
             }
          
             // calculate how much water is to be applied to this layer
             if (waterToTopUp > PAWCmm[i])
             {
                waterToApply = PAWCmm[i];
                SoilWater.SetSWmm(i,(LL15mm[i] + waterToApply));
                waterToTopUp = waterToTopUp - waterToApply;
             }
             else
             {
                waterToApply = waterToTopUp;
                SoilWater.SetSWmm(i,(LL15mm[i] + waterToApply));
                waterToTopUp = 0.0;
             }
          }


          // Need to apply N Fertiliser to achieve 'Initial N' value
          // =======================================================
          // soil N calcs
          total_sw = 0.0;
          total_nh4 = 0.0;
          total_no3 = 0.0;
          N_to_top_up = initialN - total_inorganic_N;
          Fertiliser.Types fertType = Fertiliser.Types.NO3N;

             //  C# indexes soils from 0:  ie. layer 1 is index 0!
          for (int i = 0; i < maxPAWClayer; i++)   //number of layers to accumulate is soil / PAWC specific
          {
             total_nh4 += SoilNH4.kgha[i];
             total_no3 += SoilNO3.kgha[i];
          }
          // total inorganic N
          total_inorganic_N = total_no3 + total_nh4;
       
          for (int i = 0; i < maxPAWClayer; i++)
          {
             double N_to_apply_Layer = N_to_top_up * propNByLayer[i];  
             Fertiliser.Apply(Amount: N_to_apply_Layer, Type: fertType, Depth: applyInitNLayerDep[i]);
          }
       
       } //end ForNewSeason

    } // end Manager Script

    // =========================================================================================================================

    // ===================
    // Crop Factors class
    // ===================
    public class CropFactors
    {
        // Class level properties
        public string cropName { get; set; }
        public int sowDepth { get; set; }
        public double sowSpacing { get; set; }
        public double high_temp_threshold { get; set; }
        public double low_temp_threshold { get; set; }
        public double grain_moisture_content_percent { get; set; }
        public string[] cultivarNameList { get; set; }
        public string[] cultivarMaturityList { get; set; }
        public string[] sowDateList { get; set; }
        public double[] plantDensityList { get; set; }
        public int[]    skiprowList { get; set; }
        public string[] rowArrangementList { get; set; }
        public double[] sowingNList { get; set; }
        public double[] sideDressNList { get; set; }
        public string[] irrigationTypeList { get; set; }



        // Maize settings and factors
        private string   maize_cropName = "maize";
        private int      maize_sowDepth = 40;
        private double   maize_sowSpacing = 900.0;
        private double   maize_high_temp_threshold = 38.0;
        private double   maize_low_temp_threshold = 2.0;
        private double   maize_grain_moisture_content_percent = 14.0;
        private string[] maize_cultivarNameList = new string[] {"Pioneer_3527", "Pioneer_3237", "Pioneer_3153"};
        private string[] maize_cultivarMaturityList = new string[] {"CRM 94", "CRM 100", "CRM 114"};
        private string[] maize_sowDateList = new string[] {"15-aug", "15-sep", "15-jan", "15-feb"};
        private double[] maize_plantDensityList = new double[] {2.0, 3.0, 4.0, 5.0, 6.0};
        private int[]    maize_skiprowList = new int[] {0};
        private string[] maize_rowArrangementList = new string[] {"solid"};
        private double[] maize_sowingNList = new double[] {0.0, 25.0, 50.0, 75.0, 100.0, 150.0};
        private double[] maize_sideDressNList = new double[] {0.0};
        private string[] maize_irrigationTypeList = new string[] {"dryland"};
       



        // Wheat settings and factors
        private string   wheat_cropName = "wheat";
        private int      wheat_sowDepth = 20;
        private double   wheat_sowSpacing = 250.0;
        private double   wheat_high_temp_threshold = 30.0;
        private double   wheat_low_temp_threshold = 2.0;
        private double   wheat_grain_moisture_content_percent = 12.5;
        private string[] wheat_cultivarNameList = new string[] {"janz", "sunco", "ellison"};
        private string[] wheat_cultivarMaturityList = new string[] {"Quick", "Medium", "Slow"};
        private string[] wheat_sowDateList = new string[] {"15-apr", "30-apr", "15-may", "30-may", "15-jun"};
        private double[] wheat_plantDensityList = new double[] {50.0, 75.0, 100.0, 140.0};
        private int[]    wheat_skiprowList = new int[] {0};
        private string[] wheat_rowArrangementList = new string[] {"solid"};
        private double[] wheat_sowingNList = new double[] {0.0, 25.0, 50.0, 75.0, 100.0, 150.0};
        private double[] wheat_sideDressNList = new double[] {0.0};
        private string[] wheat_irrigationTypeList = new string[] {"dryland"};



        // Constructor for each crop:
        public CropFactors (string crop)
        {

               switch (crop.ToLower())
            {
                 case "maize":
                   this.cropName = maize_cropName;
                   this.sowDepth = maize_sowDepth;
                   this.sowSpacing = maize_sowSpacing;
                   this.high_temp_threshold = maize_high_temp_threshold;
                   this.low_temp_threshold = maize_low_temp_threshold;
                   this.grain_moisture_content_percent = maize_grain_moisture_content_percent;
                   this.cultivarNameList = maize_cultivarNameList;
                   this.cultivarMaturityList = maize_cultivarMaturityList;
                   this.sowDateList = maize_sowDateList;
                   this.plantDensityList = maize_plantDensityList;
                   this.skiprowList = maize_skiprowList;
                   this.rowArrangementList = maize_rowArrangementList;
                   this.sowingNList = maize_sowingNList;
                   this.sideDressNList = maize_sideDressNList;
                   this.irrigationTypeList = maize_irrigationTypeList;
                   break;

                 case "wheat":
                   this.cropName = wheat_cropName;
                   this.sowDepth = wheat_sowDepth;
                   this.sowSpacing = wheat_sowSpacing;
                   this.high_temp_threshold = wheat_high_temp_threshold;
                   this.low_temp_threshold = wheat_low_temp_threshold;
                   this.grain_moisture_content_percent = wheat_grain_moisture_content_percent;
                   this.cultivarNameList = wheat_cultivarNameList;
                   this.cultivarMaturityList = wheat_cultivarMaturityList;
                   this.sowDateList = wheat_sowDateList;
                   this.plantDensityList = wheat_plantDensityList;
                   this.skiprowList = maize_skiprowList;
                   this.rowArrangementList = wheat_rowArrangementList;
                   this.sowingNList = wheat_sowingNList;
                   this.sideDressNList = wheat_sideDressNList;
                   this.irrigationTypeList = wheat_irrigationTypeList;
                   break;



                   // The value of crop type is not in the collection for CQ Factors.
                default:
                    //Summary.WriteMessage(this, "*** Unknown crop type " + crop + " in CQ Factors"  );
                    throw new InvalidOperationException("unknown crop type in CQ Factors");

            }  //end switch crop
         
        }  // end CropFactors constructor


    }   // end CropFactors class

} // end namespace
```
      Manager CQ_Wheat
        incropMinTemp = 0
        total_sw_at_sowing = 0
        av_max_temp_4_weeks_after_sowing_deg_C = 0
        av_min_temp_4_weeks_after_sowing_deg_C = 0
        av_max_temp_2_weeks_pre_and_post_flowering_deg_C =
        av_min_temp_2_weeks_pre_and_post_flowering_deg_C =
        av_max_temp_4_weeks_prior_to_harvest_C = 0
        av_min_temp_4_weeks_prior_to_harvest_C = 0
        dry_grain_or_lint_yield_t_ha_or_ba_ha = 0
        wet_grain_or_lint_yield_t_ha_or_ba_ha = 0
        grain_protein_percent =
        biomass_at_harvest_t_ha = 0
        mineral_N_at_harvest_kg_ha = 0
        in_crop_rain_mm = 0
        PAW_at_harvest_mm = 0
        incrop_min_temp_deg_C = 0
        incrop_min_temp = 0
        number_of_days_frost_stress_2_weeks_pre_and_post_flowering =
        number_of_days_heat_stress_2_weeks_pre_and_post_flowering =
        water_used_mm = 0
        irrigation_water_applied = 0
        WUE_yield_kg_or_ba_per_mm = 0
        WUE_biomass_kg_per_mm = 0
        days_of_high_temp = 0
        days_of_frost_temp = 0
        days_to_harvevst = 0
        cropName =
        crop_failure_flag = False
```csharp
using System;
using System.Collections;
using System.Collections.Generic;

using Models.Core;
using Models.PMF;
using Models.PMF.Organs;
using Models.PMF.Phen;
using Models.Soils;
using Models.Utilities;
using Models.Surface;

using APSIM.Shared.Utilities;




// CQ Wheat Manager - APSIM-NextGen Script
// ================
//
//    This script sets up the ARMonline simulations for Central Queensland Crops:   
//                                             WHEAT
//       
//
//    Properties (Factors) referenced for setting up simulation parameters are
//      passed in from CQ_Factors script  
//
//
// ==============================================================================
// DBJ  August 2019     Created (conversion from KGP Manager1 Script)
// ==============================================================================
//

namespace Models
{
    [Serializable]
    [System.Xml.Serialization.XmlInclude(typeof(Model))]
    public class Script : Model
    {
        [Link] Clock Clock;
        [Link] Weather Met;
        [Link] Plant Wheat;
        ReproductiveOrgan Grain;
        [Link] Soil soil;
        [Link] SoilWater SoilWater ;
        [Link] SoilNitrogen SoilN ;
        [Link] SoilNitrogenNH4 SoilNH4;
        [Link] SoilNitrogenNO3 SoilNO3;
        [Link] SurfaceOrganicMatter SOM ;
        [Link] Fertiliser Fertiliser ;
        [Link] Irrigation Irrig ;
        [Link] Summary Summary;  // Summary file for debug output
        [Link(ByName = true)] Report.Report outputfile_full;
        [Link(ByName = true)] Report.Report outputfile_for_passing ;


           // Define Parameters (Properties). These appear as enterable values on the 'Properties tab'.
    
    

          // Define PUBLIC properties that other components can read (get).
      
       // Reporting variables
       public double incropMinTemp {get;set;}
       public double total_sw_at_sowing {get;set;}
       public double av_max_temp_4_weeks_after_sowing_deg_C {get;set;}
       public double av_min_temp_4_weeks_after_sowing_deg_C {get;set;}
       public string av_max_temp_2_weeks_pre_and_post_flowering_deg_C {get;set;}
       public string av_min_temp_2_weeks_pre_and_post_flowering_deg_C {get;set;}
       public double av_max_temp_4_weeks_prior_to_harvest_C {get;set;}
       public double av_min_temp_4_weeks_prior_to_harvest_C {get;set;}
       public double dry_grain_or_lint_yield_t_ha_or_ba_ha {get;set;}
       public double wet_grain_or_lint_yield_t_ha_or_ba_ha {get;set;}
       public string grain_protein_percent {get;set;}
       public double biomass_at_harvest_t_ha {get;set;}
       public double mineral_N_at_harvest_kg_ha {get;set;}
       public double in_crop_rain_mm {get;set;}
       public double PAW_at_harvest_mm {get;set;}
       public double incrop_min_temp_deg_C {get;set;}
       public double incrop_min_temp {get;set;}
       public string number_of_days_frost_stress_2_weeks_pre_and_post_flowering {get;set;}
       public string number_of_days_heat_stress_2_weeks_pre_and_post_flowering {get;set;} 
       public double water_used_mm {get;set;}
       public double irrigation_water_applied {get;set;}
       public double WUE_yield_kg_or_ba_per_mm {get;set;}
       public double WUE_biomass_kg_per_mm {get;set;}
       public int    days_of_high_temp {get;set;}
       public int    days_of_frost_temp {get;set;}
       public int    days_to_harvevst {get;set;}
       public string cropName {get;set;}              // name of the crop set by CentralQldFactors
       public bool   crop_failure_flag {get;set;}



       // Script level variables
       // Properties from System modules
       private DateTime today;            // from clock

       // Properties from Manager Factors script
       private bool     runOutput;            // flag from CQFactors to allow or block running of crop scripts
       private DateTime dt_sowDate;       // sow date of the crop set by CentralQldFactors
       private double   sow_fert_kg_N_ha;
       private int      skiprow;
       private string   cult;
       private double   density;
       private int      depth;
       private double   spacing;
       private double   high_temp_threshold;
       private double   low_temp_threshold;
       private double   max_PAWC;
       private double   grain_moisture_content_percent;  



       // Local variables

       // temperature accumulation queues. 
       //   These hold up to the last 28 days of temperature values.
       Queue qMaxT = new Queue();
       Queue qMinT = new Queue();

       private bool   tempTracking;
       private bool   rainCounterFlag = false;  // trigger to accumulate rainfall values
       private bool   inputsLoaded ;
       private bool   floweringStage;
       private bool   harvestRipe;
       private double av_max_temp_28DAS;
       private double av_min_temp_28DAS;
       private double cumRain;
       private double cumRunOff;
       private double cumDrain;
       private double total_sw;
       private double total_LL15;
       private double total_PAW;
       private double total_soilPAW;
       private double total_inorganic_N;
       private double total_nh4;
       private double total_no3;
       private double drain;              // value of drainage value from ??  soilw?
       private int    days_post_flowering;
       private int    irr_tot;  //not currently used/set


   //===========================================================================================
   // Event Handlers
   //===========================================================================================

   // The following event handler will be called once at the beginning of the simulation
   [EventSubscribe("Commencing")]
   private void OnSimulationCommencing(object sender, EventArgs e)
   {

      // inital temperature value queues. These hold up to the last 28 days of temperature values.
      qMaxT.Clear();   // this queue will be used to hold 28 days of temperatures
      qMinT.Clear();   // this queue will be used to hold 28 days of temperatures
      
      days_of_high_temp = 0;
      days_of_frost_temp = 0;
      crop_failure_flag = false;
      floweringStage = false;
      harvestRipe = false;

      inputsLoaded = false;

      // Link to the Grain submodel of Wheat. The 'Plant' model hides its submodels!!
      IModel plant = Apsim.Find(this, typeof(Plant));
      Grain = Apsim.Find(plant, typeof(ReproductiveOrgan)) as ReproductiveOrgan;


   }


   //===========================================================================================
   // The following event handler will be called on a crop flowering event
   [EventSubscribe("PhaseChanged")]
   private void OnPhaseChanged(object sender, PhaseChangedType e)
   {
       if (e.StageName == "Flowering")
       {
          floweringStage = true;
          //Summary.WriteMessage(this,"Flowering stage trigger set to 1 on Event");
       }
       if (e.StageName == "HarvestRipe")
       {
          harvestRipe = true;
          //Summary.WriteMessage(this,"HarvestRipe stage trigger set to 1 on Event");
       }
   }

   //===========================================================================================
   // The following event handler will be called each day at the beginning of the day
   [EventSubscribe("DoManagement")]
   private void OnDoManagement(object sender, EventArgs e)
   {
      // read values from the Factors script. These properties only need to be read once.
      if (!inputsLoaded)
      {
         runOutput = (bool)Apsim.Get(this, "[CQ_Factors].Script.runOutput");
         cropName = (string)Apsim.Get(this, "[CQ_Factors].Script.crop_name");           // name of the crop set by CentralQldFactors
         dt_sowDate = (DateTime)Apsim.Get(this, "[CQ_Factors].Script.dt_sowDate");       // sow date of the crop set by CentralQldFactors
         sow_fert_kg_N_ha = (double)Apsim.Get(this, "[CQ_Factors].Script.sow_fert_kg_N_ha");
         skiprow = (int)Apsim.Get(this, "[CQ_Factors].Script.skiprow");
         cult = (string)Apsim.Get(this, "[CQ_Factors].Script.cult");
         density = (double)Apsim.Get(this, "[CQ_Factors].Script.density");
         depth = (int)Apsim.Get(this, "[CQ_Factors].Script.depth");
         spacing = (double)Apsim.Get(this, "[CQ_Factors].Script.spacing");
         high_temp_threshold = (double)Apsim.Get(this, "[CQ_Factors].Script.high_temp_threshold");
         low_temp_threshold = (double)Apsim.Get(this, "[CQ_Factors].Script.low_temp_threshold");
         max_PAWC = (double)Apsim.Get(this, "[CQ_Factors].Script.max_PAWC");
         grain_moisture_content_percent = (double)Apsim.Get(this, "[CQ_Factors].Script.grain_moisture_content_percent");

         inputsLoaded = true;

          //Summary.WriteMessage(this,"Completed loading factor inputs");
          //Summary.WriteMessage(this,"cropName = " + cropName.ToString());
      }


      if (runOutput)
      {
         // if this is the day before sowing, then reset for a new season
         if((dt_sowDate.DayOfYear - 1) == Clock.Today.DayOfYear)
         {
            // ResetForNewSowing();
            qMaxT.Clear();
            qMinT.Clear();
            tempTracking = true;  //restart the temperature tracking
         }
         
         //sowing today?
         if (dt_sowDate.DayOfYear == Clock.Today.DayOfYear)
         {
            // Summary.WriteMessage(this,"sowDate.DayOfYear found = " + Clock.Today.DayOfYear.ToString());

            //sowing soil water
            total_sw_at_sowing = (double)Apsim.Get(this, "[CQ_Factors].Script.swNow");  //from CQFactors

            if (string.Equals(cropName, "wheat"))
            {
               SowCrop_Wheat();
            }

            // inialise accumulators and set flags
            rainCounterFlag = true;
            cumRain = 0.0;
            cumRunOff = 0.0;
            cumDrain = 0.0;
            incropMinTemp = Met.MinT;

         }

         
         //temperature tracking
         //max and min temp tracking.  Rolling list of up to last 28 days
         if (tempTracking)
         {
            qMaxT.Enqueue(Met.MaxT);
            qMinT.Enqueue(Met.MinT);
            if (qMaxT.Count > 28)
            {
               qMaxT.Dequeue();
               qMinT.Dequeue();
            }

         }

         // average temperatures post sowing
         if (Wheat.Phenology.DaysAfterSowing == 28)
         {
               av_max_temp_28DAS = MaxT28dayAvg();
               av_min_temp_28DAS = MinT28dayAvg();
         }

         //rain runoff drainage min temp counter
         if (rainCounterFlag == true)
         {
            cumRain += Met.Rain;
            cumRunOff += SoilWater.Runoff;
            cumDrain += SoilWater.Drainage;
            incropMinTemp = Math.Min(incropMinTemp, Met.MinT);  // record the lowest minT that the crop experiences
         }

         // temps around flowering
         if (floweringStage == true) 
         {
            days_post_flowering +=  1;
         }

         
         //temperatures pre and post flowering
         if (days_post_flowering == 20)          //TODO: DBJ should this be 14 days?
         {
            av_max_temp_2_weeks_pre_and_post_flowering_deg_C = MaxT28dayAvg().ToString("#.##");
            av_min_temp_2_weeks_pre_and_post_flowering_deg_C = MinT28dayAvg().ToString("#.##");

            days_of_high_temp = 0;
            days_of_frost_temp = 0;
            
            days_of_high_temp = CntDaysHighTemp(high_temp_threshold);  
            days_of_frost_temp = CntDaysFrostTemp(low_temp_threshold);  
            
            // Reset flags for accumulation
            floweringStage = false;
            days_post_flowering = 0;

         }


         //harvest  // is this test working as intended??
         if ((string.Equals(Wheat.Phenology.CurrentStageName,"HarvestRipe")) || harvestRipe == true ||
             // (!Wheat.IsAlive) ||
             ( Wheat.Phenology.DaysAfterSowing == 250) ) 
         {
               //soil water
               total_sw = (double)Apsim.Get(this, "[CQ_Factors].Script.swNow");       // from CQ_Factors
               total_LL15 = (double)Apsim.Get(this, "[CQ_Factors].Script.LL15pawc");  // from CQ_Factors
               total_soilPAW = (double)Apsim.Get(this, "[CQ_Factors].Script.PAWNow");  // from CQ_Factors

               total_PAW = total_soilPAW;

               if (total_PAW > max_PAWC)
               {
                 total_PAW = max_PAWC;
               }

               if (total_PAW < 0.0) 
               {
                 total_PAW = 0.0;
               }

               //soil N
               total_nh4 = (double)Apsim.Get(this, "[CQ_Factors].Script.nh4Now");
               total_no3 = (double)Apsim.Get(this, "[CQ_Factors].Script.no3Now");
               total_inorganic_N = total_no3 + total_nh4;


               // setup output values
               dry_grain_or_lint_yield_t_ha_or_ba_ha = (Grain.Total.Wt * 10) /1000;
               wet_grain_or_lint_yield_t_ha_or_ba_ha = ((Grain.Total.Wt * 10) /1000)/(1-(grain_moisture_content_percent/100));
               grain_protein_percent = ((Grain.Live.N + Grain.Dead.N)/(Grain.Live.Wt + Grain.Dead.Wt) * 100 * 5.71).ToString("##.##");
               biomass_at_harvest_t_ha = Wheat.AboveGround.Wt*10 / 1000;
               in_crop_rain_mm = cumRain;
               days_to_harvevst = Wheat.Phenology.DaysAfterSowing;
               PAW_at_harvest_mm = total_soilPAW;
               mineral_N_at_harvest_kg_ha = total_inorganic_N;
               av_max_temp_4_weeks_after_sowing_deg_C = av_max_temp_28DAS;
               av_min_temp_4_weeks_after_sowing_deg_C = av_min_temp_28DAS;
               av_max_temp_2_weeks_pre_and_post_flowering_deg_C = av_max_temp_2_weeks_pre_and_post_flowering_deg_C;
               av_min_temp_2_weeks_pre_and_post_flowering_deg_C = av_min_temp_2_weeks_pre_and_post_flowering_deg_C;
               av_max_temp_4_weeks_prior_to_harvest_C = MaxT28dayAvg();
               av_min_temp_4_weeks_prior_to_harvest_C = MinT28dayAvg();
               incrop_min_temp_deg_C = incropMinTemp;
               number_of_days_frost_stress_2_weeks_pre_and_post_flowering = days_of_frost_temp.ToString();
               number_of_days_heat_stress_2_weeks_pre_and_post_flowering = days_of_high_temp.ToString();
               irrigation_water_applied = irr_tot;
               water_used_mm = (total_sw_at_sowing - total_sw) + cumRain - cumDrain - cumRunOff;
               
               if (water_used_mm <= 0.0)  water_used_mm = 0.001;      // to avoid divide by zero errors

               WUE_yield_kg_or_ba_per_mm = (Grain.Total.Wt * 10)/water_used_mm;
               WUE_biomass_kg_per_mm = Wheat.AboveGround.Wt*10/water_used_mm;
               crop_failure_flag = false;
               if ((days_to_harvevst < 50) && (dry_grain_or_lint_yield_t_ha_or_ba_ha == 0.0)) crop_failure_flag = true;

               // call the reports
               outputfile_full.DoOutput();
               outputfile_for_passing.DoOutput();

               Wheat.Harvest();
               Wheat.EndCrop();

               //Reset triggers and counters ready for the next crop
               rainCounterFlag = false;
               cumRain = 0.0;
               cumRunOff = 0.0;
               cumDrain = 0.0;
               tempTracking = false;
               days_of_high_temp = 0;
               days_of_frost_temp = 0;
               harvestRipe = false;

         }  // StageName = 'harvest_ripe'

      } // end runOutput

   }   // end OnPrepare



   //===========================================================================================
   // Private Methods ( Subroutines / Functions )
   //===========================================================================================

   // Methods for setting crop specifics

   //-------------------------------------------------------------------------------------------
   private void SowCrop_Wheat()
   {
      // Get sowing settings from Factors script
      double sow_density = (double)Apsim.Get(this, "[CQ_Factors].Script.density");           //from CQFactors
      int sow_depth =      (int)Apsim.Get(this, "[CQ_Factors].Script.depth");                //from CQFactors
      string sow_cult =    (string)Apsim.Get(this, "[CQ_Factors].Script.cult");              //from CQFactors
      double row_spacing = (double)Apsim.Get(this, "[CQ_Factors].Script.spacing");           //from CQFactors
      double sow_fert =    (double)Apsim.Get(this, "[CQ_Factors].Script.sow_fert_kg_N_ha");  //from CQFactors
      int sow_skip =       (int)Apsim.Get(this, "[CQ_Factors].Script.skiprow");              //from CQFactors

      //Summary.WriteMessage(this,"About to sow wheat");

      Wheat.Sow(population: sow_density, cultivar: sow_cult, depth: sow_depth, rowSpacing: row_spacing);    


      // Apply sowing fertiliser
      Fertiliser.Types fertType = Fertiliser.Types.UreaN;
      Fertiliser.Apply(Amount: sow_fert_kg_N_ha, Type: fertType, Depth: 50);

   } //end Sow Wheat



   private double MaxT28dayAvg()
   {
      double maxAvg = 0.0;
      foreach( double maxTemp in qMaxT )
      {
         maxAvg += maxTemp;
      }
      maxAvg = maxAvg / qMaxT.Count;
      return (maxAvg);
   }

   
   private double MinT28dayAvg()
   {
      double minAvg = 0.0;
      foreach( double minTemp in qMinT )
      {
         minAvg += minTemp;
      }
      minAvg = minAvg / qMinT.Count;
      return (minAvg);
   }
      


   
         
   private int CntDaysHighTemp(double highTempThreshold)
   {
      int dayCount = 0;
      foreach( double maxTemp in qMaxT )
      {
         if (maxTemp > highTempThreshold) dayCount += 1;
      }
      return (dayCount);
   }
   
   private int CntDaysFrostTemp(double lowTempThreshold)
   {
      int dayCount = 0;
      foreach( double minTemp in qMinT )
      {
         if (minTemp < lowTempThreshold) dayCount += 1;
      }
      return (dayCount);
   }
   

 } // end script
} // end NameSpace
```
      Soil MidQld_black_vertosol_100_PAWC: ASCOrder=Vertosol; ASCSubOrder=Black; SoilType=Clay; Site=Generic; NearestTown=Childers; Region=Wide Bay and Burnett; State=Queensland; Country=Australia; ApsoilNumber=1073; Latitude=-25.236343; Longitude=152.27813; LocationAccuracy=Regional Soil Type
        Physical
          Thickness  BD    AirDry  LL15   DUL    SAT
          200        1.15  0.05    0.39   0.552  0.559
          200        1.1   0.05    0.413  0.582  0.583
          100        1.15  0.05    0.404  0.55   0.558
          100        1.15  0.05    0.404  0.55   0.558
          70         1.15  0.05    0.404  0.55   0.558
          100        1.15  0.05    0.404  0.55   0.558
          300        1.15  0.05    0.404  0.55   0.558
          300        1.15  0.05    0.404  0.55   0.558
          300        1.15  0.05    0.404  0.55   0.558
          SoilCrop PeanutSoil: same as Soils.MidQld_soils.MidQld_black_vertosol_100_PAWC.Physical.PeanutSoil
          SoilCrop SoybeanSoil: same as Soils.MidQld_soils.MidQld_black_vertosol_100_PAWC.Physical.PeanutSoil
          SoilCrop SugarSoil: same as Soils.MidQld_soils.MidQld_black_vertosol_100_PAWC.Physical.SugarSoil
          SoilCrop RiceSoil
            LL=[0.39, 0.413, 0.404, 0.404, 0.404, 0.404, 0.404, 0.404, 0.404]
            KL=[0.1, 0.1, 0.08, 0.07, 0.06, 0.05, 0.05, 0.05, 0.05]
            XF=[1, 1, 1, 1, 1, 0, 0, 0, 0]
          SoilCrop ChickpeaSoil
            LL=[0.39, 0.413, 0.404, 0.404, 0.404, 0.404, 0.404, 0.404, 0.404]
            KL=[0.1, 0.1, 0.08, 0.07, 0.06, 0.05, 0.05, 0.05, 0.05]
            XF=[1, 1, 1, 1, 1, 0, 0, 0, 0]
          SoilCrop MungbeanSoil
            LL=[0.39, 0.413, 0.404, 0.404, 0.404, 0.404, 0.404, 0.404, 0.404]
            KL=[0.1, 0.1, 0.08, 0.07, 0.06, 0.05, 0.05, 0.05, 0.05]
            XF=[1, 1, 1, 1, 1, 0, 0, 0, 0]
          SoilCrop MaizeSoil
            LL=[0.39, 0.413, 0.404, 0.404, 0.404, 0.404, 0.404, 0.404, 0.404]
            KL=[0.1, 0.1, 0.08, 0.07, 0.06, 0.05, 0.05, 0.05, 0.05]
            XF=[1, 1, 1, 1, 1, 0, 0, 0, 0]
          SoilCrop WheatSoil
            LL=[0.39, 0.413, 0.404, 0.404, 0.404, 0.404, 0.404, 0.404, 0.404]
            KL=[0.1, 0.1, 0.08, 0.07, 0.06, 0.05, 0.05, 0.05, 0.05]
            XF=[1, 1, 1, 1, 1, 0, 0, 0, 0]
        SoilWater: same as Soils.MidQld_soils.MidQld_black_vertosol_100_PAWC.SoilWater
        SoilNitrogen: same as Soils.CQld_vertosol.north_vertosol_10oc_80_PAWC.SoilNitrogen
        Organic: same as Soils.MidQld_soils.MidQld_black_vertosol_100_PAWC.Organic
        Chemical: same as Soils.MidQld_soils.MidQld_black_vertosol_100_PAWC.Chemical
        InitialWater: PercentMethod=0; FractionFull=0; RelativeTo=LL15
        Sample InitialNitrogen: Thickness=[200, 200, 100, 100, 70, 100, 300, 300, 300]; SWUnits=Volumetric; OCUnits=Total; PHUnits=Water
        CERESSoilTemperature
