Simulations: Version=70
  Folder RegionalFactorScripts
    Manager All_Soil_Factors
      soilModule = north_vertosol_10oc_80_PAWC
      surfaceomModule = SurfaceOrganicMatter1000
      pModule =
      resetWater = Yes
      resetN = Yes
      resetSOM = Yes
      resetP =
      outputReport = outputfile_for_passing
      initialN = 3
      initialWater = 30
      crop =
      cultivarNumber = 3
      plant_density_number = 1
      sow_date_number = 1
      sowing_N_number = 1
      row_arrangement_number = 1
      side_dressing_N_number = 1
      irrigation_number = 1
      runOutput = False
      dt_sowDate = 01/01/0001 00:00:00
      myReportPoint =
      total_sw = 0
      total_PAW = 0
      total_LL15 = 0
      water_to_top_up = 0
      sowdate =
      irr_tot = 0
      skiprow = 0
      cult =
      density = 0
      depth = 0
      spacing = 0
      sow_fert_kg_N_ha = 0
      high_temp_threshold = 0
      low_temp_threshold = 0
      grain_moisture_content_percent = 0
      maxPAWClayer = 0
      PAWC = 0
      max_PAWC = 0
      crop_name =
      maturity_type =
      row_arrangement =
      side_fert_kg_N_ha = 0
      irrigation_treat =
      OC_Percent = 0
      swNow = 0
      nh4Now = 0
      no3Now = 0
      LL15pawc = 0
      LL15mm =
      DULmm =
      PAWCmm =
```csharp
using System;
using System.Collections;
using System.Collections.Generic;

using Models.Core;
using Models.PMF;
using Models.Soils;
using Models.Utilities;
using Models.Surface;

using APSIM.Shared.Utilities;


// Australian Factors - APSIM-NextGen Script
// ===================
//
//    This script sets up the ARMonline simulations for Central Queensland Crops:  
//         Maize, Wheat
//
//    Properties (Factors) referenced for setting up simulation parameters are:  
//
//
// ==============================================================================
// DBJ  August 2019     Created (conversion from KGP Manager1 Script)
// JS   December 2019   Added soil definitions to support all Australian Soils currently in CropARM.
// ==============================================================================
//


namespace Models
{
    [Serializable]
    [System.Xml.Serialization.XmlInclude(typeof(Model))]
    public class Script : Model
    {

        // Define links to simulation model components
        // ?? [Link] Simulation MySimulation;
        // ?? [Link] Paddock MyPaddock;
        
         [Link] Clock Clock;
        [Link] Weather Met;
        [Link] Plant Wheat ;
        [Link] Soil soil;
        [Link] SoilWater SoilWater ;
        [Link] SoilNitrogen SoilN ;
        [Link] SoilNitrogenNH4 SoilNH4;
        [Link] SoilNitrogenNO3 SoilNO3;
        [Link] SurfaceOrganicMatter SOM ;
        [Link] Fertiliser Fertiliser ;
        [Link] Irrigation Irrig ;
        [Link] Summary Summary;  // Summary file for debug output


        
           // Define Parameters (Properties). These appear as enterable values on the 'Properties tab'.
        [Separator("Names of components to be used")]

        [Description("Name of Soil module")]
        public string soilModule {get;set;}        // The module name of this simulation's soil

        [Description("Name of SurfaceOM module")]
        public string surfaceomModule {get;set;}   // The module name of this simulation's surface organic matter module  // needed??

        [Description("Name of Phosphorus module")]
        public string pModule {get;set;}           // Name of your phosphorus module  // needed??

        [Separator("Reset Options")]

        [Description("Reset Water?")]
        public string resetWater {get;set;}

        [Description("Reset Nitrogen?")]
        public string resetN {get;set;}

        [Description("Reset Surface Organic Matter?")]
        public string resetSOM {get;set;}

        [Description("Reset Soil Phosphorus?")]
        public string resetP {get;set;}               //  needed?

        [Separator("Reporting")]

        [Description("Name of report module")]
        public string outputReport {get;set;}        //  needed?

        [Separator("Factor settings")]

        [Description("Starting soil N (kgN/ha)")]
        public int initialN {get;set;}        

        [Description("Starting soil AWC (%)")]
        public int initialWater {get;set;}        

        [Description("Crop")]
        public Plant crop {get;set;}        

        [Description("Cultivar number (factorised alias for cultivar name)")]
        public int cultivarNumber {get;set;}        

        [Description("Plant density number (factorised alias for Planting Density options)")]
        public int plant_density_number {get;set;}        

        [Description("Sow Date number (factorised alias for Sowing Date options)")]
        public int sow_date_number {get;set;}        

        [Description("Sowing N number (factorised alias for N application at sowing options)")]
        public int sowing_N_number {get;set;}        

        [Description("Row arrangement number (factorised alias for skip row options)")]
        public int row_arrangement_number {get;set;}        

        [Description("Side dressings of N number (factorised alias for number of N side dressings)")]
        public int side_dressing_N_number {get;set;}        

        [Description("Irrigation number (factorised alias for number of irrigations / irrigation options)")]
        public int irrigation_number {get;set;}        


          // Define PUBLIC properties that other components can read (get).
     
     
        public bool runOutput { get; set; }
        public DateTime dt_sowDate { get; set; }
        public string myReportPoint { get; set; }
        public double total_sw { get; set; }
        public double total_PAW { get; set; }
        public double total_LL15 { get; set; }
        public double water_to_top_up { get; set; }
        public string sowdate { get; set; }
        public int irr_tot { get; set; }
        public int skiprow { get; set; }
        public string cult {get; set; }
        public double density { get; set; }
        public int depth { get; set; }
        public double spacing { get; set; }
        public double sow_fert_kg_N_ha { get; set; }
        public double high_temp_threshold { get; set; }
        public double low_temp_threshold { get; set; }
        public double grain_moisture_content_percent { get; set; }
        public int maxPAWClayer { get; set; }  // set the max soil layer being considered for this soil PAWC
        public double PAWC { get; set; }
        public double max_PAWC { get; set; }
        public string crop_name { get; set; }
        public string maturity_type { get; set; }
        public string row_arrangement { get; set; }
        public double side_fert_kg_N_ha { get; set; }
        public string irrigation_treat { get; set; }
        public double OC_Percent  { get; set; }
        public string Soil_Region [get; set; }

        public double swNow
            {get
                {
                 double totalSW = 0.0;
                 for(int i = 0; i < maxPAWClayer; i++)   //number of layers to accumulate is soil / PAWC specific
                 {
                   totalSW += SoilWater.SWmm[i];
                 }
                 return (totalSW);
                }
             set { }
            }

          
        public double nh4Now
           {
          get
          {
             double totalnh4 = 0.0;
             for (int i = 0; i < maxPAWClayer; i++)   //number of layers to accumulate is soil / PAWC specific
             {
                totalnh4 += SoilNH4.kgha[i];
             }
             return (totalnh4);
          }
          set { }
           }
   
 
          public double no3Now
        {
          get
          {
             double totalno3 = 0.0;
             for (int i = 0; i < maxPAWClayer; i++)   //number of layers to accumulate is soil / PAWC specific
             {
                totalno3 += SoilNO3.kgha[i];
             }
             return (totalno3);
          }
          set { }
        }


          public double LL15pawc
        {
          get
          {
             double ll15total = 0.0;
             for (int i = 0; i < maxPAWClayer; i++)   //number of layers to accumulate is soil / PAWC specific
             {
                ll15total += LL15mm[i];
             }
             return (ll15total);
          }
          set { }
        }


        public double[] LL15mm { get; set; } 
        public double[] DULmm  { get; set; }
        public double[] PAWCmm { get; set; }
     




   // Script level variables

       //!triggers
       //private Outputfile reportReset; //debug

       //!clasification of soil and SOM

       private double total_DUL;
       private double total_nh4;
       private double total_no3;

       private double total_inorganic_N;
       private double [] propNByLayer;
       private double [] applyInitNLayerDep ;
       private double [] layerCapacity;


       //!initial N and water
       private int initial_PAWC_Percent;
       private int initial_soil_mineral_N_kg_ha;
       private double N_to_top_up;
       private int start_SOM_wt_kg_per_ha;

       //!crop specifics
       private string _sowdate = " ";




   //===========================================================================================
   // Event Handlers
   //===========================================================================================

   // The following event handler will be called once at the beginning of the simulation

    [EventSubscribe("Commencing")]
    private void OnSimulationCommencing(object sender, EventArgs e)
    {
       runOutput = true;     // Set default to produce output
      
      // reportReset = (Outputfile) MyPaddock.LinkByName("reportReset");  //debug
      
      // triggers
      // initial irrigation count
      irr_tot = 0;

      // initial N and water
      initial_PAWC_Percent = initialWater;
      initial_soil_mineral_N_kg_ha = initialN;






      // clasification of soil and SOM
      maxPAWClayer = 0;  // number of soil layers to be considered based on PAWC

      switch (soilModule)
      {

         //===========================================================================================
         // NQld, Northern Queensland Coastal and Tableland Region Soils:
         // For Sites: Atherton, Tully, Ingham, Innisfail, Mackay, Marani, Proserpine, and Sarina. 
         // Add/Delete/Modify as needed
         // ---------------------------------------------
                    
         case "NQld_ferrosol_80_PAWC":               // Ferrosol (Babinda No649)
            OC_Percent = 2.5;
            PAWC = 82.5;
            maxPAWClayer = 7;
            propNByLayer = new double[] {0.34, 0.24, 0.19, 0.08, 0.05, 0.05, 0.05};    // proportions should sum to 1.0
            applyInitNLayerDep = new double[]  {75, 225, 375, 525, 750, 1050, 1350};   // depth in mm
            Soil_Region = "NQld"
            break;
               
         case "NQld_yellow_dermosol_135_PAWC":       // Yellow Dermosol (Tully No647)
            OC_Percent = 1.3;
            PAWC = 134.6;
            maxPAWClayer = 7;
            propNByLayer = new double[] {0.34, 0.24, 0.19, 0.08, 0.05, 0.05, 0.05};    // proportions should sum to 1.0
            applyInitNLayerDep = new double[]  {75, 225, 375, 525, 750, 1050, 1350};   // depth in mm
            Soil_Region = "NQld"
            break;
               
         case "NQld_brown_dermosol_200_PAWC":         // Brown Dermosol (Tully No648)
            OC_Percent = 1.5;
            PAWC = 202.5;
            maxPAWClayer = 7;
            propNByLayer = new double[] {0.27, 0.24, 0.24, 0.10, 0.05, 0.05, 0.05};     // proportions should sum to 1.0
            applyInitNLayerDep = new double[]  {50, 175, 375, 625, 875, 1125, 1375};   // depth in mm
            Soil_Region = "NQld"
            break;


         //=========================================================================================== 
         // CQld, Central Queensland Region Soils:
         // For sites: Banana, Clermont, Dululu, Emerald, Richmond and Rolleston
         // Add/Delete/Modify as needed
         // ---------------------------------------------

         case "north_vertosol_10oc_80_PAWC":
            OC_Percent = 1.0;
            PAWC = 80.0;
            maxPAWClayer = 3;
            propNByLayer = new double[] { 0.35, 0.25, 0.40 };    // proportions should sum to 1.0
            applyInitNLayerDep = new double[] { 75, 225, 525 };  // depth in mm
            Soil_Region = "CQld"
            break;         

         case "north_vertosol_10oc_120_PAWC":
            OC_Percent = 1.0;
            PAWC = 120.0;
            maxPAWClayer = 4;
            propNByLayer = new double[] { 0.29, 0.23, 0.38, 0.09 };    // proportions should sum to 1.0
            applyInitNLayerDep = new double[] { 75, 225, 525, 675 };  // depth in mm
            Soil_Region = "CQld"
            break;

         case "north_vertosol_10oc_150_PAWC":
            OC_Percent = 1.0;
            PAWC = 150.0;
            maxPAWClayer = 4;
            propNByLayer = new double[] { 0.27, 0.21, 0.35, 0.17 };    // proportions should sum to 1.0
            applyInitNLayerDep = new double[] { 75, 225, 525, 825 };  // depth in mm
            Soil_Region = "CQld"
            break;

         case "north_vertosol_10oc_190_PAWC":
            OC_Percent = 1.0;
            PAWC = 190.0;
            maxPAWClayer = 6;
            propNByLayer = new double[] { 0.29, 0.20, 0.32, 0.11, 0.05, 0.02 };    // proportions should sum to 1.0
            applyInitNLayerDep = new double[] { 75, 225, 525, 825, 1125, 1250 };  // depth in mm
            Soil_Region = "CQld"
            break;

         case "north_vertosol_10oc_240_PAWC":
            OC_Percent = 1.0;
            PAWC = 240.0;
            maxPAWClayer = 7;
            propNByLayer = new double[] { 0.21, 0.16, 0.28, 0.14, 0.10, 0.07, 0.04 };    // proportions should sum to 1.0
            applyInitNLayerDep = new double[] { 75, 225, 525, 825, 1125, 1425, 1725 };  // depth in mm
            Soil_Region = "CQld"
            break;

         //=========================================================================================== 
         // WideBay, Wide Bay and Burnett Region Soils:
         // For sites: Bundaberg, Childers and Maryborough.
         // Add/Delete/Modify as needed
         // ---------------------------------------------

          case "WideBay_black_vertosol_100_PAWC":
            OC_Percent = 1.0;
            PAWC = 100.0;
            maxPAWClayer = 9;
            propNByLayer = new double[] {0.30, 0.27, 0.18, 0.10, 0.03, 0.03, 0.03, 0.03, 0.03};    // proportions should sum to 1.0
            applyInitNLayerDep = new double[]  {100, 300, 450, 550, 635, 720, 920, 1220, 1520};  // depth in mm
            Soil_Region = "WideBay"
            break;

         case "WideBay_red_ferrosol_140_PAWC":
            OC_Percent = 1.0;
            PAWC = 140.0;
            maxPAWClayer = 9;
            propNByLayer = new double[] {0.30, 0.27, 0.18, 0.10, 0.03, 0.03, 0.03, 0.03, 0.03};    // proportions should sum to 1.0
            applyInitNLayerDep = new double[]  {100, 300, 450, 550, 700, 900, 1150, 1450, 1750};  // depth in mm
            Soil_Region = "WideBay"
            break;

         case "WideBay_yellow_dermosol_150_PAWC":
            OC_Percent = 1.0;
            PAWC = 150.0;
            maxPAWClayer = 9;
            propNByLayer = new double[] {0.30, 0.27, 0.18, 0.10, 0.03, 0.03, 0.03, 0.03, 0.03};    // proportions should sum to 1.0
            applyInitNLayerDep = new double[]  {100, 300, 450, 550, 700, 900, 1150, 1450, 1750};  // depth in mm
            Soil_Region = "WideBay"
            break;        

         case "WideBay_red_ferrosol_185_PAWC":
            OC_Percent = 1.0;
            PAWC = 185.0;
            maxPAWClayer = 9;
            propNByLayer = new double[] {0.30, 0.27, 0.18, 0.10, 0.03, 0.03, 0.03, 0.03, 0.03};    // proportions should sum to 1.0
            applyInitNLayerDep = new double[]  {100, 300, 450, 550, 700, 900, 1150, 1450, 1750};  // depth in mm
            Soil_Region = "WideBay"
            break;


         //=========================================================================================== 
         // CQldKingaroy, Kingaroy Region Soil:
         // For site: Kingaroy.  (Separated from other CQ sites because it requires a red ferrosol)
         // Add/Delete/Modify as needed
         // ---------------------------------------------
                           
         case "ferrosol_10oc_150_PAWC":
            OC_Percent = 1.02;
            PAWC = 150.0;
            maxPAWClayer = 6;
            propNByLayer = new double[] {0.22, 0.17, 0.28, 0.15, 0.11, 0.07};    // proportions should sum to 1.0
            applyInitNLayerDep = new double[]  {50, 150, 350, 650, 950, 1250};  // depth in mm
            Soil_Region = "CQldKingaroy"
            break;

         case "ferrosol_10oc_120_PAWC":
            OC_Percent = 1.02;
            PAWC = 120.0;
            maxPAWClayer = 5;
            propNByLayer = new double[] {0.29, 0.21, 0.32, 0.12, 0.06};    // proportions should sum to 1.0
            applyInitNLayerDep = new double[]  {50, 150, 350, 650, 950};  // depth in mm
            Soil_Region = "CQldKingaroy"
            break;

         case "ferrosol_10oc_80_PAWC":
            OC_Percent = 1.02;
            PAWC = 80.0;
            maxPAWClayer = 4;
            propNByLayer = new double[] {0.29, 0.23, 0.38, 0.09};    // proportions should sum to 1.0
            applyInitNLayerDep = new double[]  {50, 150, 350, 675};  // depth in mm
            Soil_Region = "CQldKingaroy"
            break;

       //===========================================================================================
       // SQld_NNSW, Southern Queensland and Northern New South Wales Region Soils:
       // For Sites: Texas, Miles, St George, Meandarra, Pittsworth, Coonabarabran,
       //            Dubbo, Gulargambone, Quirindi, Walgett, Gunnedah, Goodiwindi,
       //            Dalby, Roma, Moree, Narrabri, Nyngan, Tamworth. 
       // Add/Delete/Modify as needed
       // ---------------------------------------------
         case "south_vertosol_10oc_290_PAWC":
            OC_Percent = 1.0;
            PAWC = 290.0;
            maxPAWClayer = 7;
            propNByLayer = new double[] {0.21, 0.16, 0.28, 0.14, 0.10, 0.07, 0.04};    // proportions should sum to 1.0
            applyInitNLayerDep = new double[]  {75, 225, 525, 825, 1125, 1425, 1725};  // depth in mm
            Soil_Region = "SQld_NNSW"
            break;

         case "south_vertosol_10oc_240_PAWC":
            OC_Percent = 1.0;
            PAWC = 240.0;
            maxPAWClayer = 6;
            propNByLayer = new double[] {0.29, 0.20, 0.32, 0.11, 0.05, 0.02};    // proportions should sum to 1.0
            applyInitNLayerDep = new double[]  {75, 225, 525, 825, 1125, 1250};  // depth in mm
            Soil_Region = "SQld_NNSW"
            break;

         case "south_vertosol_10oc_190_PAWC":
            OC_Percent = 1.0;
            PAWC = 190.0;
            maxPAWClayer = 4;
            propNByLayer = new double[] {0.27, 0.21, 0.35, 0.17};    // proportions should sum to 1.0
            applyInitNLayerDep = new double[]  {75, 225, 525, 825};  // depth in mm
            Soil_Region = "SQld_NNSW"
            break;

         case "south_vertosol_10oc_150_PAWC":
            OC_Percent = 1.0;
            PAWC = 150.0;
            maxPAWClayer = 4;
            propNByLayer = new double[] {0.29, 0.23, 0.38, 0.09};    // proportions should sum to 1.0
            applyInitNLayerDep = new double[]  {75, 225, 525, 675};  // depth in mm
            Soil_Region = "SQld_NNSW"
            break;

         case "south_vertosol_10oc_100_PAWC":
            OC_Percent = 1.0;
            PAWC = 100.0;
            maxPAWClayer = 3;
            propNByLayer = new double[] {0.35, 0.25, 0.40};    // proportions should sum to 1.0
            applyInitNLayerDep = new double[]  {75, 225, 525};  // depth in mm
            Soil_Region = "SQld_NNSW"
            break;
         
      //===========================================================================================
      // VIC, Victorian Region Soils (but used at a SA site Lameroo):
      // For sites:  Lameroo, Longerenon & Birchip
      // Add/Delete/Modify as needed
      // ---------------------------------------------
     
         case "southern_clay_loam_130cm":
            OC_Percent = 1.0;
            PAWC = 76.0;
            maxPAWClayer = 7;
            propNByLayer = new double[] {0.44, 0.20, 0.10, 0.09, 0.10, 0.05, 0.02};    // proportions should sum to 1.0
            applyInitNLayerDep = new double[]  {50, 175, 325, 475, 625, 850, 1150};  // depth in mm
            Soil_Region = "VIC"
            break;

         case "southern_clay_loam_70cm":
            OC_Percent = 1.0;
            PAWC = 73.0;
            maxPAWClayer = 5;
            propNByLayer = new double[] {0.48, 0.21, 0.11, 0.10, 0.11};    // proportions should sum to 1.0
            applyInitNLayerDep = new double[]  {50, 175, 325, 475, 625};  // depth in mm
            Soil_Region = "VIC"
            break;

         case "southern_sandy_clay_loam_130cm":
            OC_Percent = 1.0;
            PAWC = 157.5;
            maxPAWClayer = 7;
            propNByLayer = new double[] {0.44, 0.20, 0.10, 0.09, 0.10, 0.05, 0.02};    // proportions should sum to 1.0
            applyInitNLayerDep = new double[]  {50, 175, 325, 475, 625, 850, 1150};  // depth in mm
            Soil_Region = "VIC"
            break;
         
         case "southern_sandy_clay_loam_70cm":
            OC_Percent = 1.0;
            PAWC = 97.5;
            maxPAWClayer = 4;
            propNByLayer = new double[] {0.48, 0.21, 0.11, 0.10, 0.11};    // proportions should sum to 1.0
            applyInitNLayerDep = new double[]  {50, 175, 325, 475, 625};  // depth in mm
            Soil_Region = "VIC"
            break;         

         case "southern_sandy_loam_160cm":
            OC_Percent = 1.0;
            PAWC = 176.0;
            maxPAWClayer = 4;
            propNByLayer = new double[] {0.48, 0.20, 0.13, 0.10, 0.05, 0.02, 0.02};    // proportions should sum to 1.0
            applyInitNLayerDep = new double[]  {50, 150, 300, 550, 850, 1150, 1450};  // depth in mm
            Soil_Region = "VIC"
            break;

         case "southern_sandy_loam_130cm":
            OC_Percent = 1.0;
            PAWC = 152.0;
            maxPAWClayer = 3;
            propNByLayer = new double[] {0.49, 0.21, 0.13, 0.10, 0.05, 0.02};    // proportions should sum to 1.0
            applyInitNLayerDep = new double[]  {50, 150, 300, 550, 850, 1150};  // depth in mm
            Soil_Region = "VIC"
            break;

      //===========================================================================================
      // SA South Australian Region Soils:
      // For sites:  Minnipa:  SA_siliceous_sand_25cm_32_PAWC, SA_siliceous_sand_42cm_40_PAWC. 
      //             Maitland: SA_sandilands_110_PAWC, SA_ardrossan_155_PAWC, SA_curry_185_PAWC, SA_petersville_145_PAWC.
      //             Marrabel: SA_marrabel_190_PAWC.
      // Add/Delete/Modify as needed
      // ---------------------------------------------            

         case "SA_siliceous_sand_25cm_32_PAWC":
            OC_Percent = 1.0;
            PAWC = 39.2;
            maxPAWClayer = 6;
            propNByLayer = new double[] {0.21, 0.26, 0.11, 0.17, 0.18, 0.06};    // proportions should sum to 1.0
            applyInitNLayerDep = new double[]  {50, 175, 285, 405, 680, 1095};  // depth in mm
            Soil_Region = "SA"
            break;

         case "SA_siliceous_sand_42cm_40_PAWC":
            OC_Percent = 1.0;
            PAWC = 31.7;
            maxPAWClayer = 7;
            propNByLayer = new double[] {0.21, 0.25, 0.18, 0.16, 0.06, 0.05, 0.09};    // proportions should sum to 1.0
            applyInitNLayerDep = new double[]  {50, 175, 335, 560, 800, 1100, 1650};  // depth in mm
            Soil_Region = "SA"
            break;

         case "SA_sandilands_110_PAWC":
            OC_Percent = 1.0;
            PAWC = 108.2;
            maxPAWClayer = 6;
            propNByLayer = new double[] {0.27, 0.29, 0.11, 0.23, 0.08, 0.02};    // proportions should sum to 1.0
            applyInitNLayerDep = new double[]  {50, 200, 400, 750, 1250, 1750};  // depth in mm
            Soil_Region = "SA"
            break;
         
         case "SA_ardrossan_155_PAWC":
            OC_Percent = 3.1;
            PAWC = 154.1;
            maxPAWClayer = 6;
            propNByLayer = new double[] {0.43, 0.21, 0.17, 0.14, 0.05, 0.01};    // proportions should sum to 1.0
            applyInitNLayerDep = new double[]  {75, 225, 450, 750, 1050, 1350};  // depth in mm
            Soil_Region = "SA"
            break;         

         case "SA_curry_185_PAWC":
            OC_Percent = 3.1;
            PAWC = 185.0;
            maxPAWClayer = 6;
            propNByLayer = new double[] {0.44, 0.22, 0.16, 0.13, 0.05, 0.01};    // proportions should sum to 1.0
            applyInitNLayerDep = new double[]  {75, 225, 450, 750, 1050, 1350};  // depth in mm
            Soil_Region = "SA"
            break;


         case "SA_petersville_145_PAWC":
            OC_Percent = 2.314;
            PAWC = 143.4;
            maxPAWClayer = 5;
            propNByLayer = new double[] {0.30, 0.28, 0.16, 0.17, 0.08};    // proportions should sum to 1.0
            applyInitNLayerDep = new double[]  {50, 200, 450, 800, 1250};  // depth in mm
            Soil_Region = "SA"
            break;


         case "SA_marrabel_190_PAWC":
            OC_Percent = 1.5;
            PAWC = 190.6;
            maxPAWClayer = 6;
            propNByLayer = new double[] {0.24, 0.27, 0.24, 0.10, 0.08, 0.06};    // proportions should sum to 1.0
            applyInitNLayerDep = new double[]  {50, 175, 375, 600, 850, 1250};  // depth in mm
            Soil_Region = "SA"
            break;
     

      //===========================================================================================
      // WA, Western Australian Region Soils:
      // For sites:  Esperance, Merredin and Wongan Hills.
      // Add/Delete/Modify as needed
      // ---------------------------------------------

         case "WA_deep_sandy_duplex_nonwaterlogging":
            OC_Percent = 1.0;
            PAWC = 199.0;
            maxPAWClayer = 10;
            propNByLayer = new double[] {0.02, 0.09, 0.08, 0.08, 0.10, 0.10, 0.10, 0.10, 0.10, 0.24};    // proportions should sum to 1.0
            applyInitNLayerDep = new double[]  {50, 150, 250, 350, 500, 750, 1050, 1350, 1650, 2150};  // depth in mm
            Soil_Region = "WA"
            break;

         case "WA_yellow_sandy_earth":
            OC_Percent = 1.0;
            PAWC = 66.0;
            maxPAWClayer = 6;
            propNByLayer = new double[] {0.10, 0.16, 0.09, 0.08, 0.19, 0.37};    // proportions should sum to 1.0
            applyInitNLayerDep = new double[]  {100, 300, 500, 700, 900, 1100};  // depth in mm
            Soil_Region = "WA"
            break;

         case "WA_yellow_deep_sand":
            OC_Percent = 1.0;
            PAWC = 124.0;
            maxPAWClayer = 10;
            propNByLayer = new double[] {0.01, 0.04, 0.05, 0.04, 0.08, 0.10, 0.10, 0.12, 0.13, 0.33};    // proportions should sum to 1.0
            applyInitNLayerDep = new double[]  {50, 150, 250, 350, 500, 750, 1050, 1350, 1650, 2150};  // depth in mm
            Soil_Region = "WA"
            break;

         case "WA_shallow_loamy_duplex":
            OC_Percent = 1.0;
            PAWC = 92.4;
            maxPAWClayer = 10;
            propNByLayer = new double[] {0.19, 0.06, 0.04, 0.03, 0.04, 0.09, 0.05, 0.08, 0.11, 0.32};    // proportions should sum to 1.0
            applyInitNLayerDep = new double[]  {50, 150, 250, 350, 500, 750, 1050, 1350, 1650, 2150};  // depth in mm
            Soil_Region = "WA"
            break;

         case "WA_deep_sandy_duplex_waterlogging":
            OC_Percent = 1.0;
            PAWC = 199.4;
            maxPAWClayer = 10;
            propNByLayer = new double[] {0.01, 0.05, 0.05, 0.06, 0.13, 0.14, 0.12, 0.11, 0.10, 0.23};    // proportions should sum to 1.0
            applyInitNLayerDep = new double[]  {50, 150, 250, 350, 500, 750, 1050, 1350, 1650, 2150};  // depth in mm
            Soil_Region = "WA"
            break;


      //===========================================================================================
      // TAS Tasmanian Region Soils:
      // For sites:  Cambridge: TAS_loam
      //             Campbell Town:  TAS_fine_sandy_loam.
      //             Cressy:         TAS_loam, TAS_fine_sandy_loam, TAS_clay_loam.
      //             Epping Forest:  TAS_loam, TAS_fine_sandy_loam, TAS_clay_loam.
      //             Forthside:      TAS_red_ferrosol.
      //             Hagley:         TAS_loam, TAS_fine_sandy_loam, TAS_clay_loam.
      //             Longford:       TAS_loam, TAS_fine_sandy_loam.
      //             Sassafras:      TAS_red_ferrosol,TAS_fine_sandy_loam.
      //             Symmons Plain:  TAS_loam, TAS_fine_sandy_loam, TAS_clay_loam.
      //             Westbury:       TAS_loam, TAS_medium_clay_loam, TAS_clay_loam.
      // Add/Delete/Modify as needed
      // ---------------------------------------------

         case "TAS_red_ferrosol":
            OC_Percent = 4.95;
            PAWC = 159.0;
            maxPAWClayer = 5;
            propNByLayer = new double[] {0.41, 0.32, 0.17, 0.05, 0.05};    // proportions should sum to 1.0
            applyInitNLayerDep = new double[]  {75, 200, 325, 620, 1000};  // depth in mm
            Soil_Region = "TAS"
            break;

         case "TAS_clay_loam":
            OC_Percent = 0.7;
            PAWC = 96.0;
            maxPAWClayer = 4;
            propNByLayer = new double[] {0.41, 0.32, 0.17, 0.10};    // proportions should sum to 1.0
            applyInitNLayerDep = new double[]  {10, 275, 400, 650};  // depth in mm
            Soil_Region = "TAS"
            break;

         case "TAS_loam":
            OC_Percent = 0.6;
            PAWC = 206.0;
            maxPAWClayer = 5;
            propNByLayer = new double[] {0.41, 0.32, 0.17, 0.05, 0.05};    // proportions should sum to 1.0
            applyInitNLayerDep = new double[]  {75, 225, 450, 700, 1000};  // depth in mm
            Soil_Region = "TAS"
            break;

         case "TAS_medium_clay":
            OC_Percent = 0.7;
            PAWC = 206.0;
            maxPAWClayer = 4;
            propNByLayer = new double[] {0.41, 0.32, 0.17, 0.10};    // proportions should sum to 1.0
            applyInitNLayerDep = new double[]  {125, 300, 650, 950};  // depth in mm
            Soil_Region = "TAS"
            break;

         case "TAS_fine_sandy_loam":
            OC_Percent = 0.7;
            PAWC = 217.0;
            maxPAWClayer = 4;
            propNByLayer = new double[] {0.41, 0.32, 0.17, 0.10};    // proportions should sum to 1.0
            applyInitNLayerDep = new double[]  {75, 220, 450, 1000};  // depth in mm
            Soil_Region = "TAS"
            break;

         case "TAS_sandy_loam":
            OC_Percent = 2.7;
            PAWC = 143.0;
            maxPAWClayer = 5;
            propNByLayer = new double[] {0.41, 0.32, 0.17, 0.05, 0.05};    // proportions should sum to 1.0
            applyInitNLayerDep = new double[]  {75, 225, 360, 600, 1000};  // depth in mm
            Soil_Region = "TAS"
            break;

         // The value of soil type is not in the collection for Australian Factors.
         default:
            runOutput = false;         // set flag to stop output for this simualtion run
            //throw new InvalidOperationException("unknown soil type in soils manager");
            Console.WriteLine("unknown soil type " + soilModule + " in soils manager");
            break;
      }

      start_SOM_wt_kg_per_ha = 1000;  //1000kg is the default, adjust it if necessary.
      if (string.Equals(surfaceomModule, "SurfaceOrganicMatter1000"))
      {
         start_SOM_wt_kg_per_ha = 1000;
      }


      //***********************************************************************************************
      // set up the crop specific values  [Maize, Wheat]
      crop_name = crop.Name.ToLower();

      // Call the CropFactors constructor for selected crop.
      CropFactors simCrop = new CropFactors(crop_name);

      // Non-factored values
      depth = simCrop.sowDepth;
      spacing = simCrop.sowSpacing;
      grain_moisture_content_percent = simCrop.grain_moisture_content_percent;
      high_temp_threshold = simCrop.high_temp_threshold;  // Stone and Nicolas 1994 Porter and Gawith 1994  http://plantsinaction.science.uq.edu.au/book/export/html/158
      low_temp_threshold = simCrop.low_temp_threshold;     // frost threshold see canola modeling paper
         
      // Factored values ( lists are zero based arrays, so subtract 1 from the list entry value )
      // Check list indexes are valid for the lists referenced, then assign the value
      if (cultivarNumber == 0 || cultivarNumber > simCrop.cultivarNameList.Length || cultivarNumber > simCrop.cultivarMaturityList.Length) 
      {
          Summary.WriteError(this, "*** Unknown " + crop_name + " cultivar number  " + cultivarNumber + " in CQ Factors");
          runOutput = false;
      }
      if (sow_date_number == 0 || sow_date_number > simCrop.sowDateList.Length) 
      {
          Summary.WriteError(this, "*** Invalid sowing date number " + sow_date_number + " for crop " + crop_name + " in CQ Factors");
          runOutput = false;
      }
      if (plant_density_number == 0 || plant_density_number > simCrop.plantDensityList.Length) 
      {
          Summary.WriteError(this, "*** Invalid plant_density_number " + plant_density_number + " for crop " + crop_name + " in CQ Factors");
          runOutput = false;
      }
      if (row_arrangement_number == 0 || row_arrangement_number > simCrop.skiprowList.Length || row_arrangement_number > simCrop.rowArrangementList.Length) 
      {
          Summary.WriteError(this, "*** Invalid row configuration " + row_arrangement_number + " for crop " + crop_name + " in CQ Factors");
          runOutput = false;
      }
      if (sowing_N_number == 0 || sowing_N_number > simCrop.sowingNList.Length) 
      {
          Summary.WriteError(this, "*** Invalid sowing_N_number " + sowing_N_number + " for crop " + crop_name + " in CQ Factors");
          runOutput = false;
      }
      if (side_dressing_N_number == 0 || side_dressing_N_number > simCrop.sideDressNList.Length) 
      {
          Summary.WriteError(this, "*** Invalid side_dressing_N_number " + side_dressing_N_number + " for crop " + crop_name + " in CQ Factors");
          runOutput = false;
      }
      if (irrigation_number == 0 || irrigation_number > simCrop.irrigationTypeList.Length) 
      {
          Summary.WriteError(this, "*** Invalid irrigation number " + irrigation_number + " for crop " + crop_name + " in CQ Factors");
          runOutput = false;
      }

      if (runOutput)
      {   // assign the values
          // sowing details
          cult = simCrop.cultivarNameList[cultivarNumber - 1];
          maturity_type = simCrop.cultivarMaturityList[cultivarNumber - 1];
          _sowdate = simCrop.sowDateList[sow_date_number - 1];
          density = simCrop.plantDensityList[plant_density_number - 1];
          skiprow = simCrop.skiprowList[row_arrangement_number - 1];     
          row_arrangement = simCrop.rowArrangementList[row_arrangement_number - 1];
          sow_fert_kg_N_ha = simCrop.sowingNList[sowing_N_number - 1];

          // side dress fertiliser
          side_fert_kg_N_ha = simCrop.sideDressNList[side_dressing_N_number - 1];

          // irrigation
          irrigation_treat = simCrop.irrigationTypeList[irrigation_number - 1];
      
      
          // convert sow date to DateTime format  
          //  must be done after setting of factors for the crop (sets sowdate_number to a sowdate literal)
          dt_sowDate = DateUtilities.GetDate(_sowdate);

          LL15mm = soil.LL15mm;
          DULmm = soil.DULmm;
          PAWCmm = soil.PAWCmm;
      }  // end if factors are okay (runOutput)
 
   } // end "Commencing"



   //==================================================================================

   // The following event handler will be called each day at the beginning of the day
   [EventSubscribe("DoManagement")]
   private void OnDoManagement(object sender, EventArgs e)
   {
      if (runOutput)   //skip the daily processing if any errors were found in the init section (runOutput set to 'false')
      {
         // if this is the day before sowing, then reset for a new season
         if (DateUtilities.Equals((dt_sowDate.DayOfYear - 1), Clock.Today.DayOfYear ))
         {
            ResetForNewSowing();
         }

 
      } // end runOutput


   }  // end "DoManagement"


   //===========================================================================================
   // Private Methods ( Subroutines / Functions )
   //===========================================================================================

          private void ResetForNewSowing()
       {
                total_sw = 0.0;
                total_DUL = 0.0;
                total_LL15 = 0.0;
          
                for (int i = 0; i < maxPAWClayer; i++)   //number of layers to accumulate is soil / PAWC specific
                {
                   total_sw += SoilWater.SWmm[i];
                   total_DUL += DULmm[i];
                   total_LL15 += LL15mm[i];
                }
                max_PAWC = total_DUL - total_LL15;
                total_PAW = total_sw - total_LL15;
                double waterToTopUp1 = (total_DUL - total_LL15) * (initialWater / 100) - total_PAW;
                double water_to_top_up = waterToTopUp1;
          
                myReportPoint = "BeforeReset";
                //reportReset.DoOutput();
          
          
          
          // reseting soil
          if (resetWater.ToLower().Equals("yes")) 
            {
                Summary.WriteMessage(this, "Reset Water");
                SoilWater.Reset();
            }
          if (resetN.ToLower().Equals("yes"))
            {
                Summary.WriteMessage(this, "Reset Nitrogen");
                SoilN.Reset();
            }
          if (resetSOM.ToLower().Equals("yes"))  
            {
                Summary.WriteMessage(this, "Reset Surface OM");
                SOM.Reset();
            }

          //if (resetP.ToLower().Equals("yes"))          soilP.Reset();  //DBJ to Check Phosphorus reset


          
          
          
                   total_sw = 0.0;
                   for (int i = 0; i < maxPAWClayer; i++)   //number of layers to accumulate is soil / PAWC specific
                   {
                      total_sw += SoilWater.SWmm[i];
                   }
                   max_PAWC = total_DUL - total_LL15;
                   total_PAW = total_sw - total_LL15;
                   waterToTopUp1 = (total_DUL - total_LL15) * (initialWater / 100) - total_PAW;
                   water_to_top_up = waterToTopUp1;
                   
                   myReportPoint = "AfterReset";
                   //reportReset.DoOutput();


          // soil calcs
          //Array.Clear(total_DUL, 0, total_DUL.Length); 
          total_DUL = 0.0;
          total_LL15 = 0.0;
          total_sw = 0.0;
          total_nh4 = 0.0;
          total_no3 = 0.0;
          if (layerCapacity == null || layerCapacity.Length == 0)
          {
             layerCapacity = new double[maxPAWClayer];
          }
       
       
          // CHECK INDEXING!!  C# indexes soils from 0:  ie. layer 1 is index 0!
          for (int i = 0; i < maxPAWClayer; i++)   //number of layers to accumulate is soil / PAWC specific
          {
             //Console.WriteLine("dul value {0} {1}" , i.ToString(), dul_dep[i].ToString());
          
             total_DUL += DULmm[i];
             total_LL15 += LL15mm[i];
             total_sw += SoilWater.SWmm[i];
             total_nh4 += SoilNH4.kgha[i];
             total_no3 += SoilNO3.kgha[i];
             //layerCapacity[i] = (dul_dep[i] - ll15_dep[i]);
             layerCapacity[i] = PAWCmm[i];
          }
         
       //Console.WriteLine("dul value  {0}",  dul_dep.ToString());

       Console.WriteLine("total_sw : {0} ", total_sw.ToString());

          // total DUL and total LL15
          max_PAWC = total_DUL - total_LL15;

          // total PAW
          total_PAW = total_sw - total_LL15;
          if (total_PAW > max_PAWC)  total_PAW = max_PAWC;
          if (total_PAW < 0)         total_PAW = 0;

          // total inorganic N
          total_inorganic_N = total_no3 + total_nh4;


          // Need to apply N Fertiliser to achieve 'Initial N' value
          // =======================================================
          N_to_top_up = initialN - total_inorganic_N;
          Fertiliser.Types fertType = Fertiliser.Types.NO3N;
       
          for (int i = 0; i < maxPAWClayer; i++)
          {
             double N_to_apply_Layer = N_to_top_up * propNByLayer[i];  
             Fertiliser.Apply(Amount: N_to_apply_Layer, Type: fertType, Depth: applyInitNLayerDep[i]);

          }
       
       
          // Need to apply Irrigation to achieve Initial Water value (30, 60 or 90% AWC) 
          // NOTE: sw is initialised / reset to 0 each year. PAW should always be 0 at this point,
          //          thus waterToTopUp will always be a positive value.
          //

          double waterToTopUp = (total_DUL - total_LL15) * (initialWater / 100) - total_PAW;
          double waterToApply = 0.0;
          double depthToApply = 0.0;

          for (int i = 0; i < maxPAWClayer; i++)   //number of layers to process is soil / PAWC specific
          {
             // Console.WriteLine("dul value {0} {1}", i.ToString(), dul_dep[i].ToString());
             // Console.WriteLine("waterToTopUp : {0} ", waterToTopUp.ToString());
             // Console.WriteLine("total_DUL : {0} ", total_DUL.ToString());
             // Console.WriteLine("total_LL15 : {0} ", total_LL15.ToString());
             // Console.WriteLine("max_PAWC : {0} ", max_PAWC.ToString());
             // Console.WriteLine("total_PAW : {0} ", total_PAW.ToString());
          
             // debug
             if (waterToTopUp < 0) waterToTopUp = 0.0;  // debug error trap
             
             // short cut any unnecessary processing if there is no water left for top up
             if (waterToTopUp == 0.0) break;
          
             // calc depth at which to apply this layer's water  
             depthToApply = 0.0;
             if (i > 0)
             {
                for (int dl = 0; dl < i; dl++)
                {
                   depthToApply += soil.Thickness[dl];  //depthToApply = sum (dlayers <i) ie. depth of layers above this one
                }
             }
             depthToApply += 1;  // add 1mm to inject water into the first mm of this layer ([layer 1 | index i=0]  = 1mm)

             // calculate how much water is to be applied to this layer
             if (waterToTopUp > layerCapacity[i])
             {
                waterToApply = layerCapacity[i];
                waterToTopUp = waterToTopUp - waterToApply;
             }
             else
             {
                waterToApply = waterToTopUp;
                waterToTopUp = 0.0;
             }

          Console.WriteLine("waterToApply : {0} ", waterToApply.ToString());
          
             // now apply the water to the layer using the Irrigation module
             // old code can be deleted -->(Irrigation apply amount = waterToApply(mm), depth = depthToApply(mm) );
             IrrigationApplicationType irrigData = new IrrigationApplicationType(); //using a type means we can use defaults for values we don't change
             irrigData.Amount = (float) waterToApply;
             irrigData.Depth = (float) depthToApply;
             //MyIrrigation.Set("irrigation_efficiency", eff);
             Irrig.Apply(waterToApply);

          }
             

       } //end ForNewSeason

       

   } // end Manager Script

   // =========================================================================================================================

   // ===================
   // Crop Factors class
   // ===================
    public class CropFactors
    {
        // Class level properties
        public string cropName { get; set; }
        public int sowDepth { get; set; }
        public double sowSpacing { get; set; }
        public double high_temp_threshold { get; set; }
        public double low_temp_threshold { get; set; }
        public double grain_moisture_content_percent { get; set; }
        public string[] cultivarNameList { get; set; }
        public string[] cultivarMaturityList { get; set; }
        public string[] sowDateList { get; set; }
        public double[] plantDensityList { get; set; }
        public int[]    skiprowList { get; set; }
        public string[] rowArrangementList { get; set; }
        public double[] sowingNList { get; set; }
        public double[] sideDressNList { get; set; }
        public string[] irrigationTypeList { get; set; }



        // Maize settings and factors
        private string   maize_cropName = "maize";
        private int      maize_sowDepth = 40;
        private double   maize_sowSpacing = 900.0;
        private double   maize_high_temp_threshold = 38.0;
        private double   maize_low_temp_threshold = 2.0;
        private double   maize_grain_moisture_content_percent = 14.0;
        private string[] maize_cultivarNameList = new string[] {"Pioneer_3527", "Pioneer_3237", "Pioneer_3153"};
        private string[] maize_cultivarMaturityList = new string[] {"CRM 94", "CRM 100", "CRM 114"};
        private string[] maize_sowDateList = new string[] {"15-aug", "15-sep", "15-jan", "15-feb"};
        private double[] maize_plantDensityList = new double[] {2.0, 3.0, 4.0, 5.0, 6.0};
        private int[]    maize_skiprowList = new int[] {0};
        private string[] maize_rowArrangementList = new string[] {"solid"};
        private double[] maize_sowingNList = new double[] {0.0, 25.0, 50.0, 75.0, 100.0, 150.0};
        private double[] maize_sideDressNList = new double[] {0.0};
        private string[] maize_irrigationTypeList = new string[] {"dryland"};
       



        // Wheat settings and factors
        private string   wheat_cropName = "wheat";
        private int      wheat_sowDepth = 20;
        private double   wheat_sowSpacing = 250.0;
        private double   wheat_high_temp_threshold = 30.0;
        private double   wheat_low_temp_threshold = 2.0;
        private double   wheat_grain_moisture_content_percent = 12.5;
        private string[] wheat_cultivarNameList = new string[] {"janz", "sunco", "ellison"};
        private string[] wheat_cultivarMaturityList = new string[] {"Quick", "Medium", "Slow"};
        private string[] wheat_sowDateList = new string[] {"15-apr", "30-apr", "15-may", "30-may", "15-jun"};
        private double[] wheat_plantDensityList = new double[] {50.0, 75.0, 100.0, 140.0};
        private int[]    wheat_skiprowList = new int[] {0};
        private string[] wheat_rowArrangementList = new string[] {"solid"};
        private double[] wheat_sowingNList = new double[] {0.0, 25.0, 50.0, 75.0, 100.0, 150.0};
        private double[] wheat_sideDressNList = new double[] {0.0};
        private string[] wheat_irrigationTypeList = new string[] {"dryland"};



        // Constructor for each crop:
        public CropFactors (string crop)
        {

               switch (crop.ToLower())
            {
                 case "maize":
                   this.cropName = maize_cropName;
                   this.sowDepth = maize_sowDepth;
                   this.sowSpacing = maize_sowSpacing;
                   this.high_temp_threshold = maize_high_temp_threshold;
                   this.low_temp_threshold = maize_low_temp_threshold;
                   this.grain_moisture_content_percent = maize_grain_moisture_content_percent;
                   this.cultivarNameList = maize_cultivarNameList;
                   this.cultivarMaturityList = maize_cultivarMaturityList;
                   this.sowDateList = maize_sowDateList;
                   this.plantDensityList = maize_plantDensityList;
                   this.skiprowList = maize_skiprowList;
                   this.rowArrangementList = maize_rowArrangementList;
                   this.sowingNList = maize_sowingNList;
                   this.sideDressNList = maize_sideDressNList;
                   this.irrigationTypeList = maize_irrigationTypeList;
                   break;

                 case "wheat":
                   this.cropName = wheat_cropName;
                   this.sowDepth = wheat_sowDepth;
                   this.sowSpacing = wheat_sowSpacing;
                   this.high_temp_threshold = wheat_high_temp_threshold;
                   this.low_temp_threshold = wheat_low_temp_threshold;
                   this.grain_moisture_content_percent = wheat_grain_moisture_content_percent;
                   this.cultivarNameList = wheat_cultivarNameList;
                   this.cultivarMaturityList = wheat_cultivarMaturityList;
                   this.sowDateList = wheat_sowDateList;
                   this.plantDensityList = wheat_plantDensityList;
                   this.skiprowList = maize_skiprowList;
                   this.rowArrangementList = wheat_rowArrangementList;
                   this.sowingNList = wheat_sowingNList;
                   this.sideDressNList = wheat_sideDressNList;
                   this.irrigationTypeList = wheat_irrigationTypeList;
                   break;



                   // The value of crop type is not in the collection for CQ Factors.
                default:
                    //runOutput = false;         // set flag to stop output for this simualtion run
                    //throw new InvalidOperationException("unknown crop type in CQ Factors");
                    //Console.WriteLine("unknown crop type " + crop + " in CQ Factors");
                    break;


            }  //end switch crop
         
        }  // end CropFactors constructor


    }   // end CropFactors class

} // end namespace
```
  Folder CropMgrScripts
    Manager NQld_Maize
      incropMinTemp = 0
      total_sw_at_sowing = 0
      av_max_temp_4_weeks_after_sowing_deg_C = 0
      av_min_temp_4_weeks_after_sowing_deg_C = 0
      av_max_temp_2_weeks_pre_and_post_flowering_deg_C =
      av_min_temp_2_weeks_pre_and_post_flowering_deg_C =
      av_max_temp_4_weeks_prior_to_harvest_C = 0
      av_min_temp_4_weeks_prior_to_harvest_C = 0
      dry_grain_or_lint_yield_t_ha_or_ba_ha = 0
      wet_grain_or_lint_yield_t_ha_or_ba_ha = 0
      grain_protein_percent =
      biomass_at_harvest_t_ha = 0
      mineral_N_at_harvest_kg_ha = 0
      in_crop_rain_mm = 0
      PAW_at_harvest_mm = 0
      incrop_min_temp_deg_C = 0
      incrop_min_temp = 0
      number_of_days_frost_stress_2_weeks_pre_and_post_flowering =
      number_of_days_heat_stress_2_weeks_pre_and_post_flowering =
      water_used_mm = 0
      irrigation_water_applied = 0
      WUE_yield_kg_or_ba_per_mm = 0
      WUE_biomass_kg_per_mm = 0
      days_of_high_temp = 0
      days_of_frost_temp = 0
      days_to_harvevst = 0
      cropName =
      crop_failure_flag = False
```csharp
using System;
using System.Collections;
using System.Collections.Generic;

using Models.Core;
using Models.PMF;
using Models.PMF.Organs;
using Models.PMF.Phen;
using Models.Soils;
using Models.Utilities;
using Models.Surface;

using APSIM.Shared.Utilities;




// NQld Maize Manager - APSIM-NextGen Script
// ================
//
//    This script sets up the ARMonline simulations for Northern Queensland Crops:
//                                             Maize
//
//
//    Properties (Factors) referenced for setting up simulation parameters are
//      passed in from NQld_Factors script
//
//
// ==============================================================================
// DBJ  August 2019     Created (conversion from KGP Manager1 Script)
// ==============================================================================
//

namespace Models
{
    [Serializable]
    [System.Xml.Serialization.XmlInclude(typeof(Model))]
    public class Script : Model
    {
        [Link] Clock Clock;
        [Link] Weather Met;
        [Link] Plant Maize;
        ReproductiveOrgan Grain;
        [Link] Soil soil;
        [Link] SoilWater SoilWater;
        [Link] SoilNitrogen SoilN;
        [Link] SoilNitrogenNH4 SoilNH4;
        [Link] SoilNitrogenNO3 SoilNO3;
        [Link] SurfaceOrganicMatter SOM;
        [Link] Fertiliser Fertiliser;
        [Link] Irrigation Irrig;
        [Link] Summary Summary;
        // Summary file for debug output
        [Link(ByName = true)] Report.Report outputfile_full;
        [Link(ByName = true)] Report.Report outputfile_for_passing;


        // Define Parameters (Properties). These appear as enterable values on the 'Properties tab'.
    
    

        // Define PUBLIC properties that other components can read (get).
      
        // Reporting variables
        public double incropMinTemp { get; set; }
        public double total_sw_at_sowing { get; set; }
        public double av_max_temp_4_weeks_after_sowing_deg_C { get; set; }
        public double av_min_temp_4_weeks_after_sowing_deg_C { get; set; }
        public string av_max_temp_2_weeks_pre_and_post_flowering_deg_C { get; set; }
        public string av_min_temp_2_weeks_pre_and_post_flowering_deg_C { get; set; }
        public double av_max_temp_4_weeks_prior_to_harvest_C { get; set; }
        public double av_min_temp_4_weeks_prior_to_harvest_C { get; set; }
        public double dry_grain_or_lint_yield_t_ha_or_ba_ha { get; set; }
        public double wet_grain_or_lint_yield_t_ha_or_ba_ha { get; set; }
        public string grain_protein_percent { get; set; }
        public double biomass_at_harvest_t_ha { get; set; }
        public double mineral_N_at_harvest_kg_ha { get; set; }
        public double in_crop_rain_mm { get; set; }
        public double PAW_at_harvest_mm { get; set; }
        public double incrop_min_temp_deg_C { get; set; }
        public double incrop_min_temp { get; set; }
        public string number_of_days_frost_stress_2_weeks_pre_and_post_flowering { get; set; }
        public string number_of_days_heat_stress_2_weeks_pre_and_post_flowering { get; set; }
        public double water_used_mm { get; set; }
        public double irrigation_water_applied { get; set; }
        public double WUE_yield_kg_or_ba_per_mm { get; set; }
        public double WUE_biomass_kg_per_mm { get; set; }
        public int    days_of_high_temp { get; set; }
        public int    days_of_frost_temp { get; set; }
        public int    days_to_harvevst { get; set; }
        public string cropName { get; set; }
        // name of the crop set by Northern Qld Factors
        public bool   crop_failure_flag { get; set; }



        // Script level variables
        // Properties from System modules
        private DateTime today;
        // from clock

        // Properties from Manager Factors script
        private bool runOutput;
        // flag from NQldFactors to allow or block running of crop scripts
        private DateTime dt_sowDate;
        // sow date of the crop set by Northern Qld Factors
        private double sow_fert_kg_N_ha;
        private int skiprow;
        private string cult;
        private double density;
        private int depth;
        private double spacing;
        private double high_temp_threshold;
        private double low_temp_threshold;
        private double max_PAWC;
        private double grain_moisture_content_percent;



        // Local variables

        // temperature accumulation queues.
        //   These hold up to the last 28 days of temperature values.
        Queue qMaxT = new Queue();
        Queue qMinT = new Queue();

        private bool tempTracking;
        private bool rainCounterFlag = false;
        // trigger to accumulate rainfall values
        private bool inputsLoaded;
        private bool floweringStage;
        private bool harvestRipe;
        private double av_max_temp_28DAS;
        private double av_min_temp_28DAS;
        private double cumRain;
        private double cumRunOff;
        private double cumDrain;
        private double total_sw;
        private double total_LL15;
        private double total_PAW;
        private double total_soilPAW;
        private double total_inorganic_N;
        private double total_nh4;
        private double total_no3;
        private double drain;
        // value of drainage value from ??  soilw?
        private int days_post_flowering;
        private int irr_tot;
        //not currently used/set


        //===========================================================================================
        // Event Handlers
        //===========================================================================================

        // The following event handler will be called once at the beginning of the simulation
        [EventSubscribe("Commencing")]
        private void OnSimulationCommencing(object sender, EventArgs e)
        {

            // inital temperature value queues. These hold up to the last 28 days of temperature values.
            qMaxT.Clear();   // this queue will be used to hold 28 days of temperatures
            qMinT.Clear();   // this queue will be used to hold 28 days of temperatures
      
            days_of_high_temp = 0;
            days_of_frost_temp = 0;
            crop_failure_flag = false;
            floweringStage = false;
            harvestRipe = false;

            inputsLoaded = false;

            // Link to the Grain submodel of Maize. The 'Plant' model hides its submodels!!
            IModel plant = Apsim.Find(this, typeof(Plant));
            Grain = Apsim.Find(plant, typeof(ReproductiveOrgan)) as ReproductiveOrgan;


        }


        //===========================================================================================
        // The following event handler will be called on a crop flowering event
        [EventSubscribe("PhaseChanged")]
        private void OnPhaseChanged(object sender, PhaseChangedType e)
        {
            if (e.StageName == "Flowering")
            {
                floweringStage = true;
                //Summary.WriteMessage(this,"Flowering stage trigger set to 1 on Event");
            }
            if (e.StageName == "HarvestRipe")
            {
                harvestRipe = true;
                //Summary.WriteMessage(this,"HarvestRipe stage trigger set to 1 on Event");
            }
        }

        //===========================================================================================
        // The following event handler will be called each day at the beginning of the day
        [EventSubscribe("DoManagement")]
        private void OnDoManagement(object sender, EventArgs e)
        {
            // read values from the Factors script. These properties only need to be read once.
            if (!inputsLoaded)
            {
                runOutput = (bool)Apsim.Get(this, "[NQld_Factors].Script.runOutput");
                cropName = (string)Apsim.Get(this, "[NQld_Factors].Script.crop_name");           // name of the crop set by Northern Qld Factors
                dt_sowDate = (DateTime)Apsim.Get(this, "[NQld_Factors].Script.dt_sowDate");       // sow date of the crop set by Northern Qld Factors
                sow_fert_kg_N_ha = (double)Apsim.Get(this, "[NQld_Factors].Script.sow_fert_kg_N_ha");
                skiprow = (int)Apsim.Get(this, "[NQld_Factors].Script.skiprow");
                cult = (string)Apsim.Get(this, "[NQld_Factors].Script.cult");
                density = (double)Apsim.Get(this, "[NQld_Factors].Script.density");
                depth = (int)Apsim.Get(this, "[NQld_Factors].Script.depth");
                spacing = (double)Apsim.Get(this, "[NQld_Factors].Script.spacing");
                high_temp_threshold = (double)Apsim.Get(this, "[NQld_Factors].Script.high_temp_threshold");
                low_temp_threshold = (double)Apsim.Get(this, "[NQld_Factors].Script.low_temp_threshold");
                max_PAWC = (double)Apsim.Get(this, "[NQld_Factors].Script.max_PAWC");
                grain_moisture_content_percent = (double)Apsim.Get(this, "[NQld_Factors].Script.grain_moisture_content_percent");

                inputsLoaded = true;

                //Summary.WriteMessage(this,"Completed loading factor inputs");
                //Summary.WriteMessage(this,"cropName = " + cropName.ToString());
            }


            if (runOutput)
            {
                // if this is the day before sowing, then reset for a new season
                if ((dt_sowDate.DayOfYear - 1) == Clock.Today.DayOfYear)
                {
                    // ResetForNewSowing();
                    qMaxT.Clear();
                    qMinT.Clear();
                    tempTracking = true;  //restart the temperature tracking
                }
         
                //sowing today?
                if (dt_sowDate.DayOfYear == Clock.Today.DayOfYear)
                {
                    // Summary.WriteMessage(this,"sowDate.DayOfYear found = " + Clock.Today.DayOfYear.ToString());

                    //sowing soil water
                    total_sw_at_sowing = (double)Apsim.Get(this, "[NQld_Factors].Script.swNow");  //from NQldFactors

                    if (string.Equals(cropName, "maize"))
                    {
                        SowCrop_Maize();
                    }

                    // inialise accumulators and set flags
                    rainCounterFlag = true;
                    cumRain = 0.0;
                    cumRunOff = 0.0;
                    cumDrain = 0.0;
                    incropMinTemp = Met.MinT;

                }

         
                //temperature tracking
                //max and min temp tracking.  Rolling list of up to last 28 days
                if (tempTracking)
                {
                    qMaxT.Enqueue(Met.MaxT);
                    qMinT.Enqueue(Met.MinT);
                    if (qMaxT.Count > 28)
                    {
                        qMaxT.Dequeue();
                        qMinT.Dequeue();
                    }

                }

                // average temperatures post sowing
                if (Maize.Phenology.DaysAfterSowing == 28)
                {
                    av_max_temp_28DAS = MaxT28dayAvg();
                    av_min_temp_28DAS = MinT28dayAvg();
                }

                //rain runoff drainage min temp counter
                if (rainCounterFlag == true)
                {
                    cumRain += Met.Rain;
                    cumRunOff += SoilWater.Runoff;
                    cumDrain += SoilWater.Drainage;
                    incropMinTemp = Math.Min(incropMinTemp, Met.MinT);  // record the lowest minT that the crop experiences
                }

                // temps around flowering
                if (floweringStage == true)
                {
                    days_post_flowering += 1;
                }

         
                //temperatures pre and post flowering
                if (days_post_flowering == 20)          //TODO: DBJ should this be 14 days?
                {
                    av_max_temp_2_weeks_pre_and_post_flowering_deg_C = MaxT28dayAvg().ToString("#.##");
                    av_min_temp_2_weeks_pre_and_post_flowering_deg_C = MinT28dayAvg().ToString("#.##");

                    days_of_high_temp = 0;
                    days_of_frost_temp = 0;
            
                    days_of_high_temp = CntDaysHighTemp(high_temp_threshold);  
                    days_of_frost_temp = CntDaysFrostTemp(low_temp_threshold);  
            
                    // Reset flags for accumulation
                    floweringStage = false;
                    days_post_flowering = 0;

                }


                //harvest  // is this test working as intended??
                if ((string.Equals(Maize.Phenology.CurrentStageName, "HarvestRipe")) || harvestRipe == true ||
             // (!Maize.IsAlive) ||
                         (Maize.Phenology.DaysAfterSowing == 250))
                {
                    //soil water
                    total_sw = (double)Apsim.Get(this, "[NQld_Factors].Script.swNow");       // from NQld_Factors
                    total_LL15 = (double)Apsim.Get(this, "[NQld_Factors].Script.LL15pawc");  // from NQld_Factors
                    total_soilPAW = (double)Apsim.Get(this, "[NQld_Factors].Script.PAWNow");  // from NQld_Factors

                    total_PAW = total_soilPAW;

                    if (total_PAW > max_PAWC)
                    {
                        total_PAW = max_PAWC;
                    }

                    if (total_PAW < 0.0)
                    {
                        total_PAW = 0.0;
                    }

                    //soil N
                    total_nh4 = (double)Apsim.Get(this, "[NQld_Factors].Script.nh4Now");
                    total_no3 = (double)Apsim.Get(this, "[NQld_Factors].Script.no3Now");
                    total_inorganic_N = total_no3 + total_nh4;


                    // setup output values
                    dry_grain_or_lint_yield_t_ha_or_ba_ha = (Grain.Total.Wt * 10) / 1000;
                    wet_grain_or_lint_yield_t_ha_or_ba_ha = ((Grain.Total.Wt * 10) / 1000) / (1 - (grain_moisture_content_percent / 100));
                    grain_protein_percent = ((Grain.Live.N + Grain.Dead.N) / (Grain.Live.Wt + Grain.Dead.Wt) * 100 * 5.71).ToString("##.##");
                    biomass_at_harvest_t_ha = Maize.AboveGround.Wt * 10 / 1000;
                    in_crop_rain_mm = cumRain;
                    days_to_harvevst = Maize.Phenology.DaysAfterSowing;
                    PAW_at_harvest_mm = total_soilPAW;
                    mineral_N_at_harvest_kg_ha = total_inorganic_N;
                    av_max_temp_4_weeks_after_sowing_deg_C = av_max_temp_28DAS;
                    av_min_temp_4_weeks_after_sowing_deg_C = av_min_temp_28DAS;
                    av_max_temp_2_weeks_pre_and_post_flowering_deg_C = av_max_temp_2_weeks_pre_and_post_flowering_deg_C;
                    av_min_temp_2_weeks_pre_and_post_flowering_deg_C = av_min_temp_2_weeks_pre_and_post_flowering_deg_C;
                    av_max_temp_4_weeks_prior_to_harvest_C = MaxT28dayAvg();
                    av_min_temp_4_weeks_prior_to_harvest_C = MinT28dayAvg();
                    incrop_min_temp_deg_C = incropMinTemp;
                    number_of_days_frost_stress_2_weeks_pre_and_post_flowering = days_of_frost_temp.ToString();
                    number_of_days_heat_stress_2_weeks_pre_and_post_flowering = days_of_high_temp.ToString();
                    irrigation_water_applied = irr_tot;
                    water_used_mm = (total_sw_at_sowing - total_sw) + cumRain - cumDrain - cumRunOff;
               
                    if (water_used_mm <= 0.0)
                        water_used_mm = 0.001;      // to avoid divide by zero errors

                    WUE_yield_kg_or_ba_per_mm = (Grain.Total.Wt * 10) / water_used_mm;
                    WUE_biomass_kg_per_mm = Maize.AboveGround.Wt * 10 / water_used_mm;
                    crop_failure_flag = false;
                    if ((days_to_harvevst < 50) && (dry_grain_or_lint_yield_t_ha_or_ba_ha == 0.0))
                        crop_failure_flag = true;

                    // call the reports
                    outputfile_full.DoOutput();
                    outputfile_for_passing.DoOutput();

                    Maize.Harvest();
                    Maize.EndCrop();

                    //Reset triggers and counters ready for the next crop
                    rainCounterFlag = false;
                    cumRain = 0.0;
                    cumRunOff = 0.0;
                    cumDrain = 0.0;
                    tempTracking = false;
                    days_of_high_temp = 0;
                    days_of_frost_temp = 0;
                    harvestRipe = false;

                }  // StageName = 'harvest_ripe'

            } // end runOutput

        }
        // end OnPrepare



        //===========================================================================================
        // Private Methods ( Subroutines / Functions )
        //===========================================================================================

        // Methods for setting crop specifics

        //-------------------------------------------------------------------------------------------
        private void SowCrop_Maize()
        {
            // Get sowing settings from Factors script
            double sow_density = (double)Apsim.Get(this, "[NQld_Factors].Script.density");           //from NQldFactors
            int sow_depth = (int)Apsim.Get(this, "[NQld_Factors].Script.depth");                //from NQldFactors
            string sow_cult = (string)Apsim.Get(this, "[NQld_Factors].Script.cult");              //from NQldFactors
            double row_spacing = (double)Apsim.Get(this, "[NQld_Factors].Script.spacing");           //from NQldFactors
            double sow_fert = (double)Apsim.Get(this, "[NQld_Factors].Script.sow_fert_kg_N_ha");  //from NQldFactors
            int sow_skip = (int)Apsim.Get(this, "[NQld_Factors].Script.skiprow");              //from NQldFactors

            //Summary.WriteMessage(this,"About to sow maize");

            Maize.Sow(population: sow_density, cultivar: sow_cult, depth: sow_depth, rowSpacing: row_spacing);    


            // Apply sowing fertiliser
            Fertiliser.Types fertType = Fertiliser.Types.UreaN;
            Fertiliser.Apply(Amount: sow_fert_kg_N_ha, Type: fertType, Depth: 50);

        }
        //end Sow Maize



        private double MaxT28dayAvg()
        {
            double maxAvg = 0.0;
            foreach (double maxTemp in qMaxT)
            {
                maxAvg += maxTemp;
            }
            maxAvg = maxAvg / qMaxT.Count;
            return (maxAvg);
        }

   
        private double MinT28dayAvg()
        {
            double minAvg = 0.0;
            foreach (double minTemp in qMinT)
            {
                minAvg += minTemp;
            }
            minAvg = minAvg / qMinT.Count;
            return (minAvg);
        }
      


   
         
        private int CntDaysHighTemp(double highTempThreshold)
        {
            int dayCount = 0;
            foreach (double maxTemp in qMaxT)
            {
                if (maxTemp > highTempThreshold)
                    dayCount += 1;
            }
            return (dayCount);
        }
   
        private int CntDaysFrostTemp(double lowTempThreshold)
        {
            int dayCount = 0;
            foreach (double minTemp in qMinT)
            {
                if (minTemp < lowTempThreshold)
                    dayCount += 1;
            }
            return (dayCount);
        }
   

    }
    // end script
}
 // end NameSpace
```
  Folder Outputfiles
    Report outputfile_for_passing
      VariableNames:
        [Clock].Today.Year
        [CQ_Wheat].Script.dry_grain_or_lint_yield_t_ha_or_ba_ha as dry_grain_or_lint_yield_t_ha_or_ba_ha
        [CQ_Wheat].Script.wet_grain_or_lint_yield_t_ha_or_ba_ha as wet_grain_or_lint_yield_t_ha_or_ba_ha
        [CQ_Wheat].Script.grain_protein_percent as grain_protein_%
        [CQ_Wheat].Script.biomass_at_harvest_t_ha as biomass_at_harvest_t_ha
        [CQ_Wheat].Script.in_crop_rain_mm as in_crop_rain_mm
        [CQ_Wheat].Script.days_to_harvevst as days_to_harvevst
        [CQ_Wheat].Script.PAW_at_harvest_mm as PAW_at_harvest_mm
        [CQ_Wheat].Script.mineral_N_at_harvest_kg_ha as mineral_N_at_harvest_kg_ha
        [CQ_Wheat].Script.av_max_temp_4_weeks_after_sowing_deg_C as av_max_temp_4_weeks_after_sowing_deg_C
        [CQ_Wheat].Script.av_min_temp_4_weeks_after_sowing_deg_C as av_min_temp_4_weeks_after_sowing_deg_C
        [CQ_Wheat].Script.av_max_temp_2_weeks_pre_and_post_flowering_deg_C as av_max_temp_2_weeks_pre_and_post_flowering_deg_C
        [CQ_Wheat].Script.av_min_temp_2_weeks_pre_and_post_flowering_deg_C as av_min_temp_2_weeks_pre_and_post_flowering_deg_C
        [CQ_Wheat].Script.av_max_temp_4_weeks_prior_to_harvest_C as av_max_temp_4_weeks_prior_to_harvest_C
        [CQ_Wheat].Script.av_min_temp_4_weeks_prior_to_harvest_C as av_min_temp_4_weeks_prior_to_harvest_C
        [CQ_Wheat].Script.incrop_min_temp_deg_C as incrop_min_temp_deg_C
        [CQ_Wheat].Script.number_of_days_frost_stress_2_weeks_pre_and_post_flowering as number_of_days_frost_stress_2_weeks_pre_and_post_flowering
        [CQ_Wheat].Script.number_of_days_heat_stress_2_weeks_pre_and_post_flowering as number_of_days_heat_stress_2_weeks_pre_and_post_flowering
        [CQ_Wheat].Script.water_used_mm as water_used_mm
        [CQ_Wheat].Script.irrigation_water_applied as irrigation_water_applied
        [CQ_Wheat].Script.WUE_yield_kg_or_ba_per_mm as WUE_yield_kg_or_ba_per_mm
        [CQ_Wheat].Script.WUE_biomass_kg_per_mm as WUE_biomass_kg_per_mm
        [CQ_Wheat].Script.crop_failure_flag as crop_failure_flag
    Report outputfile_full
      VariableNames:
        [Clock].Today
        [Clock].Today.DayOfWeek as day_of_week
        [Clock].Today.Day as day
        [Clock].Today.Month as month
        [Clock].Today.Year as year
        [Weather].FileName as station_name
        [Weather].Latitude as latitude
        [Weather].Longitude as longitude
        [CQ_Factors].Script.OC_Percent as OC_%
        [CQ_Factors].Script.PAWC as PAWC
        [CQ_Factors].Script.initial_soil_mineral_N_kg_ha as initial_soil_mineral_N_kg_ha
        [CQ_Factors].Script.initialWater as initial_PAWC_%
        [CQ_Factors].Script.maturity_type as maturity_type
        [CQ_Factors].Script.sowdate as sowdate
        [CQ_Factors].Script.density as density
        [CQ_Factors].Script.sow_fert_kg_N_ha as sow_fert_kg_N_ha
        [CQ_Factors].Script.row_arrangement as row_arrangement
        [CQ_Factors].Script.side_fert_kg_N_ha as side_fert_kg_N_ha
        [CQ_Factors].Script.irrigation_treat as irrigation_treat
        [CQ_Wheat].Script.dry_grain_or_lint_yield_t_ha_or_ba_ha as dry_grain_or_lint_yield_t_ha_or_ba_ha
        [CQ_Wheat].Script.wet_grain_or_lint_yield_t_ha_or_ba_ha as wet_grain_or_lint_yield_t_ha_or_ba_ha
        [CQ_Wheat].Script.grain_protein_percent as grain_protein_%
        [CQ_Wheat].Script.biomass_at_harvest_t_ha as biomass_at_harvest_t_ha
        [CQ_Wheat].Script.in_crop_rain_mm as in_crop_rain_mm
        [CQ_Wheat].Script.days_to_harvevst as days_to_harvest
        [CQ_Wheat].Script.PAW_at_harvest_mm as PAW_at_harvest_mm
        [CQ_Wheat].Script.mineral_N_at_harvest_kg_ha as mineral_N_at_harvest_kg_ha
        [CQ_Wheat].Script.av_max_temp_4_weeks_after_sowing_deg_C as av_max_temp_4_weeks_after_sowing_deg_C
        [CQ_Wheat].Script.av_min_temp_4_weeks_after_sowing_deg_C as av_min_temp_4_weeks_after_sowing_deg_C
        [CQ_Wheat].Script.av_max_temp_2_weeks_pre_and_post_flowering_deg_C as av_max_temp_2_weeks_pre_and_post_flowering_deg_C
        [CQ_Wheat].Script.av_min_temp_2_weeks_pre_and_post_flowering_deg_C as av_min_temp_2_weeks_pre_and_post_flowering_deg_C
        [CQ_Wheat].Script.av_max_temp_4_weeks_prior_to_harvest_C as av_max_temp_4_weeks_prior_to_harvest_C
        [CQ_Wheat].Script.av_min_temp_4_weeks_prior_to_harvest_C as av_min_temp_4_weeks_prior_to_harvest_C
        [CQ_Wheat].Script.incrop_min_temp_deg_C as incrop_min_temp_deg_C
        [CQ_Wheat].Script.number_of_days_frost_stress_2_weeks_pre_and_post_flowering as number_of_days_frost_stress_2_weeks_pre_and_post_flowering
        [CQ_Wheat].Script.number_of_days_heat_stress_2_weeks_pre_and_post_flowering as number_of_days_heat_stress_2_weeks_pre_and_post_flowering
        [CQ_Wheat].Script.water_used_mm as water_used_mm
        [CQ_Wheat].Script.irrigation_water_applied as irrigation_water_applied
        [CQ_Wheat].Script.WUE_yield_kg_or_ba_per_mm as WUE_yield_kg_or_ba_per_mm
        [CQ_Wheat].Script.WUE_biomass_kg_per_mm as WUE_biomass_kg_per_mm
    Report SoilWaterReport
      VariableNames:
        [Clock].Today
        [north_vertosol_10oc_80_PAWC].LL15mm
        [north_vertosol_10oc_80_PAWC].PAWCmm
        [north_vertosol_10oc_80_PAWC].PAWmm
        [north_vertosol_10oc_80_PAWC].SoilWater.SWmm
        [north_vertosol_10oc_80_PAWC].SoilWater.Thickness
      EventNames:
        [wheat].Harvesting
        [wheat].Sowing
  Folder Soil_Regions
    Folder CQ_Soils
      Soil north_vertosol_10oc_80_PAWC: ASCOrder=Vertosol; ASCSubOrder=Black; SoilType=Clay; Site=Banana; NearestTown=Banana; Region=Central Highlands; State=Queensland; Country=Australia; ApsoilNumber=911; Latitude=-23.5211; Longitude=148.123; DataSource=Collected by Brett Cocks (CES) for NVT.
        Physical
          Thickness  BD    AirDry  LL15   DUL    SAT
          150        0.99  0.1     0.31   0.5    0.6
          150        1.06  0.1525  0.331  0.485  0.57
          300        1.13  0.31    0.36   0.455  0.54
          SoilCrop WheatSoil: LL=[0.31, 0.331, 0.36]; KL=[0.06, 0.06, 0.06]; XF=[1, 1, 1]
            LL source: Field measured and checked for sensibility
          SoilCrop MaizeSoil: LL=[0.31, 0.331, 0.36]; KL=[0.1, 0.1, 0.08]; XF=[1, 1, 1]
          SoilCrop SorghumSoil: LL=[0.31, 0.331, 0.36]; KL=[0.08, 0.08, 0.08]; XF=[1, 1, 1]
          SoilCrop ChickpeaSoil: LL=[0.31, 0.331, 0.36]; KL=[0.08, 0.08, 0.08]; XF=[1, 1, 1]
          SoilCrop MungbeanSoil: LL=[0.31, 0.331, 0.36]; KL=[0.08, 0.08, 0.08]; XF=[1, 1, 1]
          SoilCrop CottonSoil: LL=[0.31, 0.331, 0.36]; KL=[0.08, 0.08, 0.08]; XF=[1, 1, 1]
          SoilCrop SunflowerSoil: LL=[0.31, 0.331, 0.36]; KL=[0.08, 0.08, 0.08]; XF=[1, 1, 1]
          SoilCrop PeanutSoil: LL=[0.31, 0.331, 0.36]; KL=[0.08, 0.08, 0.08]; XF=[1, 1, 1]
          SoilCrop RiceSoil: LL=[0.31, 0.331, 0.36]; KL=[0.08, 0.08, 0.08]; XF=[1, 1, 1]
          SoilCrop SoybeanSoil: LL=[0.31, 0.331, 0.36]; KL=[0.08, 0.08, 0.08]; XF=[1, 1, 1]
          SoilCrop CanolaSoil: LL=[0.31, 0.331, 0.36]; KL=[0.08, 0.08, 0.08]; XF=[1, 1, 1]
        SoilWater: SummerDate=1-Nov; SummerU=6; SummerCona=3.5; WinterDate=1-Apr; WinterU=2; WinterCona=2; DiffusConst=40; DiffusSlope=16; Salb=0.13; CN2Bare=73; CNRed=20; CNCov=0.8; max_pond=0; Thickness=[150, 150, 300]; SWCON=[0.3, 0.3, 0.3]; PrecipitationInterception=0
        SoilNitrogen: fom_types=[default, manure, mucuna, lablab, shemp, stable]; fract_carb=[0.2, 0.3, 0.54, 0.57, 0.45, 0]; fract_cell=[0.7, 0.3, 0.37, 0.37, 0.47, 0.1]; fract_lign=[0.1, 0.4, 0.09, 0.06, 0.08, 0.9]
          SoilNitrogenNO3 NO3
          SoilNitrogenNH4 NH4
          SoilNitrogenUrea Urea
          SoilNitrogenPlantAvailableNO3 PlantAvailableNO3
          SoilNitrogenPlantAvailableNH4 PlantAvailableNH4
        Organic: FOMCNRatio=40
          Thickness  Carbon  SoilCNRatio  FBiom  FInert  FOM
          150        1       12           0.025  0.4     633.808
          150        0.8     12           0.012  0.5     299.39
          300        0.6     12           0.005  0.6     66.8028
        Chemical
          Thickness  NO3N  NH4N  PH   EC
          150        0     1     8.2  0.2
          150        0     0.5   8.7  0.3
          300        0     0.3   8.9  0.5
        InitialWater: PercentMethod=0; FractionFull=0; RelativeTo=LL15
        Sample InitialNitrogen: Thickness=[150, 150, 300]; SWUnits=Volumetric; OCUnits=Total; PHUnits=Water
        CERESSoilTemperature CERESSoilTemperature1
      Soil north_vertosol_10oc_120_PAWC: ASCOrder=Vertosol; ASCSubOrder=Black; SoilType=Clay; Site=Banana; NearestTown=Banana; Region=Central Highlands; State=Queensland; Country=Australia; ApsoilNumber=911; Latitude=-23.5211; Longitude=148.123; DataSource=Collected by Brett Cocks (CES) for NVT.
        Physical
          Thickness  BD    AirDry  LL15   DUL    SAT
          150        0.99  0.1     0.3    0.505  0.6
          150        1.06  0.1525  0.305  0.5    0.57
          300        1.13  0.31    0.335  0.475  0.54
          150        1.11  0.32    0.35   0.47   0.55
          SoilCrop WheatSoil: LL=[0.3, 0.305, 0.335, 0.35]; KL=[0.06, 0.06, 0.06, 0.04]; XF=[1, 1, 1, 1]
            LL source: Field measured and checked for sensibility
          SoilCrop MaizeSoil: LL=[0.3, 0.305, 0.335, 0.35]; KL=[0.1, 0.1, 0.08, 0.06]; XF=[1, 1, 1, 1]
          SoilCrop SorghumSoil: LL=[0.3, 0.305, 0.335, 0.35]; KL=[0.08, 0.08, 0.08, 0.08]; XF=[1, 1, 1, 1]
          SoilCrop ChickpeaSoil: LL=[0.3, 0.305, 0.335, 0.35]; KL=[0.08, 0.08, 0.08, 0.08]; XF=[1, 1, 1, 1]
          SoilCrop MungbeanSoil: LL=[0.3, 0.305, 0.335, 0.35]; KL=[0.08, 0.08, 0.08, 0.08]; XF=[1, 1, 1, 1]
          SoilCrop CottonSoil: LL=[0.3, 0.305, 0.335, 0.35]; KL=[0.08, 0.08, 0.08, 0.08]; XF=[1, 1, 1, 1]
          SoilCrop SunflowerSoil: LL=[0.3, 0.305, 0.335, 0.35]; KL=[0.08, 0.08, 0.08, 0.08]; XF=[1, 1, 1, 1]
          SoilCrop PeanutSoil: LL=[0.3, 0.305, 0.335, 0.35]; KL=[0.08, 0.08, 0.08, 0.08]; XF=[1, 1, 1, 1]
          SoilCrop RiceSoil: LL=[0.3, 0.305, 0.335, 0.35]; KL=[0.08, 0.08, 0.08, 0.08]; XF=[1, 1, 1, 1]
          SoilCrop SoybeanSoil: LL=[0.3, 0.305, 0.335, 0.35]; KL=[0.08, 0.08, 0.08, 0.08]; XF=[1, 1, 1, 1]
          SoilCrop CanolaSoil: LL=[0.3, 0.305, 0.335, 0.35]; KL=[0.08, 0.08, 0.08, 0.08]; XF=[1, 1, 1, 1]
        SoilWater: SummerDate=1-Nov; SummerU=6; SummerCona=3.5; WinterDate=1-Apr; WinterU=2; WinterCona=2; DiffusConst=40; DiffusSlope=16; Salb=0.13; CN2Bare=73; CNRed=20; CNCov=0.8; max_pond=0; Thickness=[150, 150, 300, 150]; SWCON=[0.3, 0.3, 0.3, 0.3]; PrecipitationInterception=0
        SoilNitrogen: same as Soil_Regions.CQ_Soils.north_vertosol_10oc_80_PAWC.SoilNitrogen
        Organic: FOMCNRatio=40
          Thickness  Carbon  SoilCNRatio  FBiom  FInert  FOM
          150        1       12           0.025  0.4     554.069
          150        0.8     12           0.012  0.5     304.08
          300        0.6     12           0.005  0.6     91.587
          150        0.5     12           0.005  0.8     50.264
        Chemical
          Thickness  NO3N  NH4N  PH   EC
          150        0     1     8.2  0.2
          150        0     0.5   8.7  0.3
          300        0     0.3   8.9  0.5
          150        0     0.2   8.1  0.8
        InitialWater: PercentMethod=0; FractionFull=0; RelativeTo=LL15
        Sample InitialNitrogen: Thickness=[150, 150, 300, 150]; SWUnits=Volumetric; OCUnits=Total; PHUnits=Water
        CERESSoilTemperature CERESSoilTemperature1
      Soil north_vertosol_10oc_150_PAWC: ASCOrder=Vertosol; ASCSubOrder=Black; SoilType=Clay; Site=Banana; NearestTown=Banana; Region=Central Highlands; State=Queensland; Country=Australia; ApsoilNumber=911; Latitude=-23.5211; Longitude=148.123; DataSource=Collected by Brett Cocks (CES) for NVT.
        Physical
          Thickness  BD    AirDry  LL15  DUL    SAT
          150        0.99  0.1     0.3   0.52   0.6
          150        1.06  0.1525  0.31  0.5    0.57
          300        1.13  0.31    0.32  0.48   0.54
          300        1.11  0.32    0.34  0.475  0.55
          SoilCrop WheatSoil: LL=[0.3, 0.305, 0.32, 0.34]; KL=[0.06, 0.06, 0.06, 0.04]; XF=[1, 1, 1, 1]
            LL source: Field measured and checked for sensibility
          SoilCrop MaizeSoil: LL=[0.3, 0.305, 0.32, 0.34]; KL=[0.1, 0.1, 0.08, 0.06]; XF=[1, 1, 1, 1]
          SoilCrop SorghumSoil: LL=[0.3, 0.305, 0.32, 0.34]; KL=[0.08, 0.08, 0.08, 0.08]; XF=[1, 1, 1, 1]
          SoilCrop ChickpeaSoil: LL=[0.3, 0.305, 0.32, 0.34]; KL=[0.08, 0.08, 0.08, 0.08]; XF=[1, 1, 1, 1]
          SoilCrop MungbeanSoil: LL=[0.3, 0.305, 0.32, 0.34]; KL=[0.08, 0.08, 0.08, 0.08]; XF=[1, 1, 1, 1]
          SoilCrop CottonSoil: LL=[0.3, 0.305, 0.32, 0.34]; KL=[0.08, 0.08, 0.08, 0.08]; XF=[1, 1, 1, 1]
          SoilCrop SunflowerSoil: LL=[0.3, 0.305, 0.32, 0.34]; KL=[0.08, 0.08, 0.08, 0.08]; XF=[1, 1, 1, 1]
          SoilCrop PeanutSoil: LL=[0.3, 0.305, 0.32, 0.34]; KL=[0.08, 0.08, 0.08, 0.08]; XF=[1, 1, 1, 1]
          SoilCrop RiceSoil: LL=[0.3, 0.305, 0.32, 0.34]; KL=[0.08, 0.08, 0.08, 0.08]; XF=[1, 1, 1, 1]
          SoilCrop SoybeanSoil: LL=[0.3, 0.305, 0.32, 0.34]; KL=[0.08, 0.08, 0.08, 0.08]; XF=[1, 1, 1, 1]
          SoilCrop CanolaSoil: LL=[0.3, 0.305, 0.32, 0.34]; KL=[0.08, 0.08, 0.08, 0.08]; XF=[1, 1, 1, 1]
        SoilWater: SummerDate=1-Nov; SummerU=6; SummerCona=3.5; WinterDate=1-Apr; WinterU=2; WinterCona=2; DiffusConst=40; DiffusSlope=16; Salb=0.13; CN2Bare=73; CNRed=20; CNCov=0.8; max_pond=0; Thickness=[150, 150, 300, 300]; SWCON=[0.3, 0.3, 0.3, 0.3]; PrecipitationInterception=0
        SoilNitrogen: same as Soil_Regions.CQ_Soils.north_vertosol_10oc_80_PAWC.SoilNitrogen
        Organic: FOMCNRatio=40
          Thickness  Carbon  SoilCNRatio  FBiom  FInert  FOM
          150        1       12           0.025  0.4     523.082
          150        0.8     12           0.012  0.5     317.265
          300        0.6     12           0.005  0.6     116.715
          300        0.5     12           0.005  0.8     42.9372
        Chemical
          Thickness  NO3N  NH4N  PH   EC
          150        0     1     8.2  0.2
          150        0     0.5   8.7  0.3
          300        0     0.3   8.9  0.5
          300        0     0.2   8.1  0.8
        InitialWater: PercentMethod=0; FractionFull=0; RelativeTo=LL15
        Sample InitialNitrogen: Thickness=[150, 150, 300, 300]; SWUnits=Volumetric; OCUnits=Total; PHUnits=Water
        CERESSoilTemperature CERESSoilTemperature1
      Soil north_vertosol_10oc_190_PAWC: ASCOrder=Vertosol; ASCSubOrder=Black; SoilType=Clay; Site=Banana; NearestTown=Banana; Region=Central Highlands; State=Queensland; Country=Australia; ApsoilNumber=911; Latitude=-23.5211; Longitude=148.123; DataSource=Collected by Brett Cocks (CES) for NVT.
        Physical
          Thickness  BD    AirDry  LL15   DUL    SAT
          150        0.99  0.1     0.3    0.5    0.6
          150        1.06  0.1525  0.305  0.495  0.57
          300        1.13  0.31    0.32   0.48   0.54
          300        1.11  0.32    0.34   0.475  0.55
          300        1.12  0.34    0.36   0.47   0.55
          100        1.15  0.35    0.365  0.465  0.53
          SoilCrop WheatSoil: LL=[0.3, 0.305, 0.32, 0.34, 0.355, 0.365]; KL=[0.06, 0.06, 0.06, 0.04, 0.04, 0.02]; XF=[1, 1, 1, 1, 1, 1]
            LL source: Field measured and checked for sensibility
          SoilCrop MaizeSoil: LL=[0.3, 0.305, 0.32, 0.34, 0.355, 0.365]; KL=[0.1, 0.1, 0.08, 0.06, 0.05, 0.03]; XF=[1, 1, 1, 1, 1, 1]
          SoilCrop SorghumSoil: LL=[0.3, 0.305, 0.32, 0.34, 0.355, 0.365]; KL=[0.08, 0.08, 0.08, 0.08, 0.06, 0.04]; XF=[1, 1, 1, 1, 1, 1]
          SoilCrop ChickpeaSoil: LL=[0.3, 0.305, 0.32, 0.34, 0.355, 0.365]; KL=[0.08, 0.08, 0.08, 0.08, 0.07, 0.06]; XF=[1, 1, 1, 1, 1, 1]
          SoilCrop MungbeanSoil: LL=[0.3, 0.305, 0.32, 0.34, 0.355, 0.365]; KL=[0.08, 0.08, 0.08, 0.08, 0.07, 0.06]; XF=[1, 1, 1, 1, 1, 1]
          SoilCrop CottonSoil: LL=[0.3, 0.305, 0.32, 0.34, 0.355, 0.365]; KL=[0.08, 0.08, 0.08, 0.08, 0.07, 0.06]; XF=[1, 1, 1, 1, 1, 1]
          SoilCrop SunflowerSoil: LL=[0.3, 0.305, 0.32, 0.34, 0.355, 0.365]; KL=[0.08, 0.08, 0.08, 0.08, 0.07, 0.06]; XF=[1, 1, 1, 1, 1, 1]
          SoilCrop PeanutSoil: LL=[0.3, 0.305, 0.32, 0.34, 0.355, 0.365]; KL=[0.08, 0.08, 0.08, 0.08, 0.07, 0.06]; XF=[1, 1, 1, 1, 1, 1]
          SoilCrop SoybeanSoil: LL=[0.3, 0.305, 0.32, 0.34, 0.355, 0.365]; KL=[0.08, 0.08, 0.08, 0.08, 0.07, 0.06]; XF=[1, 1, 1, 1, 1, 1]
          SoilCrop RiceSoil: LL=[0.3, 0.305, 0.32, 0.34, 0.355, 0.365]; KL=[0.08, 0.08, 0.08, 0.08, 0.07, 0.06]; XF=[1, 1, 1, 1, 1, 1]
          SoilCrop CanolaSoil: LL=[0.3, 0.305, 0.32, 0.34, 0.355, 0.365]; KL=[0.08, 0.08, 0.08, 0.08, 0.07, 0.06]; XF=[1, 1, 1, 1, 1, 1]
        SoilWater: SummerDate=1-Nov; SummerU=6; SummerCona=3.5; WinterDate=1-Apr; WinterU=2; WinterCona=2; DiffusConst=40; DiffusSlope=16; Salb=0.13; CN2Bare=73; CNRed=20; CNCov=0.8; max_pond=0; Thickness=[150, 150, 300, 300, 300, 100]; SWCON=[0.3, 0.3, 0.3, 0.3, 0.3, 0.3]; PrecipitationInterception=0
        SoilNitrogen: same as Soil_Regions.CQ_Soils.north_vertosol_10oc_80_PAWC.SoilNitrogen
        Organic: FOMCNRatio=40
          Thickness  Carbon  SoilCNRatio  FBiom  FInert  FOM
          150        1       12           0.025  0.4     417.087
          150        0.8     12           0.012  0.5     295.049
          300        0.6     12           0.005  0.6     147.648
          300        0.5     12           0.005  0.8     73.8862
          300        0.4     12           0.005  0.9     36.9741
          100        0.4     12           0.005  0.9     29.3546
        Chemical
          Thickness  NO3N  NH4N      PH   EC
          150        0     1         8.2  0.2
          150        0     0.5       8.7  0.3
          300        0     0.3       8.9  0.5
          300        0     0.188288  8.1  0.8
          300        0     0.2       8    1
          100        0     0.2       8    1.3
        InitialWater: PercentMethod=0; FractionFull=0; RelativeTo=LL15
        Sample InitialNitrogen: Thickness=[150, 150, 300, 300, 300, 100]; SWUnits=Volumetric; OCUnits=Total; PHUnits=Water
        CERESSoilTemperature
      Soil north_vertosol_10oc_240_PAWC: ASCOrder=Vertosol; ASCSubOrder=Black; SoilType=Clay; Site=Banana; NearestTown=Banana; Region=Central Highlands; State=Queensland; Country=Australia; ApsoilNumber=911; Latitude=-23.5211; Longitude=148.123; DataSource=Collected by Brett Cocks (CES) for NVT.
        Physical
          Thickness  BD    AirDry  LL15   DUL    SAT
          150        0.99  0.1     0.3    0.5    0.6
          150        1.06  0.1525  0.305  0.495  0.57
          300        1.13  0.31    0.32   0.48   0.54
          300        1.11  0.32    0.34   0.475  0.55
          300        1.12  0.34    0.355  0.47   0.55
          300        1.15  0.35    0.365  0.465  0.53
          300        1.19  0.36    0.37   0.465  0.52
          SoilCrop WheatSoil: LL=[0.3, 0.305, 0.32, 0.34, 0.355, 0.365, 0.37]; KL=[0.06, 0.06, 0.06, 0.04, 0.04, 0.02, 0.01]; XF=[1, 1, 1, 1, 1, 1, 1]
            LL source: Field measured and checked for sensibility
          SoilCrop MaizeSoil: LL=[0.3, 0.305, 0.32, 0.34, 0.355, 0.365, 0.37]; KL=[0.1, 0.1, 0.08, 0.06, 0.05, 0.03, 0.01]; XF=[1, 1, 1, 1, 1, 1, 1]
          SoilCrop SorghumSoil: LL=[0.3, 0.305, 0.32, 0.34, 0.355, 0.365, 0.37]; KL=[0.08, 0.08, 0.08, 0.08, 0.06, 0.04, 0.02]; XF=[1, 1, 1, 1, 1, 1, 1]
          SoilCrop ChickpeaSoil: LL=[0.3, 0.305, 0.32, 0.34, 0.355, 0.365, 0.37]; KL=[0.08, 0.08, 0.08, 0.08, 0.07, 0.06, 0.05]; XF=[1, 1, 1, 1, 1, 1, 1]
          SoilCrop MungbeanSoil: LL=[0.3, 0.305, 0.32, 0.34, 0.355, 0.365, 0.37]; KL=[0.08, 0.08, 0.08, 0.08, 0.07, 0.06, 0.05]; XF=[1, 1, 1, 1, 1, 1, 1]
          SoilCrop CottonSoil: LL=[0.3, 0.305, 0.32, 0.34, 0.355, 0.365, 0.37]; KL=[0.08, 0.08, 0.08, 0.08, 0.07, 0.06, 0.05]; XF=[1, 1, 1, 1, 1, 1, 1]
          SoilCrop SunflowerSoil: LL=[0.3, 0.305, 0.32, 0.34, 0.355, 0.365, 0.37]; KL=[0.08, 0.08, 0.08, 0.08, 0.07, 0.06, 0.05]; XF=[1, 1, 1, 1, 1, 1, 1]
          SoilCrop PeanutSoil: LL=[0.3, 0.305, 0.32, 0.34, 0.355, 0.365, 0.37]; KL=[0.08, 0.08, 0.08, 0.08, 0.07, 0.06, 0.05]; XF=[1, 1, 1, 1, 1, 1, 1]
          SoilCrop SoybeanSoil: LL=[0.3, 0.305, 0.32, 0.34, 0.355, 0.365, 0.37]; KL=[0.08, 0.08, 0.08, 0.08, 0.07, 0.06, 0.05]; XF=[1, 1, 1, 1, 1, 1, 1]
          SoilCrop RiceSoil: LL=[0.3, 0.305, 0.32, 0.34, 0.355, 0.365, 0.37]; KL=[0.08, 0.08, 0.08, 0.08, 0.07, 0.06, 0.05]; XF=[1, 1, 1, 1, 1, 1, 1]
          SoilCrop CanolaSoil: LL=[0.3, 0.305, 0.32, 0.34, 0.355, 0.365, 0.37]; KL=[0.08, 0.08, 0.08, 0.08, 0.07, 0.06, 0.05]; XF=[1, 1, 1, 1, 1, 1, 1]
        SoilWater: SummerDate=1-Nov; SummerU=6; SummerCona=3.5; WinterDate=1-Apr; WinterU=2; WinterCona=2; DiffusConst=40; DiffusSlope=16; Salb=0.13; CN2Bare=73; CNRed=20; CNCov=0.8; max_pond=0; Thickness=[150, 150, 300, 300, 300, 300, 300]; SWCON=[0.3, 0.3, 0.3, 0.3, 0.3, 0.3, 0.3]; PrecipitationInterception=0
        SoilNitrogen: same as Soil_Regions.CQ_Soils.north_vertosol_10oc_80_PAWC.SoilNitrogen
        Organic: FOMCNRatio=40
          Thickness  Carbon  SoilCNRatio  FBiom  FInert  FOM
          150        1       12           0.025  0.4     347.129
          150        0.8     12           0.012  0.5     270.344
          300        0.6     12           0.005  0.6     163.972
          300        0.5     12           0.005  0.8     99.4541
          300        0.4     12           0.005  0.9     60.322
          300        0.4     12           0.005  0.9     36.5871
          300        0.4     12           0.005  0.9     22.1912
        Chemical
          Thickness  NO3N  NH4N      PH   EC
          150        0     1         8.2  0.2
          150        0     0.5       8.7  0.3
          300        0     0.3       8.9  0.5
          300        0     0.188288  8.1  0.8
          300        0     0.2       8    1
          300        0     0.2       8    1.3
          300        0     0.2       8    1.3
        InitialWater: PercentMethod=0; FractionFull=0; RelativeTo=LL15
        Sample InitialNitrogen: Thickness=[150, 150, 300, 300, 300, 300, 300]; SWUnits=Volumetric; OCUnits=Total; PHUnits=Water
        CERESSoilTemperature
    Folder CQKingaroy_Soils
      Soil ferrosol_10oc_80_PAWC: ASCOrder=Ferrosol; ASCSubOrder=Red; SoilType=?; Site=Redvale; NearestTown=Kingaroy, Q 4610; Region=Wide Bay and Burnett; State=Queensland; Country=Australia; ApsoilNumber=65; Latitude=-26.54; Longitude=151.875; LocationAccuracy=Regional Soil Type; DataSource=Qld DPIandF (M Bell)
        Physical
          Thickness  BD    AirDry  LL15  DUL   SAT
          100        1.2   0.07    0.2   0.31  0.51
          100        1.23  0.12    0.23  0.34  0.5
          300        1.27  0.23    0.24  0.36  0.49
          250        1.32  0.27    0.28  0.37  0.47
          SoilCrop PeanutSoil: LL=[0.2, 0.23, 0.24, 0.28]; KL=[0.08, 0.08, 0.08, 0.08]; XF=[1, 1, 1, 1]
            LL source: Unknown source or quality of data
          SoilCrop WheatSoil: LL=[0.2, 0.23, 0.24, 0.28]; KL=[0.06, 0.06, 0.06, 0.04]; XF=[1, 1, 1, 1]
          SoilCrop SunflowerSoil: LL=[0.2, 0.23, 0.24, 0.28]; KL=[0.08, 0.08, 0.08, 0.08]; XF=[1, 1, 1, 1]
          SoilCrop MaizeSoil: LL=[0.2, 0.23, 0.24, 0.28]; KL=[0.1, 0.1, 0.08, 0.06]; XF=[1, 1, 1, 1]
          SoilCrop SorghumSoil: LL=[0.2, 0.23, 0.24, 0.28]; KL=[0.08, 0.08, 0.08, 0.08]; XF=[1, 1, 1, 1]
          SoilCrop CottonSoil: LL=[0.2, 0.23, 0.24, 0.28]; KL=[0.08, 0.08, 0.08, 0.08]; XF=[1, 1, 1, 1]
          SoilCrop MungbeanSoil: LL=[0.2, 0.23, 0.24, 0.28]; KL=[0.08, 0.08, 0.08, 0.08]; XF=[1, 1, 1, 1]
          SoilCrop ChickpeaSoil: LL=[0.2, 0.23, 0.24, 0.28]; KL=[0.08, 0.08, 0.08, 0.08]; XF=[1, 1, 1, 1]
          SoilCrop SoybeanSoil: LL=[0.2, 0.23, 0.24, 0.28]; KL=[0.08, 0.08, 0.08, 0.08]; XF=[1, 1, 1, 1]
          SoilCrop RiceSoil: LL=[0.2, 0.23, 0.24, 0.28]; KL=[0.08, 0.08, 0.08, 0.08]; XF=[1, 1, 1, 1]
        SoilWater: SummerDate=1-Nov; SummerU=6; SummerCona=3.5; WinterDate=1-Apr; WinterU=4; WinterCona=2.5; DiffusConst=40; DiffusSlope=16; Salb=0.12; CN2Bare=73; CNRed=20; CNCov=0.8; max_pond=0; Thickness=[100, 100, 300, 250]; SWCON=[0.9, 0.9, 0.9, 0.9]; PrecipitationInterception=0
        SoilNitrogen: same as Soil_Regions.CQ_Soils.north_vertosol_10oc_80_PAWC.SoilNitrogen
        Organic: FOMCNRatio=40
          Thickness  Carbon  SoilCNRatio  FBiom  FInert  FOM
          100        1.3     12           0.025  0.4     513.745
          100        1.43    12           0.012  0.5     344.374
          300        0.78    12           0.005  0.6     103.723
          250        0.39    12           0.005  0.7     38.1577
        Chemical
          Thickness  NO3N  NH4N      PH
          100        0     1.2375    6
          100        0     0.646341  6
          300        0     0.266929  5.8
          250        0     0.19      5.7
        InitialWater: PercentMethod=0; FractionFull=0; RelativeTo=LL15
        Sample InitialNitrogen: Thickness=[100, 100, 300, 250]; SWUnits=Volumetric; OCUnits=Total; PHUnits=Water
        CERESSoilTemperature
      Soil ferrosol_10oc_120_PAWC: ASCOrder=Ferrosol; ASCSubOrder=Red; SoilType=?; Site=Redvale; NearestTown=Kingaroy, Q 4610; Region=Wide Bay and Burnett; State=Queensland; Country=Australia; ApsoilNumber=65; Latitude=-26.54; Longitude=151.875; LocationAccuracy=Regional Soil Type; DataSource=Qld DPIandF (M Bell)
        Physical
          Thickness  BD    AirDry  LL15  DUL    SAT
          100        1.2   0.07    0.2   0.31   0.51
          100        1.23  0.12    0.23  0.34   0.5
          300        1.27  0.23    0.24  0.36   0.49
          300        1.32  0.27    0.28  0.37   0.47
          300        1.39  0.27    0.28  0.395  0.45
          SoilCrop PeanutSoil: LL=[0.2, 0.23, 0.24, 0.28, 0.28]; KL=[0.08, 0.08, 0.08, 0.08, 0.07]; XF=[1, 1, 1, 1, 1]
            LL source: Unknown source or quality of data
          SoilCrop WheatSoil: LL=[0.2, 0.23, 0.24, 0.28, 0.28]; KL=[0.06, 0.06, 0.06, 0.04, 0.04]; XF=[1, 1, 1, 1, 1]
          SoilCrop SunflowerSoil: LL=[0.2, 0.23, 0.24, 0.28, 0.28]; KL=[0.08, 0.08, 0.08, 0.08, 0.07]; XF=[1, 1, 1, 1, 1]
          SoilCrop MaizeSoil: LL=[0.2, 0.23, 0.24, 0.28, 0.28]; KL=[0.1, 0.1, 0.08, 0.06, 0.05]; XF=[1, 1, 1, 1, 1]
          SoilCrop SorghumSoil: LL=[0.2, 0.23, 0.24, 0.28, 0.28]; KL=[0.08, 0.08, 0.08, 0.08, 0.06]; XF=[1, 1, 1, 1, 1]
          SoilCrop CottonSoil: LL=[0.2, 0.23, 0.24, 0.28, 0.28]; KL=[0.08, 0.08, 0.08, 0.08, 0.07]; XF=[1, 1, 1, 1, 1]
          SoilCrop MungbeanSoil: LL=[0.2, 0.23, 0.24, 0.28, 0.28]; KL=[0.08, 0.08, 0.08, 0.08, 0.07]; XF=[1, 1, 1, 1, 1]
          SoilCrop ChickpeaSoil: LL=[0.2, 0.23, 0.24, 0.28, 0.28]; KL=[0.08, 0.08, 0.08, 0.08, 0.07]; XF=[1, 1, 1, 1, 1]
          SoilCrop SoybeanSoil: LL=[0.2, 0.23, 0.24, 0.28, 0.28]; KL=[0.08, 0.08, 0.08, 0.08, 0.07]; XF=[1, 1, 1, 1, 1]
          SoilCrop RiceSoil: LL=[0.2, 0.23, 0.24, 0.28, 0.28]; KL=[0.08, 0.08, 0.08, 0.08, 0.07]; XF=[1, 1, 1, 1, 1]
        SoilWater: SummerDate=1-Nov; SummerU=6; SummerCona=3.5; WinterDate=1-Apr; WinterU=4; WinterCona=2.5; DiffusConst=40; DiffusSlope=16; Salb=0.12; CN2Bare=73; CNRed=20; CNCov=0.8; max_pond=0; Thickness=[100, 100, 300, 300, 300]; SWCON=[0.9, 0.9, 0.9, 0.9, 0.9]; PrecipitationInterception=0
        SoilNitrogen: same as Soil_Regions.CQ_Soils.north_vertosol_10oc_80_PAWC.SoilNitrogen
        Organic: FOMCNRatio=40
          Thickness  Carbon  SoilCNRatio  FBiom  FInert  FOM
          100        1.326   12           0.025  0.4     432.746
          100        1.43    12           0.012  0.5     329.45
          300        0.78    12           0.005  0.6     145.364
          300        0.39    12           0.005  0.7     64.1395
          300        0.26    12           0.005  0.9     28.3005
        Chemical
          Thickness  NO3N  NH4N      PH
          100        0     1.2375    6
          100        0     0.646341  6
          300        0     0.266929  5.8
          300        0     0.158333  5.7
          300        0     0.161151  5.4
        InitialWater: PercentMethod=0; FractionFull=0; RelativeTo=LL15
        Sample InitialNitrogen: Thickness=[100, 100, 300, 300, 300]; SWUnits=Volumetric; OCUnits=Total; PHUnits=Water
        CERESSoilTemperature
      Soil ferrosol_10oc_150_PAWC: ASCOrder=Ferrosol; ASCSubOrder=Red; SoilType=?; Site=Redvale; NearestTown=Kingaroy, Q 4610; Region=Wide Bay and Burnett; State=Queensland; Country=Australia; ApsoilNumber=65; Latitude=-26.54; Longitude=151.875; LocationAccuracy=Regional Soil Type; DataSource=Qld DPIandF (M Bell)
        Physical
          Thickness  BD    AirDry  LL15   DUL    SAT
          100        1.2   0.07    0.2    0.31   0.51
          100        1.23  0.12    0.23   0.34   0.5
          300        1.27  0.23    0.24   0.36   0.49
          300        1.32  0.27    0.28   0.37   0.47
          300        1.39  0.27    0.28   0.395  0.45
          300        1.45  0.29    0.295  0.395  0.45
          SoilCrop PeanutSoil: LL=[0.2, 0.23, 0.24, 0.28, 0.28, 0.295]; KL=[0.08, 0.08, 0.08, 0.08, 0.07, 0.06]; XF=[1, 1, 1, 1, 1, 1]
            LL source: Unknown source or quality of data
          SoilCrop WheatSoil: LL=[0.2, 0.23, 0.24, 0.28, 0.28, 0.295]; KL=[0.06, 0.06, 0.06, 0.04, 0.04, 0.02]; XF=[1, 1, 1, 1, 1, 1]
          SoilCrop SunflowerSoil: LL=[0.2, 0.23, 0.24, 0.28, 0.28, 0.295]; KL=[0.08, 0.08, 0.08, 0.08, 0.07, 0.06]; XF=[1, 1, 1, 1, 1, 1]
          SoilCrop MaizeSoil: LL=[0.2, 0.23, 0.24, 0.28, 0.28, 0.295]; KL=[0.1, 0.1, 0.08, 0.06, 0.05, 0.03]; XF=[1, 1, 1, 1, 1, 1]
          SoilCrop SorghumSoil: LL=[0.2, 0.23, 0.24, 0.28, 0.28, 0.295]; KL=[0.08, 0.08, 0.08, 0.08, 0.06, 0.04]; XF=[1, 1, 1, 1, 1, 1]
          SoilCrop CottonSoil: LL=[0.2, 0.23, 0.24, 0.28, 0.28, 0.295]; KL=[0.08, 0.08, 0.08, 0.08, 0.07, 0.06]; XF=[1, 1, 1, 1, 1, 1]
          SoilCrop MungbeanSoil: LL=[0.2, 0.23, 0.24, 0.28, 0.28, 0.295]; KL=[0.08, 0.08, 0.08, 0.08, 0.07, 0.06]; XF=[1, 1, 1, 1, 1, 1]
          SoilCrop ChickpeaSoil: LL=[0.2, 0.23, 0.24, 0.28, 0.28, 0.295]; KL=[0.08, 0.08, 0.08, 0.08, 0.07, 0.06]; XF=[1, 1, 1, 1, 1, 1]
          SoilCrop SoybeanSoil: LL=[0.2, 0.23, 0.24, 0.28, 0.28, 0.295]; KL=[0.08, 0.08, 0.08, 0.08, 0.07, 0.06]; XF=[1, 1, 1, 1, 1, 1]
          SoilCrop RiceSoil: LL=[0.2, 0.23, 0.24, 0.28, 0.28, 0.295]; KL=[0.08, 0.08, 0.08, 0.08, 0.07, 0.06]; XF=[1, 1, 1, 1, 1, 1]
        SoilWater: SummerDate=1-Nov; SummerU=6; SummerCona=3.5; WinterDate=1-Apr; WinterU=4; WinterCona=2.5; DiffusConst=40; DiffusSlope=16; Salb=0.12; CN2Bare=73; CNRed=20; CNCov=0.8; max_pond=0; Thickness=[100, 100, 300, 300, 300, 300]; SWCON=[0.9, 0.9, 0.9, 0.9, 0.9, 0.9]; PrecipitationInterception=0
        SoilNitrogen: same as Soil_Regions.CQ_Soils.north_vertosol_10oc_80_PAWC.SoilNitrogen
        Organic: FOMCNRatio=40
          Thickness  Carbon  SoilCNRatio  FBiom  FInert  FOM
          100        1.326   12           0.025  0.4     379.705
          100        1.43    12           0.012  0.5     306.466
          300        0.78    12           0.005  0.6     161.136
          300        0.39    12           0.005  0.7     84.7236
          300        0.26    12           0.005  0.9     44.5466
          300        0.13    12           0.005  0.95    23.4221
        Chemical
          Thickness  NO3N  NH4N      PH
          100        0     1.2375    6
          100        0     0.646341  6
          300        0     0.266929  5.8
          300        0     0.158333  5.7
          300        0     0.161151  5.4
          300        0     0.164138  5
        InitialWater: PercentMethod=0; FractionFull=0; RelativeTo=LL15
        Sample InitialNitrogen: Thickness=[100, 100, 300, 300, 300, 300]; SWUnits=Volumetric; OCUnits=Total; PHUnits=Water
        CERESSoilTemperature
    Folder WA_Soils
      Soil WA_deep_sandy_duplex_nonwaterlogging: ASCOrder=Chromosol; SoilType=Deep sandy duplex; Site=Mingenew; NearestTown=Mingenew; Region=Northern Region; State=Western Australia; Country=Australia; ApsoilNumber=428; Latitude=-29.134; Longitude=115.387; LocationAccuracy=+/- 20m
        DataSource=Collected by CSIRO as part of the GRDC SIP09 Precision Agriculture Project
        Comments=Deep sandy duplex  (colour unknown - possibly yellow/brown or red) Possible ASC: Yellow or Brown Chromosol; Cos3
        Physical
          Thickness  BD    AirDry  LL15  DUL   SAT
          100        1.53  0.015   0.03  0.08  0.36
          100        1.8   0.024   0.03  0.08  0.3
          100        1.8   0.03    0.03  0.09  0.3
          100        1.8   0.04    0.04  0.16  0.3
          200        1.8   0.1     0.1   0.28  0.3
          300        1.7   0.1     0.1   0.28  0.33
          300        1.7   0.1     0.1   0.3   0.33
          300        1.7   0.1     0.1   0.3   0.33
          300        1.6   0.1     0.1   0.3   0.36
          700        1.6   0.1     0.1   0.3   0.36
          SoilCrop WheatSoil
            LL=[0.03, 0.03, 0.03, 0.04, 0.2, 0.2, 0.21, 0.22, 0.22, 0.22]
            KL=[0.06, 0.06, 0.06, 0.06, 0.04, 0.04, 0.02, 0.01, 0.01, 0.01]
            XF=[1, 1, 1, 1, 1, 1, 1, 1, 1, 1]
          SoilCrop CanolaSoil
            LL=[0.03, 0.03, 0.03, 0.04, 0.2, 0.2, 0.21, 0.22, 0.22, 0.22]
            KL=[0.06, 0.06, 0.06, 0.06, 0.04, 0.04, 0.02, 0.01, 0.01, 0.01]
            XF=[1, 1, 1, 1, 1, 1, 1, 1, 1, 1]
          SoilCrop LupinsSoil
            LL=[0.03, 0.03, 0.03, 0.04, 0.2, 0.2, 0.21, 0.22, 0.22, 0.22]
            KL=[0.06, 0.06, 0.06, 0.06, 0.04, 0.04, 0.02, 0.01, 0.01, 0.01]
            XF=[1, 1, 1, 1, 1, 1, 1, 1, 1, 1]
        SoilWater: SummerDate=1-Nov; SummerU=6; SummerCona=3.5; WinterDate=1-Apr; WinterU=2; WinterCona=2; DiffusConst=88; DiffusSlope=35; Salb=0.13; CN2Bare=60; CNRed=20; CNCov=0.8; max_pond=0; Thickness=[100, 100, 100, 100, 200, 300, 300, 300, 300, 700]; SWCON=[0.7, 0.7, 0.7, 0.7, 0.5, 0.5, 0.5, 0.5, 0.5, 0.5]; PrecipitationInterception=0
        SoilNitrogen: same as Soil_Regions.CQ_Soils.north_vertosol_10oc_80_PAWC.SoilNitrogen
        Organic: FOMCNRatio=40
          Thickness  Carbon  SoilCNRatio  FBiom  FInert  FOM
          100        1.378   13           0.03   0.3     202.323
          100        1.053   13           0.03   0.3     179.444
          100        0.455   13           0.02   0.3     159.153
          100        0.208   13           0.01   0.8     141.156
          200        0.195   13           0.01   0.8     111.037
          300        0.169   13           0.01   0.8     77.4679
          300        0.208   13           0.01   0.9     54.0475
          300        0.13    13           0.01   0.9     37.7077
          300        0.13    13           0.01   0.9     26.3077
          700        0.13    13           0.01   0.9     11.3573
        Chemical
          Thickness  NO3N  NH4N  PH
          100        0     1     6
          100        0     0.1   5.5
          100        0     0.1   6
          100        0     0.1   5.5
          200        0     0.1   5.6
          300        0     0.1   6.5
          300        0     0.1   7
          300        0     0     7
          300        0     0     7.5
          700        0     0     8
        InitialWater: PercentMethod=0; FractionFull=0; RelativeTo=LL15
        Sample InitialNitrogen: Thickness=[100, 100, 100, 100, 200, 300, 300, 300, 300, 700]; SWUnits=Volumetric; OCUnits=Total; PHUnits=Water
        CERESSoilTemperature
      Soil WA_deep_sandy_duplex_waterlogging: same as Soil_Regions.WA_Soils.WA_deep_sandy_duplex_nonwaterlogging
      Soil WA_shallow_loamy_duplex: SoilType=Shallow loamy duplex; Site=Buntine; NearestTown=Buntine; Region=Northern Region; State=Western Australia; Country=Australia; ApsoilNumber=433; Latitude=-29.876; Longitude=116.403; LocationAccuracy=+/- 20m; Comments=BCM16
        DataSource=Collected by CSIRO as part of the GRDC SIP09 Precision Agriculture Project
        Physical
          Thickness  BD    AirDry  LL15  DUL   SAT
          100        1.65  0.04    0.08  0.2   0.35
          100        1.72  0.064   0.08  0.2   0.33
          100        1.49  0.08    0.08  0.2   0.41
          100        1.45  0.15    0.15  0.25  0.42
          200        1.55  0.15    0.15  0.25  0.39
          300        1.57  0.15    0.15  0.25  0.38
          300        1.68  0.15    0.15  0.23  0.34
          300        1.61  0.15    0.15  0.26  0.36
          300        1.71  0.15    0.15  0.3   0.33
          700        1.75  0.15    0.15  0.31  0.31
          SoilCrop WheatSoil
            LL=[0.08, 0.08, 0.08, 0.15, 0.19, 0.19, 0.19, 0.24, 0.3, 0.31]
            KL=[0.06, 0.06, 0.06, 0.06, 0.04, 0.04, 0.02, 0.01, 0.01, 0.01]
            XF=[1, 1, 1, 1, 1, 1, 0.3, 0, 0, 0]
          SoilCrop CanolaSoil
            LL=[0.08, 0.08, 0.08, 0.15, 0.19, 0.19, 0.19, 0.24, 0.3, 0.31]
            KL=[0.06, 0.06, 0.06, 0.06, 0.04, 0.04, 0.02, 0.01, 0.01, 0.01]
            XF=[1, 1, 1, 1, 1, 1, 0.3, 0, 0, 0]
          SoilCrop LupinsSoil
            LL=[0.08, 0.08, 0.08, 0.15, 0.19, 0.19, 0.19, 0.24, 0.3, 0.31]
            KL=[0.06, 0.06, 0.06, 0.06, 0.04, 0.04, 0.02, 0.01, 0.01, 0.01]
            XF=[1, 1, 1, 1, 1, 1, 0.3, 0, 0, 0]
        SoilWater: SummerDate=1-Nov; SummerU=6; SummerCona=3.5; WinterDate=1-Apr; WinterU=2; WinterCona=2; DiffusConst=88; DiffusSlope=35; Salb=0.13; CN2Bare=60; CNRed=20; CNCov=0.8; max_pond=0; Thickness=[100, 100, 100, 100, 200, 300, 300, 300, 300, 700]; SWCON=[0.5, 0.5, 0.5, 0.5, 0.5, 0.5, 0.5, 0.5, 0.5, 0.5]; PrecipitationInterception=0
        SoilNitrogen: same as Soil_Regions.CQ_Soils.north_vertosol_10oc_80_PAWC.SoilNitrogen
        Organic: FOMCNRatio=40
          Thickness  Carbon  SoilCNRatio  FBiom  FInert  FOM
          100        1.43    13           0.03   0.3     202.323
          100        1.144   13           0.03   0.3     179.444
          100        0.754   13           0.02   0.3     159.153
          100        0.832   13           0.01   0.8     141.156
          200        1.183   13           0.01   0.8     111.037
          300        2.756   13           0.01   0.8     77.4679
          300        0.65    13           0.01   0.9     54.0475
          300        0.65    13           0.01   0.9     37.7077
          300        0.26    13           0.01   0.9     26.3077
          700        0.26    13           0.01   0.9     11.3573
        Chemical
          Thickness  NO3N  NH4N  PH
          100        0     0.1   5.4
          100        0     0.1   5.8
          100        0     0.1   6.6
          100        0     0.1   7.2
          200        0     0.1   7.7
          300        0     0.1   8.1
          300        0     0.1   8
          300        0     0.1   8
          300        0     0.1   8
          700        0     0.1   8
        InitialWater: PercentMethod=0; FractionFull=0; RelativeTo=LL15
        Sample InitialNitrogen: Thickness=[100, 100, 100, 100, 200, 300, 300, 300, 300, 700]; SWUnits=Volumetric; OCUnits=Total; PHUnits=Water
        CERESSoilTemperature
      Soil WA_yellow_deep_sand: SoilType=Sand; Site=Buntine; NearestTown=Buntine; Region=Northern Region; State=Western Australia; Country=Australia; ApsoilNumber=424; Latitude=-29.936; Longitude=116.29; LocationAccuracy=+/- 20m; Comments=Bir22 and Bir4
        DataSource=Collected by CSIRO as part of the GRDC SIP09 Precision Agriculture Project
        Physical
          Thickness  BD    AirDry  LL15  DUL   SAT
          100        1.39  0.02    0.04  0.09  0.36
          100        1.63  0.032   0.04  0.1   0.36
          100        1.53  0.04    0.04  0.1   0.39
          100        1.51  0.04    0.04  0.1   0.4
          200        1.59  0.04    0.04  0.11  0.37
          300        1.55  0.04    0.04  0.11  0.39
          300        1.53  0.04    0.04  0.11  0.39
          300        1.54  0.04    0.04  0.12  0.39
          300        1.54  0.04    0.04  0.12  0.39
          700        1.57  0.04    0.04  0.13  0.38
          SoilCrop WheatSoil
            LL=[0.04, 0.04, 0.04, 0.04, 0.05, 0.05, 0.06, 0.06, 0.06, 0.06]
            KL=[0.06, 0.06, 0.06, 0.06, 0.04, 0.04, 0.02, 0.01, 0.01, 0.01]
            XF=[1, 1, 1, 1, 1, 1, 1, 1, 1, 1]
          SoilCrop CanolaSoil
            LL=[0.04, 0.04, 0.04, 0.04, 0.05, 0.05, 0.06, 0.06, 0.06, 0.06]
            KL=[0.06, 0.06, 0.06, 0.06, 0.04, 0.04, 0.02, 0.01, 0.01, 0.01]
            XF=[1, 1, 1, 1, 1, 1, 1, 1, 1, 1]
          SoilCrop LupinsSoil
            LL=[0.04, 0.04, 0.04, 0.04, 0.05, 0.05, 0.06, 0.06, 0.06, 0.06]
            KL=[0.06, 0.06, 0.06, 0.06, 0.04, 0.04, 0.02, 0.01, 0.01, 0.01]
            XF=[1, 1, 1, 1, 1, 1, 1, 1, 1, 1]
        SoilWater: SummerDate=1-Nov; SummerU=6; SummerCona=3.5; WinterDate=1-Apr; WinterU=2; WinterCona=2; DiffusConst=220; DiffusSlope=22; Salb=0.13; CN2Bare=60; CNRed=20; CNCov=0.8; max_pond=0; Thickness=[100, 100, 100, 100, 200, 300, 300, 300, 300, 700]; SWCON=[0.7, 0.7, 0.7, 0.7, 0.7, 0.7, 0.7, 0.7, 0.7, 0.7]; PrecipitationInterception=0
        SoilNitrogen: same as Soil_Regions.CQ_Soils.north_vertosol_10oc_80_PAWC.SoilNitrogen
        Organic: FOMCNRatio=40
          Thickness  Carbon  SoilCNRatio  FBiom  FInert  FOM
          100        0.676   13           0.03   0.3     202.323
          100        0.429   13           0.03   0.3     179.444
          100        0.559   13           0.02   0.3     159.153
          100        0.156   13           0.01   0.8     141.156
          200        0.156   13           0.01   0.8     111.037
          300        0.13    13           0.01   0.8     77.4679
          300        0.13    13           0.01   0.9     54.0475
          300        0.13    13           0.01   0.9     37.7077
          300        0.13    13           0.01   0.9     26.3077
          700        0.13    13           0.01   0.9     11.3573
        Chemical
          Thickness  NO3N  NH4N  PH
          100        0     0.1   5.8
          100        0     0.1   4.7
          100        0     0.1   4.7
          100        0     0.1   4.9
          200        0     0.1   5.5
          300        0     0.1   5.4
          300        0     0.1   5.5
          300        0     0.1   5.5
          300        0     0.1   5.5
          700        0     0.1   5.5
        InitialWater: PercentMethod=0; FractionFull=0; RelativeTo=LL15
        Sample InitialNitrogen: Thickness=[100, 100, 100, 100, 200, 300, 300, 300, 300, 700]; SWUnits=Volumetric; OCUnits=Total; PHUnits=Water
        CERESSoilTemperature
      Soil WA_yellow_sandy_earth: SoilType=Sandy earth; Site=Carnamah; NearestTown=Carnamah; Region=Northern Region; State=Western Australia; Country=Australia; ApsoilNumber=477; Latitude=-29.672; Longitude=116.215; LocationAccuracy=+/- 20m; DataSource=DAFWA_A. Stuart-Street _ NEAR project Yield Prophet
        Comments=Yellow sandy earth; YP2-meas LL.  12/05/2010 Zvi Hochman modified values for kl(wheat), DiffusConst, DiffusSlope, CN2Bare, swcon at request of DAFWA
        Physical
          Thickness  ParticleSizeClay  BD    AirDry  LL15   DUL    SAT
          200        9.7               1.58  0.015   0.035  0.095  0.376
          200        11.6              1.74  0.03    0.041  0.114  0.319
          200        8.5               1.72  0.051   0.051  0.106  0.326
          200        10.8              1.71  0.059   0.059  0.109  0.33
          200        10.5              1.68  0.059   0.059  0.107  0.34
          200        13.2              1.69  0.059   0.059  0.118  0.337
          SoilCrop WheatSoil: LL=[0.035, 0.041, 0.051, 0.059, 0.065, 0.068]; KL=[0.06, 0.06, 0.06, 0.04, 0.04, 0.04]; XF=[1, 1, 1, 1, 1, 1]
            LL source: Estimated based on local knowledge
          SoilCrop CanolaSoil: same as Soil_Regions.WA_Soils.WA_yellow_sandy_earth.Physical.WheatSoil
        SoilWater: SummerDate=1-Nov; SummerU=6; SummerCona=3.5; WinterDate=1-Apr; WinterU=2; WinterCona=2; DiffusConst=88; DiffusSlope=35; Salb=0.15; CN2Bare=60; CNRed=20; CNCov=0.8; max_pond=0; Thickness=[200, 200, 200, 200, 200, 200]; SWCON=[0.7, 0.6, 0.7, 0.6, 0.6, 0.6]; PrecipitationInterception=0
        SoilNitrogen: same as Soil_Regions.CQ_Soils.north_vertosol_10oc_80_PAWC.SoilNitrogen
        Organic: FOMCNRatio=40
          Thickness  Carbon   SoilCNRatio  FBiom  FInert  FOM
          200        0.94172  12           0.035  0.4     414.085
          200        0.3185   12           0.02   0.5     251.156
          200        0.09204  12           0.015  0.7     152.334
          200        0.09048  12           0.015  0.95    92.395
          200        0.06617  12           0.01   0.95    56.0404
          200        0.02899  12           0.01   0.95    33.9902
        Chemical
          Thickness  NO3N  NH4N  PH   EC     ESP
          200        0     0.1   6.6  0.203  32.4
          200        0     0.1   5.6  0.167  45.2
          200        0     0.1   6    0.175  46.7
          200        0     0.1   6.1  0.164  46.7
          200        0     0.1   6.2  0.195  48.1
          200        0     0.1   6.2  0.198  48.1
        InitialWater: PercentMethod=0; FractionFull=0; RelativeTo=LL15
        Sample InitialNitrogen: Thickness=[200, 200, 200, 200, 200, 200]; SWUnits=Volumetric; OCUnits=Total; PHUnits=Water
        CERESSoilTemperature
    Folder SA_Solis
      Soil SA_ardrossan_155_PAWC: SoilType=Clay loam; Site=VIC; NearestTown=Jil Jil; Region=Mallee; State=Victoria; Country=Australia; ApsoilNumber=728; Latitude=-35.8822; Longitude=142.99226; LocationAccuracy=+/- 1000m; Comments=Medium SSC; GPS at paddock scale only; BCG systems trial
        DataSource=Based on Soil Characterisation undertaken by Birchip Cropping Group during 2005
        Physical
          Thickness  BD     AirDry  LL15  DUL    SAT
          150        1.337  0.06    0.12  0.223  0.466
          150        1.31   0.096   0.12  0.266  0.476
          300        1.329  0.12    0.12  0.319  0.469
          300        1.472  0.12    0.12  0.325  0.415
          300        1.49   0.12    0.12  0.314  0.408
          300        1.377  0.12    0.12  0.294  0.451
          SoilCrop WheatSoil: LL=[0.12, 0.12, 0.13, 0.163, 0.28, 0.29]; KL=[0.06, 0.055, 0.04, 0.04, 0.03, 0.02]; XF=[1, 1, 1, 1, 1, 1]
            LL source: Field measured and checked for sensibility (layer 1, 2, 3, 4, 5)
        SoilWater: SummerDate=1-Nov; SummerU=2; SummerCona=2; WinterDate=1-Apr; WinterU=2; WinterCona=2; DiffusConst=88; DiffusSlope=35; Salb=0.13; CN2Bare=73; CNRed=20; CNCov=0.8; max_pond=0; Thickness=[150, 150, 300, 300, 300, 300]; SWCON=[0.5, 0.5, 0.5, 0.3, 0.3, 0.1]; PrecipitationInterception=0
        SoilNitrogen: same as Soil_Regions.CQ_Soils.north_vertosol_10oc_80_PAWC.SoilNitrogen
        Organic: FOMCNRatio=45
          Thickness  Carbon  SoilCNRatio  FBiom  FInert  FOM
          150        4.03    12.5         0.035  0.5     585.896
          150        3.224   12.5         0.02   0.6     434.043
          300        2.015   12.5         0.015  0.8     238.208
          300        1.0075  12.5         0.015  0.95    130.731
          300        0.6045  12.5         0.01   0.95    71.7468
          300        0.403   12.5         0.01   0.95    39.3755
        Chemical
          Thickness  NO3N  NH4N  PH   EC
          150        0     0.1   8.3  0.3
          150        0     0.1   8.8  0.7
          300        0     0.1   9.5  1.1
          300        0     0.1   10   1.3
          300        0     0.1   10   1.5
          300        0     0.1   10   1.5
        InitialWater: PercentMethod=0; FractionFull=0; RelativeTo=LL15
        Sample InitialNitrogen: Thickness=[150, 150, 300, 300, 300, 300]; SWUnits=Volumetric; OCUnits=Total; PHUnits=Water
        CERESSoilTemperature
      Soil SA_curry_185_PAWC: SoilType=Clay loam; Site=VIC; NearestTown=Jil Jil; Region=Mallee; State=Victoria; Country=Australia; ApsoilNumber=728; Latitude=-35.8822; Longitude=142.99226; LocationAccuracy=+/- 1000m; Comments=Medium SSC; GPS at paddock scale only; BCG systems trial
        DataSource=Based on Soil Characterisation undertaken by Birchip Cropping Group during 2005
        Physical
          Thickness  BD     AirDry  LL15   DUL    SAT
          150        1.342  0.08    0.16   0.329  0.464
          150        1.376  0.128   0.16   0.301  0.451
          300        1.2    0.14    0.14   0.291  0.517
          300        1.314  0.105   0.105  0.289  0.474
          300        1.392  0.105   0.105  0.267  0.445
          300        1.331  0.105   0.105  0.243  0.468
          SoilCrop WheatSoil: LL=[0.161, 0.16, 0.144, 0.114, 0.15, 0.22]; KL=[0.06, 0.055, 0.04, 0.04, 0.03, 0.02]; XF=[1, 1, 1, 1, 1, 1]
            LL source: Field measured and checked for sensibility (layer 1, 2, 3, 4, 5)
        SoilWater: SummerDate=1-Nov; SummerU=2; SummerCona=2; WinterDate=1-Apr; WinterU=2; WinterCona=2; DiffusConst=88; DiffusSlope=35; Salb=0.13; CN2Bare=73; CNRed=20; CNCov=0.8; max_pond=0; Thickness=[150, 150, 300, 300, 300, 300]; SWCON=[0.5, 0.5, 0.5, 0.5, 0.5, 0.5]; PrecipitationInterception=0
        SoilNitrogen: same as Soil_Regions.CQ_Soils.north_vertosol_10oc_80_PAWC.SoilNitrogen
        Organic: same as Soil_Regions.SA_Solis.SA_ardrossan_155_PAWC.Organic
        Chemical
          Thickness  NO3N  NH4N  PH   EC
          150        0     0.1   8.3  0.3
          150        0     0.1   8.8  0.7
          300        0     0.1   9.5  1.1
          300        0     0.1   10   1.3
          300        0     0.1   10   1.5
          300        0     0.1   10   1.5
        InitialWater: PercentMethod=0; FractionFull=0; RelativeTo=LL15
        Sample InitialNitrogen: Thickness=[150, 150, 300, 300, 300, 300]; SWUnits=Volumetric; OCUnits=Total; PHUnits=Water
        CERESSoilTemperature
      Soil SA_petersville_145_PAWC: SoilType=Petersville - SA; Site=SA; State=SA; Country=Australia; LocationAccuracy=+/- 1000m; DataSource=Based on Soil Characterisation undertaken by QDAF
        Physical
          Thickness  BD     AirDry  LL15   DUL    SAT
          100        1.403  0.038   0.076  0.284  0.441
          200        1.314  0.061   0.076  0.34   0.474
          300        1.241  0.076   0.076  0.288  0.502
          400        1.336  0.076   0.076  0.297  0.466
          500        1.409  0.076   0.076  0.256  0.438
          SoilCrop WheatSoil: LL=[0.076, 0.084, 0.132, 0.243, 0.25]; KL=[0.06, 0.055, 0.04, 0.04, 0.03]; XF=[1, 1, 1, 1, 1]
            LL source: Field measured and checked for sensibility
        SoilWater: SummerDate=1-Nov; SummerU=2; SummerCona=2; WinterDate=1-Apr; WinterU=2; WinterCona=2; DiffusConst=88; DiffusSlope=35; Salb=0.13; CN2Bare=73; CNRed=20; CNCov=0.8; max_pond=0; Thickness=[100, 200, 300, 400, 500]; SWCON=[0.5, 0.5, 0.5, 0.5, 0.5]; PrecipitationInterception=0
        SoilNitrogen: same as Soil_Regions.CQ_Soils.north_vertosol_10oc_80_PAWC.SoilNitrogen
        Organic: FOMCNRatio=45
          Thickness  Carbon  SoilCNRatio  FBiom  FInert  FOM
          100        3.0082  12.5         0.035  0.5     662.454
          200        2.4063  12.5         0.02   0.6     444.056
          300        1.5041  12.5         0.015  0.8     243.703
          400        0.7527  12.5         0.015  0.95    109.503
          500        0.4511  12.5         0.01   0.95    40.2839
        Chemical
          Thickness  NO3N    NH4N    PH   EC
          100        0       0.1     6.6  0.3
          200        0       0.1     8.5  0.7
          300        0       0.1     9.1  1.1
          400        0       0.1     9.6  1.3
          500        0       0.1     9.6  1.5
          999999     999999  999999  -    -
        InitialWater: PercentMethod=0; FractionFull=0; RelativeTo=LL15
        Sample InitialNitrogen: Thickness=[100, 200, 300, 400, 500]; SWUnits=Volumetric; OCUnits=Total; PHUnits=Water
        CERESSoilTemperature
      Soil SA_sandilands_110_PAWC: SoilType=Clay loam; Site=VIC; NearestTown=Jil Jil; Region=Mallee; State=Victoria; Country=Australia; ApsoilNumber=728; Latitude=-35.8822; Longitude=142.99226; LocationAccuracy=+/- 1000m; Comments=Medium SSC; GPS at paddock scale only; BCG systems trial
        DataSource=Based on Soil Characterisation undertaken by Birchip Cropping Group during 2005
        Physical
          Thickness  BD     AirDry  LL15   DUL    SAT
          100        1.138  0.053   0.107  0.186  0.54
          200        1.237  0.085   0.107  0.201  0.503
          200        1.227  0.107   0.107  0.204  0.507
          500        1.32   0.107   0.107  0.234  0.472
          500        1.392  0.107   0.107  0.3    0.445
          500        1.452  0.107   0.107  0.313  0.422
          SoilCrop WheatSoil: LL=[0.107, 0.112, 0.134, 0.19, 0.25, 0.27]; KL=[0.06, 0.055, 0.04, 0.04, 0.03, 0.02]; XF=[1, 1, 1, 1, 1, 1]
            LL source: Field measured and checked for sensibility (layer 1, 2, 3, 4, 5)
        SoilWater: SummerDate=1-Nov; SummerU=2; SummerCona=2; WinterDate=1-Apr; WinterU=2; WinterCona=2; DiffusConst=88; DiffusSlope=35; Salb=0.13; CN2Bare=73; CNRed=20; CNCov=0.8; max_pond=0; Thickness=[100, 200, 200, 500, 500, 500]; SWCON=[0.5, 0.5, 0.5, 0.5, 0.5, 0.5]; PrecipitationInterception=0
        SoilNitrogen: same as Soil_Regions.CQ_Soils.north_vertosol_10oc_80_PAWC.SoilNitrogen
        Organic: FOMCNRatio=45
          Thickness  Carbon  SoilCNRatio  FBiom  FInert  FOM
          100        3.8363  12.5         0.035  0.5     549.617
          200        3.0693  12.5         0.02   0.6     407.167
          200        1.9188  12.5         0.015  0.8     301.636
          500        0.9594  12.5         0.015  0.95    142.483
          500        0.5759  12.5         0.01   0.95    67.3042
          500        0.3835  12.5         0.01   0.95    31.7922
        Chemical
          Thickness  NO3N  NH4N  PH   EC
          100        0     0.1   8.3  0.3
          200        0     0.1   8.8  0.7
          200        0     0.1   9.5  1.1
          500        0     0.1   10   1.3
          500        0     0.1   10   1.5
          500        0     0.1   10   1.5
        InitialWater: PercentMethod=0; FractionFull=0; RelativeTo=LL15
        Sample InitialNitrogen: Thickness=[100, 200, 200, 500, 500, 500]; SWUnits=Volumetric; OCUnits=Total; PHUnits=Water
        CERESSoilTemperature
      Soil SA_marrabel_190_PAWC: SoilType=5a; Site=Marrabel; State=SA; Country=Australia; LocationAccuracy=+/- 1000m; DataSource=Based on Soil Characterisation undertaken by GDAF
        Physical
          Thickness  BD     AirDry  LL15  DUL    SAT
          100        1.5    0.06    0.15  0.32   0.394
          150        1.5    0.096   0.19  0.33   0.394
          250        1.4    0.12    0.21  0.34   0.432
          200        1.5    0.12    0.26  0.35   0.394
          300        1.527  0.24    0.33  0.344  0.394
          500        1.512  0.26    0.35  0.35   0.4
          SoilCrop WheatSoil: same as Soil_Regions.SA_Solis.SA_ardrossan_155_PAWC.Physical.WheatSoil
        SoilWater: SummerDate=1-Nov; SummerU=2; SummerCona=2; WinterDate=1-Apr; WinterU=2; WinterCona=2; DiffusConst=88; DiffusSlope=35; Salb=0.13; CN2Bare=73; CNRed=20; CNCov=0.8; max_pond=0; Thickness=[100, 150, 250, 200, 300, 500]; SWCON=[0.5, 0.3, 0.3, 0.3, 0.1, 0.1]; PrecipitationInterception=0
        SoilNitrogen: same as Soil_Regions.CQ_Soils.north_vertosol_10oc_80_PAWC.SoilNitrogen
        Organic: FOMCNRatio=45
          Thickness  Carbon  SoilCNRatio  FBiom  FInert  FOM
          100        1.95    12.5         0.025  0.4     551.988
          150        1.04    12.5         0.021  0.5     408.923
          250        0.39    12.5         0.015  0.7     248.024
          200        0.13    12.5         0.011  0.9     166.256
          300        0.13    12.5         0.01   0.9     91.243
          500        0.13    12.5         0.01   1       33.5664
        Chemical
          Thickness  NO3N  NH4N   PH  EC
          100        0     2.009  8   0.3
          150        0     1.483  8   0.7
          250        0     0.862  8   1.1
          200        0     0.435  8   1.3
          300        0     0.217  8   1.5
          500        0     0.1    8   1.5
        InitialWater: PercentMethod=0; FractionFull=0; RelativeTo=LL15
        Sample InitialNitrogen: Thickness=[100, 150, 250, 200, 300, 500]; SWUnits=Volumetric; OCUnits=Total; PHUnits=Water
        CERESSoilTemperature
      Soil SA_siliceous_sand_42cm_40_PAWC: SoilType=1a; Site=Minnipa; State=SA; Country=Australia; LocationAccuracy=+/- 1000m; DataSource=Based on Soil Characterisation undertaken by GDAF
        Physical
          Thickness  BD     AirDry  LL15   DUL    SAT
          100        1.4    0.045   0.09   0.19   0.412
          150        1.5    0.07    0.1    0.21   0.374
          170        1.5    0.105   0.11   0.24   0.384
          280        1.605  0.072   0.09   0.156  0.25
          200        1.77   0.011   0.011  0.024  0.038
          400        1.7    0.23    0.28   0.29   0.318
          700        1.7    0.23    0.29   0.29   0.318
          SoilCrop WheatSoil: LL=[0.12, 0.12, 0.13, 0.163, 0.28, 0.29, 0.29]; KL=[0.06, 0.055, 0.04, 0.04, 0.03, 0.02, 0.02]; XF=[1, 1, 1, 1, 1, 1, 1]
            LL source: Field measured and checked for sensibility (layer 1, 2, 3, 4, 5)
        SoilWater: SummerDate=1-Nov; SummerU=2; SummerCona=2; WinterDate=1-Apr; WinterU=2; WinterCona=2; DiffusConst=88; DiffusSlope=35; Salb=0.13; CN2Bare=68; CNRed=20; CNCov=0.8; max_pond=0; Thickness=[100, 150, 170, 280, 200, 400, 700]; SWCON=[0.6, 0.5, 0.5, 0.5, 0.2, 0.2, 0.2]; PrecipitationInterception=0
        SoilNitrogen: same as Soil_Regions.CQ_Soils.north_vertosol_10oc_80_PAWC.SoilNitrogen
        Organic: FOMCNRatio=45
          Thickness  Carbon  SoilCNRatio  FBiom  FInert  FOM
          100        1.274   12.5         0.025  0.4     448.001
          150        0.013   12.5         0.021  0.5     357.736
          170        0.481   12.5         0.016  0.7     277.216
          280        0.429   12.5         0.011  0.9     182.144
          200        0.039   12.5         0.01   0.9     134.935
          400        0.169   12.5         0.01   1       74.0541
          700        0.013   12.5         0.01   1       25.9143
        Chemical
          Thickness  NO3N  NH4N   PH   EC
          100        0     2.009  7.7  0.3
          150        0     1.483  8    0.7
          170        0     0.966  8    1.1
          280        0     0.492  8    1.3
          200        0     0.243  8    1.5
          400        0     0.1    8    1.5
          700        0     0.1    8    1.5
        InitialWater: PercentMethod=0; FractionFull=0; RelativeTo=LL15
        Sample InitialNitrogen: Thickness=[100, 150, 170, 280, 200, 400, 700]; SWUnits=Volumetric; OCUnits=Total; PHUnits=Water
        CERESSoilTemperature
      Soil SA_siliceous_sand_25cm_32_PAWC: SoilType=1a; Site=Minnipa; State=SA; Country=Australia; LocationAccuracy=+/- 1000m; DataSource=Based on Soil Characterisation undertaken by GDAF
        Physical
          Thickness  BD    AirDry  LL15   DUL    SAT
          100        1.3   0.045   0.09   0.19   0.449
          150        1.4   0.078   0.12   0.27   0.422
          70         1.7   0.024   0.03   0.068  0.105
          170        1.54  0.07    0.09   0.176  0.274
          380        1.7   0.03    0.055  0.068  0.105
          450        1.8   0.01    0.01   0.01   0.01
          SoilCrop WheatSoil: same as Soil_Regions.SA_Solis.SA_ardrossan_155_PAWC.Physical.WheatSoil
        SoilWater: SummerDate=1-Nov; SummerU=2; SummerCona=2; WinterDate=1-Apr; WinterU=2; WinterCona=2; DiffusConst=88; DiffusSlope=35; Salb=0.13; CN2Bare=68; CNRed=20; CNCov=0.8; max_pond=0; Thickness=[100, 150, 70, 170, 380, 450]; SWCON=[0.6, 0.5, 0.5, 0.5, 0.5, 0]; PrecipitationInterception=0
        SoilNitrogen: same as Soil_Regions.CQ_Soils.north_vertosol_10oc_80_PAWC.SoilNitrogen
        Organic: FOMCNRatio=45
          Thickness  Carbon  SoilCNRatio  FBiom  FInert  FOM
          100        1.43    12.5         0.026  0.3     248.28
          150        0.65    12.5         0.022  0.5     248.168
          70         0.52    12.5         0.018  0.6     248.116
          170        0.26    12.5         0.015  0.8     247.99
          380        0.13    12.5         0.01   0.9     247.708
          450        0.13    12.5         0.01   1       247.374
          999999     -       12.5         -      -       12.3648
        Chemical
          Thickness  NO3N    NH4N    PH  EC
          100        0       2.057   8   0.3
          150        0       1.56    8   0.7
          70         0       1.172   8   1.1
          170        0       0.837   8   1.3
          380        0       0.361   8   1.5
          450        0       0.1     8   1.5
          999999     999999  999999  -   -
        InitialWater: PercentMethod=0; FractionFull=0; RelativeTo=LL15
        Sample InitialNitrogen: Thickness=[100, 150, 70, 170, 380, 450]; SWUnits=Volumetric; OCUnits=Total; PHUnits=Water
        CERESSoilTemperature
    Folder TAS_Soils
      Soil TAS_loam: SoilType=Loam; Site=Cressy; NearestTown=Cressy; Region=Central North; State=Tasmania; Country=Australia; NaturalVegetation=Agriculture; ApsoilNumber=659; Latitude=-41.687; Longitude=147.007; LocationAccuracy=+/- 20m; DataSource=Bill Cotching and Shaun Lisson, TIAR; Comments=Cressy 1
        Physical
          Thickness  BD    AirDry  LL15  DUL   SAT
          150        1.51  0.04    0.08  0.37  0.43
          140        1.66  0.04    0.05  0.32  0.37
          320        1.21  0.32    0.32  0.51  0.54
          190        1.54  0.31    0.31  0.41  0.419
          600        1.54  0.31    0.31  0.41  0.419
          SoilCrop WheatSoil: LL=[0.08, 0.05, 0.32, 0.31, 0.31]; KL=[0.16, 0.16, 0.16, 0.1, 0.05]; XF=[1, 1, 0.2, 0.1, 0.1]
            LL source: Laboratory measured
          SoilCrop CanolaSoil: LL=[0.08, 0.05, 0.32, 0.31, 0.31]; KL=[0.16, 0.16, 0.16, 0.1, 0.05]; XF=[1, 1, 0.2, 0.1, 0.1]
            LL source: Laboratory measured
          SoilCrop FieldpeaSoil: LL=[0.08, 0.05, 0.32, 0.31, 0.31]; KL=[0.16, 0.16, 0.16, 0.1, 0.05]; XF=[1, 1, 0.2, 0.1, 0.1]
            LL source: Laboratory measured
          SoilCrop LucerneSoil: LL=[0.08, 0.05, 0.32, 0.31, 0.31]; KL=[0.16, 0.16, 0.16, 0.1, 0.05]; XF=[1, 1, 0.2, 0.1, 0.1]
            LL source: Laboratory measured
          SoilCrop WeedSoil: LL=[0.08, 0.05, 0.32, 0.31, 0.31]; KL=[0.16, 0.16, 0.16, 0.1, 0.05]; XF=[1, 1, 0.2, 0.1, 0.1]
            LL source: Laboratory measured
          SoilCrop BroccoliSoil: LL=[0.08, 0.05, 0.32, 0.31, 0.31]; KL=[0.16, 0.16, 0.16, 0.1, 0.05]; XF=[1, 1, 0.2, 0.1, 0.1]
            LL source: Laboratory measured
        SoilWater: SummerDate=1-Nov; SummerU=6; SummerCona=3.5; WinterDate=1-Apr; WinterU=2; WinterCona=2; DiffusConst=88; DiffusSlope=36; Salb=0.1; CN2Bare=65; CNRed=20; CNCov=0.8; max_pond=0; Thickness=[150, 140, 320, 190, 600]; SWCON=[0.6, 0.6, 0.1, 0.1, 0.1]; PrecipitationInterception=0
        SoilNitrogen: same as Soil_Regions.CQ_Soils.north_vertosol_10oc_80_PAWC.SoilNitrogen
        Organic: FOMCNRatio=30
          Thickness  Carbon  SoilCNRatio  FBiom  FInert  FOM
          150        0.91    14.5         0.04   0.1     617.026
          140        0.91    14.5         0.04   0.1     457.104
          320        0.52    14.5         0.03   0.1     230.257
          190        0.52    14.5         0.01   0.1     153.247
          600        0.39    14.5         0.01   0.1     42.3657
        Chemical
          Thickness  NO3N  NH4N      PH
          150        0     1.3245    5
          140        0     0.860585  5
          320        0     0.516529  5
          190        0     0.341763  5
          600        0     0.108225  5
        Sample Initial nitrogen: Thickness=[150, 140, 320, 190, 600]; SWUnits=Volumetric; OCUnits=Total; PHUnits=Water
        InitialWater Initial water: PercentMethod=0; FractionFull=0; RelativeTo=LL15
        CERESSoilTemperature
      Soil TAS_fine_sandy_loam: SoilType=Fine sandy loam; Site=CRS Farm; NearestTown=Cressy; Region=Tasmania; NaturalVegetation=Agriculture; Latitude=0; Longitude=0; DataSource=Bill Cotching / Shaun Lisson
        InitialWater Initial water: PercentMethod=0; FractionFull=0; RelativeTo=LL15
        Physical
          Thickness  BD    AirDry  LL15  DUL   SAT
          160        1.44  0.04    0.08  0.37  0.45
          110        1.65  0.04    0.06  0.28  0.36
          330        1.15  0.38    0.38  0.55  0.56
          900        1.41  0.35    0.35  0.45  0.46
          SoilCrop PotatoSoil: LL=[0.08, 0.06, 0.38, 0.35]; KL=[0.16, 0.16, 0.1, 0.05]; XF=[0.9, 1, 0.3, 0.2]
          SoilCrop LucerneSoil: LL=[0.08, 0.06, 0.38, 0.35]; KL=[0.16, 0.16, 0.1, 0.05]; XF=[0.9, 1, 0.3, 0.2]
          SoilCrop NavybeanSoil: LL=[0.08, 0.06, 0.38, 0.35]; KL=[0.16, 0.16, 0.1, 0.05]; XF=[0.9, 1, 0.3, 0.2]
          SoilCrop CanolaSoil: LL=[0.08, 0.06, 0.38, 0.35]; KL=[0.16, 0.16, 0.1, 0.05]; XF=[0.9, 1, 0.3, 0.2]
          SoilCrop WheatSoil: LL=[0.08, 0.06, 0.38, 0.35]; KL=[0.16, 0.16, 0.1, 0.05]; XF=[0.9, 1, 0.2, 0.1]
          SoilCrop BroccoliSoil: LL=[0.08, 0.06, 0.38, 0.35]; KL=[0.16, 0.16, 0.1, 0.05]; XF=[0.9, 1, 0.3, 0.2]
        SoilWater: SummerDate=1-Nov; SummerU=6; SummerCona=3; WinterDate=1-Apr; WinterU=6; WinterCona=3; DiffusConst=88; DiffusSlope=36; Salb=0.1; CN2Bare=65; CNRed=20; CNCov=0.8; max_pond=0; Thickness=[160, 110, 330, 900]; SWCON=[0.6, 0.7, 0.4, 0.2]; PrecipitationInterception=0
        SoilNitrogen: same as Soil_Regions.CQ_Soils.north_vertosol_10oc_80_PAWC.SoilNitrogen
        Organic: FOMCNRatio=30
          Thickness  Carbon  SoilCNRatio  FBiom  FInert  FOM
          160        0.7     14.5         0.04   0.1     656.207
          110        0.7     14.5         0.04   0.1     526.618
          330        0.4     14.5         0.03   0.1     272.183
          900        0.2     14.5         0.01   0.1     44.9916
        Chemical
          Thickness  NO3N  NH4N      PH
          160        0     1.30208   5
          110        0     1.10193   5
          330        0     0.527009  5
          900        0     0.157604  5
        Sample Initial nitrogen: Thickness=[160, 110, 330, 900]; SWUnits=Volumetric; OCUnits=Total; PHUnits=Water
        CERESSoilTemperature
      Soil TAS_clay_loam: SoilType=Clay loam; Site=Reader Farm; NearestTown=Cressy; Region=Tasmania; NaturalVegetation=Agriculture; Latitude=0; Longitude=0; DataSource=Bill Cotching / Shaun Lisson
        InitialWater Initial water: PercentMethod=1; FractionFull=0; RelativeTo=LL15
        Physical
          Thickness  BD    AirDry  LL15  DUL   SAT
          200        1.37  0.12    0.25  0.45  0.48
          160        1.28  0.25    0.3   0.41  0.51
          120        1.23  0.4     0.4   0.48  0.53
          320        1.24  0.43    0.43  0.52  0.53
          SoilCrop WheatSoil: LL=[0.25, 0.3, 0.4, 0.43]; KL=[0.16, 0.16, 0.16, 0.1]; XF=[1, 1, 0.8, 0.3]
        SoilWater: SummerDate=1-Nov; SummerU=4; SummerCona=3; WinterDate=1-Apr; WinterU=4; WinterCona=3; DiffusConst=40; DiffusSlope=16; Salb=0.1; CN2Bare=70; CNRed=20; CNCov=0.8; max_pond=0; Thickness=[200, 160, 120, 320]; SWCON=[0.5, 0.5, 0.4, 0.2]; PrecipitationInterception=0
        SoilNitrogen: same as Soil_Regions.CQ_Soils.north_vertosol_10oc_80_PAWC.SoilNitrogen
        Organic: FOMCNRatio=30
          Thickness  Carbon  SoilCNRatio  FBiom  FInert  FOM
          200        0.7     14.5         0.04   0.1     748.447
          160        0.7     14.5         0.04   0.1     410.757
          120        0.4     14.5         0.03   0.1     261.91
          320        0.3     14.5         0.2    0.1     78.8858
        Chemical
          Thickness  NO3N  NH4N      PH
          200        0     1.09489   5
          160        0     0.976562  5
          120        0     1.35501   5
          320        0     0.504032  5
        Sample Initial nitrogen: Thickness=[200, 160, 120, 320]; SWUnits=Volumetric; OCUnits=Total; PHUnits=Water
        CERESSoilTemperature
      Soil TAS_red_ferrosol: ASCOrder=Ferrosol; ASCSubOrder=Red; SoilType=?; Site=Sassafras; NearestTown=Sassafras; Region=North West Coast; State=Tasmania; Country=Australia; ApsoilNumber=779; Latitude=-41.2766; Longitude=146.485; LocationAccuracy=+/- 20m
        DataSource=Data collected by Bill Cotching as part of project 'Landscape Logic' in collaboration with Shaun Lisson
        Comments=Site 7 (RR); A11, 0-15cm; Dark brown (7.5YR3/2); Clay loam; strong fine subangular blocky structure; very weak consistence (moist); few subangular gravels; few very fine roots; sharp smooth boundary; A12, 15-25cm; Dark brown (7.5YR3/2); Clay loam; strong
        Physical
          Thickness  BD       AirDry    LL15      DUL       SAT
          150        0.9      0.105     0.21      0.37      0.630377
          100        1.11     0.168     0.21      0.44      0.551132
          200        1.08     0.3       0.3       0.41      0.562453
          410        1.18     0.34      0.34      0.45      0.524717
          340        1.17629  0.345418  0.345418  0.476117  0.526117
          SoilCrop WheatSoil: LL=[0.229769, 0.23, 0.328788, 0.40698, 0.429506]; KL=[0.06, 0.06, 0.06, 0.04, 0.04]; XF=[1, 1, 1, 1, 1]
            LL source: Laboratory measured
          SoilCrop PoppySoil: LL=[0.21, 0.21, 0.3, 0.34, 0.345418]; KL=[0.06, 0.06, 0.06, 0.04, 0.04]; XF=[1, 1, 1, 1, 1]
            LL source: Laboratory measured
        SoilWater: SummerDate=1-Nov; SummerU=6; SummerCona=3.5; WinterDate=1-Apr; WinterU=4; WinterCona=2.5; DiffusConst=40; DiffusSlope=16; Salb=0.13; CN2Bare=73; CNRed=20; CNCov=0.8; max_pond=0; Thickness=[150, 100, 200, 410, 340]; SWCON=[0.5, 0.5, 0.5, 0.3, 0.3]; PrecipitationInterception=0
        SoilNitrogen: same as Soil_Regions.CQ_Soils.north_vertosol_10oc_80_PAWC.SoilNitrogen
        Organic: FOMCNRatio=40
          Thickness  Carbon  SoilCNRatio  FBiom  FInert  FOM
          150        6.435   12           0.035  0.4     401.109
          100        6.188   12           0.02   0.5     312.384
          200        2.691   12           0.015  0.7     189.47
          410        1.456   12           0.015  0.95    67.9813
          340        0.611   12           0.01   0.95    29.0562
        Chemical
          Thickness  NO3N  NH4N      PH   EC    ESP
          150        0     2.22222   6.6  0.17  0.771659
          100        0     1.8018    6.6  0.14  0.916758
          200        0     0.925926  5.8  0.11  1.70503
          410        0     0.206697  5.6  0.11  1.97445
          340        0     0.250038  5.6  0.1   3.7234
        InitialWater: PercentMethod=0; FractionFull=0; RelativeTo=LL15
        Sample InitialNitrogen: Thickness=[150, 100, 200, 410, 340]; SWUnits=Volumetric; OCUnits=Total; PHUnits=Water
        CERESSoilTemperature
      Soil TAS_medium_clay: SoilType=Clay; Site=Longford; NearestTown=Longford; Region=Central North; State=Tasmania; Country=Australia; NaturalVegetation=Agriculture; ApsoilNumber=651; Latitude=-41.623; Longitude=147.072; LocationAccuracy=+/- 20m; DataSource=Bill Cotching and Shaun Lisson, TIAR; Comments=Cressy 10
        Physical
          Thickness  BD    AirDry  LL15  DUL   SAT
          250        1.15  0.13    0.26  0.5   0.56
          200        1.35  0.22    0.24  0.47  0.49
          350        1.71  0.11    0.11  0.31  0.35
          300        1.97  0.15    0.15  0.25  0.257
          SoilCrop WheatSoil: LL=[0.26, 0.24, 0.11, 0.15]; KL=[0.16, 0.16, 0.1, 0.05]; XF=[1, 1, 0.5, 0.2]
            LL source: Laboratory measured
          SoilCrop CanolaSoil: LL=[0.26, 0.24, 0.11, 0.15]; KL=[0.16, 0.16, 0.1, 0.05]; XF=[0.9, 1, 0.5, 0.2]
            LL source: Laboratory measured
          SoilCrop FieldpeaSoil: LL=[0.26, 0.24, 0.11, 0.15]; KL=[0.16, 0.16, 0.1, 0.05]; XF=[0.9, 1, 0.5, 0.2]
            LL source: Laboratory measured
          SoilCrop LucerneSoil: LL=[0.26, 0.24, 0.11, 0.15]; KL=[0.16, 0.16, 0.1, 0.05]; XF=[0.9, 1, 0.5, 0.2]
            LL source: Laboratory measured
          SoilCrop WeedSoil: LL=[0.26, 0.24, 0.11, 0.15]; KL=[0.16, 0.16, 0.1, 0.05]; XF=[0.9, 1, 0.5, 0.2]
            LL source: Laboratory measured
          SoilCrop BroccoliSoil: LL=[0.26, 0.24, 0.11, 0.15]; KL=[0.16, 0.16, 0.1, 0.05]; XF=[0.9, 1, 0.5, 0.2]
            LL source: Laboratory measured
        SoilWater: SummerDate=1-Nov; SummerU=6; SummerCona=3.5; WinterDate=1-Apr; WinterU=2; WinterCona=2; DiffusConst=40; DiffusSlope=16; Salb=0.1; CN2Bare=70; CNRed=20; CNCov=0.8; max_pond=0; Thickness=[250, 200, 350, 300]; SWCON=[0.4, 0.5, 0.5, 0.2]; PrecipitationInterception=0
        SoilNitrogen: same as Soil_Regions.CQ_Soils.north_vertosol_10oc_80_PAWC.SoilNitrogen
        Organic: FOMCNRatio=30
          Thickness  Carbon  SoilCNRatio  FBiom  FInert  FOM
          250        0.91    14.5         0.04   0.1     788.992
          200        0.91    14.5         0.04   0.1     457.282
          350        0.52    14.5         0.03   0.1     176.048
          300        0.26    14.5         0.01   0.1     77.6781
        Chemical
          Thickness  NO3N  NH4N      PH
          250        0     1.04348   5
          200        0     0.740741  5
          350        0     0.334169  5
          300        0     0.338409  5
        Sample Initial nitrogen: Thickness=[250, 200, 350, 300]; SWUnits=Volumetric; OCUnits=Total; PHUnits=Water
        InitialWater Initial water: PercentMethod=0; FractionFull=0; RelativeTo=LL15
        CERESSoilTemperature
      Soil TAS_sandy_loam: ASCOrder=Podosol; ASCSubOrder=Aeric; SoilType=?; Site=Moriarty; NearestTown=Moriarty; Region=North West Coast; State=Tasmania; Country=Australia; ApsoilNumber=777; Latitude=-41.2095; Longitude=146.475; LocationAccuracy=+/- 20m
        DataSource=Data collected by Bill Cotching as part of project 'Landscape Logic' in collaboration with Shaun Lisson
        Comments=Site 1 (SR); A11, 0-14cm; Black (10YR2/1); Loamy sand; weak fine subangular blocky structure; moderately weak consistence (moist); common very fine roots; abrupt smooth boundary; A12, 14-29cm; Black (2.5Y2/0); loamy sand; massive parting to weak medium su
        Physical
          Thickness  BD    AirDry  LL15  DUL   SAT
          140        1.45  0.025   0.05  0.25  0.42283
          150        1.48  0.096   0.12  0.22  0.411509
          140        1.69  0.07    0.07  0.11  0.332264
          370        1.58  0.06    0.06  0.1   0.373774
          400        1.45  0.05    0.05  0.25  0.42283
          SoilCrop WheatSoil: LL=[0.05, 0.12, 0.07, 0.06, 0.05]; KL=[0.06, 0.06, 0.06, 0.04, 0.04]; XF=[1, 1, 1, 1, 1]
            LL source: Laboratory measured
        SoilWater: SummerDate=1-Nov; SummerU=6; SummerCona=3.5; WinterDate=1-Apr; WinterU=4; WinterCona=2.5; DiffusConst=88; DiffusSlope=35; Salb=0.16; CN2Bare=68; CNRed=20; CNCov=0.8; max_pond=0; Thickness=[140, 150, 140, 370, 400]; SWCON=[0.5, 0.5, 0.7, 0.7, 0.7]; PrecipitationInterception=0
        SoilNitrogen: same as Soil_Regions.CQ_Soils.north_vertosol_10oc_80_PAWC.SoilNitrogen
        Organic: FOMCNRatio=40
          Thickness  Carbon  SoilCNRatio  FBiom  FInert  FOM
          140        3.51    12           0.035  0.4     410.793
          150        3.536   12           0.02   0.5     282.334
          140        0.13    12           0.015  0.7     198.957
          370        0.013   12           0.015  0.95    78.8928
          400        1.261   12           0.01   0.95    29.023
        Chemical
          Thickness  NO3N  NH4N      PH   EC    ESP
          140        0     1.47783   5.7  0.12  0.707547
          150        0     0.900901  5.8  0.06  1.1655
          140        0     0.845309  5.8  0.03  3.44828
          370        0     0.171057  5.5  0.02  10.6061
          400        0     0.172414  5.2  0.04  7.54717
        Sample Initial nitrogen: Thickness=[140, 150, 140, 370, 400]; SWUnits=Volumetric; OCUnits=Total; PHUnits=Water
        InitialWater Initial water: PercentMethod=0; FractionFull=0; RelativeTo=LL15
        CERESSoilTemperature
    Folder SQldNNSW_Soils
      Soil south_vertosol_10oc_100_PAWC: ASCOrder=Vertosol; ASCSubOrder=Black; SoilType=Clay; Site=Generic-Qld; State=Generic; Country=Australia; ApsoilNumber=497-GENERIC; Latitude=-27.564333; Longitude=151.953991; LocationAccuracy=Regional Soil Type; DataSource=Generic soil.; Comments=Generic soil.
        Physical
          Thickness  BD    AirDry  LL15   DUL   SAT
          150        0.99  0.1     0.305  0.51  0.6
          150        1.06  0.1525  0.31   0.49  0.57
          300        1.13  0.3     0.33   0.47  0.54
          SoilCrop WheatSoil: LL=[0.305, 0.31, 0.33]; KL=[0.06, 0.06, 0.06]; XF=[1, 1, 1]
            LL source: Estimated based on local knowledge
          SoilCrop PeanutSoil: LL=[0.305, 0.31, 0.33]; KL=[0.08, 0.08, 0.08]; XF=[1, 1, 1]
          SoilCrop SunflowerSoil: LL=[0.305, 0.31, 0.33]; KL=[0.08, 0.08, 0.08]; XF=[1, 1, 1]
          SoilCrop MaizeSoil: LL=[0.305, 0.31, 0.33]; KL=[0.06, 0.06, 0.06]; XF=[1, 1, 1]
          SoilCrop SorghumSoil: LL=[0.305, 0.31, 0.33]; KL=[0.06, 0.06, 0.06]; XF=[1, 1, 1]
          SoilCrop CottonSoil: LL=[0.305, 0.31, 0.33]; KL=[0.08, 0.08, 0.08]; XF=[1, 1, 1]
          SoilCrop MungbeanSoil: LL=[0.305, 0.31, 0.33]; KL=[0.08, 0.08, 0.08]; XF=[1, 1, 1]
          SoilCrop ChickpeaSoil: LL=[0.305, 0.31, 0.33]; KL=[0.08, 0.08, 0.08]; XF=[1, 1, 1]
          SoilCrop CanolaSoil: LL=[0.305, 0.31, 0.33]; KL=[0.08, 0.08, 0.08]; XF=[1, 1, 1]
          SoilCrop RiceSoil: LL=[0.305, 0.31, 0.33]; KL=[0.08, 0.08, 0.08]; XF=[1, 1, 1]
          SoilCrop SoybeanSoil: LL=[0.305, 0.31, 0.33]; KL=[0.08, 0.08, 0.08]; XF=[1, 1, 1]
        SoilWater: SummerDate=1-Nov; SummerU=6; SummerCona=3.5; WinterDate=1-Apr; WinterU=4; WinterCona=2.5; DiffusConst=40; DiffusSlope=16; Salb=0.12; CN2Bare=73; CNRed=20; CNCov=0.8; max_pond=0; Thickness=[150, 150, 300]; SWCON=[0.5, 0.5, 0.5]; PrecipitationInterception=0
        SoilNitrogen: same as Soil_Regions.CQ_Soils.north_vertosol_10oc_80_PAWC.SoilNitrogen
        Organic: FOMCNRatio=50
          Thickness  Carbon  SoilCNRatio  FBiom  FInert  FOM
          150        1.3     12.5         0.025  0.4     633.808
          150        1.04    12.5         0.012  0.5     299.39
          300        0.78    12.5         0.005  0.6     66.8028
        Chemical
          Thickness  NO3N  NH4N  PH   EC
          150        0     1     8.2  0.2
          150        0     0.5   8.7  0.3
          300        0     0.3   8.9  0.3
        InitialWater: PercentMethod=0; FractionFull=0; RelativeTo=LL15
        Sample InitialNitrogen: Thickness=[150, 150, 300]; SWUnits=Volumetric; OCUnits=Total; PHUnits=Water
        CERESSoilTemperature
      Soil south_vertosol_10oc_150_PAWC: ASCOrder=Vertosol; ASCSubOrder=Black; SoilType=Clay; Site=Generic-Qld; State=Generic; Country=Australia; ApsoilNumber=497-GENERIC; Latitude=-27.564333; Longitude=151.953991; LocationAccuracy=Regional Soil Type; DataSource=Generic soil.; Comments=Generic soil.
        Physical
          Thickness  BD    AirDry  LL15   DUL    SAT
          150        0.99  0.1     0.29   0.525  0.6
          150        1.06  0.1525  0.3    0.51   0.57
          300        1.13  0.3     0.315  0.505  0.54
          150        1.11  0.31    0.325  0.5    0.55
          SoilCrop WheatSoil: LL=[0.29, 0.3, 0.315, 0.325]; KL=[0.06, 0.06, 0.06, 0.06]; XF=[1, 1, 1, 1]
            LL source: Estimated based on local knowledge
          SoilCrop PeanutSoil: LL=[0.28, 0.3, 0.32, 0.33]; KL=[0.08, 0.08, 0.08, 0.08]; XF=[1, 1, 1, 1]
          SoilCrop SunflowerSoil: LL=[0.28, 0.3, 0.32, 0.33]; KL=[0.08, 0.08, 0.08, 0.08]; XF=[1, 1, 1, 1]
          SoilCrop MaizeSoil: LL=[0.29, 0.3, 0.315, 0.325]; KL=[0.06, 0.06, 0.06, 0.06]; XF=[1, 1, 1, 1]
          SoilCrop SorghumSoil: LL=[0.29, 0.3, 0.315, 0.325]; KL=[0.06, 0.06, 0.06, 0.06]; XF=[1, 1, 1, 1]
          SoilCrop CottonSoil: LL=[0.28, 0.3, 0.32, 0.33]; KL=[0.08, 0.08, 0.08, 0.08]; XF=[1, 1, 1, 1]
          SoilCrop MungbeanSoil: LL=[0.28, 0.3, 0.32, 0.33]; KL=[0.08, 0.08, 0.08, 0.08]; XF=[1, 1, 1, 1]
          SoilCrop ChickpeaSoil: LL=[0.28, 0.3, 0.32, 0.33]; KL=[0.08, 0.08, 0.08, 0.08]; XF=[1, 1, 1, 1]
          SoilCrop RiceSoil: LL=[0.28, 0.3, 0.32, 0.33]; KL=[0.08, 0.08, 0.08, 0.08]; XF=[1, 1, 1, 1]
          SoilCrop CanolaSoil: LL=[0.28, 0.3, 0.32, 0.33]; KL=[0.08, 0.08, 0.08, 0.08]; XF=[1, 1, 1, 1]
          SoilCrop SoybeanSoil: LL=[0.28, 0.3, 0.32, 0.33]; KL=[0.08, 0.08, 0.08, 0.08]; XF=[1, 1, 1, 1]
        SoilWater: SummerDate=1-Nov; SummerU=6; SummerCona=3.5; WinterDate=1-Apr; WinterU=4; WinterCona=2.5; DiffusConst=40; DiffusSlope=16; Salb=0.12; CN2Bare=73; CNRed=20; CNCov=0.8; max_pond=0; Thickness=[150, 150, 300, 150]; SWCON=[0.5, 0.5, 0.5, 0.5]; PrecipitationInterception=0
        SoilNitrogen: same as Soil_Regions.CQ_Soils.north_vertosol_10oc_80_PAWC.SoilNitrogen
        Organic: FOMCNRatio=50
          Thickness  Carbon  SoilCNRatio  FBiom  FInert  FOM
          150        1.3     12.5         0.025  0.4     554.069
          150        1.04    12.5         0.012  0.5     304.08
          300        0.78    12.5         0.005  0.6     91.587
          150        0.65    12.5         0.005  0.8     50.264
        Chemical
          Thickness  NO3N  NH4N  PH   EC
          150        0     1     8.2  0.2
          150        0     0.5   8.7  0.3
          300        0     0.3   8.9  0.3
          150        0     0.2   8.1  0.4
        InitialWater: PercentMethod=0; FractionFull=0; RelativeTo=LL15
        Sample InitialNitrogen: Thickness=[150, 150, 300, 150]; SWUnits=Volumetric; OCUnits=Total; PHUnits=Water
        CERESSoilTemperature
      Soil south_vertosol_10oc_190_PAWC: ASCOrder=Vertosol; ASCSubOrder=Black; SoilType=Clay; Site=Generic-Qld; State=Generic; Country=Australia; ApsoilNumber=497-GENERIC; Latitude=-27.564333; Longitude=151.953991; LocationAccuracy=Regional Soil Type; DataSource=Generic soil.; Comments=Generic soil.
        Physical
          Thickness  BD    AirDry  LL15   DUL    SAT
          150        0.99  0.1     0.29   0.525  0.6
          150        1.06  0.1525  0.29   0.52   0.57
          300        1.13  0.3     0.305  0.515  0.54
          300        1.11  0.31    0.32   0.51   0.55
          SoilCrop WheatSoil: LL=[0.29, 0.29, 0.305, 0.32]; KL=[0.06, 0.06, 0.06, 0.06]; XF=[1, 1, 1, 1]
            LL source: Estimated based on local knowledge
          SoilCrop PeanutSoil: LL=[0.28, 0.29, 0.305, 0.325]; KL=[0.08, 0.08, 0.08, 0.08]; XF=[1, 1, 1, 1]
          SoilCrop SunflowerSoil: LL=[0.28, 0.29, 0.305, 0.325]; KL=[0.08, 0.08, 0.08, 0.08]; XF=[1, 1, 1, 1]
          SoilCrop MaizeSoil: LL=[0.29, 0.29, 0.305, 0.32]; KL=[0.06, 0.06, 0.06, 0.06]; XF=[1, 1, 1, 1]
          SoilCrop SorghumSoil: LL=[0.29, 0.29, 0.305, 0.32]; KL=[0.06, 0.06, 0.06, 0.06]; XF=[1, 1, 1, 1]
          SoilCrop CottonSoil: LL=[0.28, 0.29, 0.305, 0.325]; KL=[0.08, 0.08, 0.08, 0.08]; XF=[1, 1, 1, 1]
          SoilCrop MungbeanSoil: LL=[0.28, 0.29, 0.305, 0.325]; KL=[0.08, 0.08, 0.08, 0.08]; XF=[1, 1, 1, 1]
          SoilCrop ChickpeaSoil: LL=[0.28, 0.29, 0.305, 0.325]; KL=[0.08, 0.08, 0.08, 0.08]; XF=[1, 1, 1, 1]
          SoilCrop RiceSoil: LL=[0.28, 0.29, 0.305, 0.325]; KL=[0.08, 0.08, 0.08, 0.08]; XF=[1, 1, 1, 1]
          SoilCrop CanolaSoil: LL=[0.28, 0.29, 0.305, 0.325]; KL=[0.08, 0.08, 0.08, 0.08]; XF=[1, 1, 1, 1]
          SoilCrop SoybeanSoil: LL=[0.28, 0.29, 0.305, 0.325]; KL=[0.08, 0.08, 0.08, 0.08]; XF=[1, 1, 1, 1]
        SoilWater: SummerDate=1-Nov; SummerU=6; SummerCona=3.5; WinterDate=1-Apr; WinterU=4; WinterCona=2.5; DiffusConst=40; DiffusSlope=16; Salb=0.12; CN2Bare=73; CNRed=20; CNCov=0.8; max_pond=0; Thickness=[150, 150, 300, 300]; SWCON=[0.5, 0.5, 0.5, 0.5]; PrecipitationInterception=0
        SoilNitrogen: same as Soil_Regions.CQ_Soils.north_vertosol_10oc_80_PAWC.SoilNitrogen
        Organic: FOMCNRatio=50
          Thickness  Carbon  SoilCNRatio  FBiom  FInert  FOM
          150        1.3     12.5         0.025  0.4     523.082
          150        1.04    12.5         0.012  0.5     317.265
          300        0.78    12.5         0.005  0.6     116.715
          300        0.65    12.5         0.005  0.8     42.9372
        Chemical
          Thickness  NO3N  NH4N  PH   EC
          150        0     1     8.2  0.2
          150        0     0.5   8.7  0.3
          300        0     0.3   8.9  0.3
          300        0     0.2   8.1  0.4
        InitialWater: PercentMethod=0; FractionFull=0; RelativeTo=LL15
        Sample InitialNitrogen: Thickness=[150, 150, 300, 300]; SWUnits=Volumetric; OCUnits=Total; PHUnits=Water
        CERESSoilTemperature
      Soil south_vertosol_10oc_240_PAWC: ASCOrder=Vertosol; ASCSubOrder=Black; SoilType=Clay; Site=Generic-Qld; State=Generic; Country=Australia; ApsoilNumber=497-GENERIC; Latitude=-27.564333; Longitude=151.953991; LocationAccuracy=Regional Soil Type; DataSource=Generic soil.; Comments=Generic soil.
        Physical
          Thickness  BD    AirDry  LL15  DUL    SAT
          150        0.99  0.1     0.28  0.51   0.6
          150        1.06  0.153   0.3   0.51   0.57
          300        1.13  0.3     0.31  0.5    0.54
          300        1.11  0.31    0.32  0.495  0.55
          300        1.12  0.32    0.33  0.49   0.55
          100        1.15  0.35    0.35  0.49   0.53
          SoilCrop WheatSoil: LL=[0.28, 0.3, 0.31, 0.32, 0.33, 0.35]; KL=[0.06, 0.06, 0.06, 0.06, 0.05, 0.04]; XF=[1, 1, 1, 1, 1, 1]
            LL source: Estimated based on local knowledge
          SoilCrop PeanutSoil: LL=[0.26, 0.28, 0.31, 0.33, 0.34, 0.35]; KL=[0.08, 0.08, 0.08, 0.08, 0.07, 0.06]; XF=[1, 1, 1, 1, 1, 1]
          SoilCrop SunflowerSoil: LL=[0.26, 0.28, 0.31, 0.33, 0.34, 0.35]; KL=[0.08, 0.08, 0.08, 0.08, 0.07, 0.06]; XF=[1, 1, 1, 1, 1, 1]
          SoilCrop MaizeSoil: LL=[0.28, 0.3, 0.31, 0.32, 0.33, 0.35]; KL=[0.1, 0.1, 0.08, 0.06, 0.05, 0.03]; XF=[1, 1, 1, 1, 1, 1]
          SoilCrop SorghumSoil: LL=[0.28, 0.3, 0.31, 0.32, 0.33, 0.35]; KL=[0.1, 0.1, 0.08, 0.06, 0.05, 0.03]; XF=[1, 1, 1, 1, 1, 1]
          SoilCrop CottonSoil: LL=[0.26, 0.28, 0.31, 0.33, 0.34, 0.35]; KL=[0.08, 0.08, 0.08, 0.08, 0.07, 0.06]; XF=[1, 1, 1, 1, 1, 1]
          SoilCrop MungbeanSoil: LL=[0.26, 0.28, 0.31, 0.33, 0.34, 0.35]; KL=[0.08, 0.08, 0.08, 0.08, 0.07, 0.06]; XF=[1, 1, 1, 1, 1, 1]
          SoilCrop ChickpeaSoil: LL=[0.26, 0.28, 0.31, 0.33, 0.34, 0.35]; KL=[0.08, 0.08, 0.08, 0.08, 0.07, 0.06]; XF=[1, 1, 1, 1, 1, 1]
          SoilCrop RiceSoil: LL=[0.26, 0.28, 0.31, 0.33, 0.34, 0.35]; KL=[0.08, 0.08, 0.08, 0.08, 0.07, 0.06]; XF=[1, 1, 1, 1, 1, 1]
          SoilCrop CanolaSoil: LL=[0.26, 0.28, 0.31, 0.33, 0.34, 0.35]; KL=[0.08, 0.08, 0.08, 0.08, 0.07, 0.06]; XF=[1, 1, 1, 1, 1, 1]
          SoilCrop SoybeanSoil: LL=[0.26, 0.28, 0.31, 0.33, 0.34, 0.35]; KL=[0.08, 0.08, 0.08, 0.08, 0.07, 0.06]; XF=[1, 1, 1, 1, 1, 1]
        SoilWater: SummerDate=1-Nov; SummerU=6; SummerCona=3.5; WinterDate=1-Apr; WinterU=4; WinterCona=2.5; DiffusConst=40; DiffusSlope=16; Salb=0.12; CN2Bare=73; CNRed=20; CNCov=0.8; max_pond=0; Thickness=[150, 150, 300, 300, 300, 100]; SWCON=[0.5, 0.5, 0.5, 0.5, 0.5, 0.5]; PrecipitationInterception=0
        SoilNitrogen: same as Soil_Regions.CQ_Soils.north_vertosol_10oc_80_PAWC.SoilNitrogen
        Organic: FOMCNRatio=50
          Thickness  Carbon  SoilCNRatio  FBiom  FInert  FOM
          150        1.3     12.5         0.025  0.4     417.087
          150        1.04    12.5         0.012  0.5     295.049
          300        0.78    12.5         0.005  0.6     147.648
          300        0.65    12.5         0.005  0.8     73.8862
          300        0.52    12.5         0.005  0.9     36.9741
          100        0.52    12.5         0.005  0.9     29.3546
        Chemical
          Thickness  NO3N  NH4N  PH   EC
          150        0     1     8.2  0.2
          150        0     0.5   8.7  0.3
          300        0     0.3   8.9  0.3
          300        0     0.2   8.1  0.4
          300        0     0.2   8    0.6
          100        0     0.6   8    0.8
        InitialWater: PercentMethod=0; FractionFull=0; RelativeTo=LL15
        Sample InitialNitrogen: Thickness=[150, 150, 300, 300, 300, 100]; SWUnits=Volumetric; OCUnits=Total; PHUnits=Water
        CERESSoilTemperature
      Soil south_vertosol_10oc_290_PAWC: ASCOrder=Vertosol; ASCSubOrder=Black; SoilType=Clay; Site=Generic-Qld; State=Generic; Country=Australia; ApsoilNumber=497-GENERIC; Latitude=-27.564333; Longitude=151.953991; LocationAccuracy=Regional Soil Type; DataSource=Generic soil.; Comments=Generic soil.
        Physical
          Thickness  BD    AirDry  LL15   DUL    SAT
          150        0.99  0.1     0.3    0.51   0.6
          150        1.06  0.1525  0.305  0.5    0.57
          300        1.13  0.3     0.315  0.495  0.54
          300        1.11  0.32    0.325  0.495  0.55
          300        1.12  0.34    0.34   0.49   0.55
          300        1.15  0.35    0.355  0.49   0.53
          300        1.19  0.36    0.36   0.49   0.52
          SoilCrop WheatSoil: LL=[0.3, 0.305, 0.315, 0.325, 0.34, 0.355, 0.36]; KL=[0.06, 0.06, 0.06, 0.04, 0.04, 0.02, 0.02]; XF=[1, 1, 1, 1, 1, 1, 1]
            LL source: Estimated based on local knowledge
          SoilCrop PeanutSoil: LL=[0.28, 0.29, 0.31, 0.33, 0.35, 0.36, 0.365]; KL=[0.08, 0.08, 0.08, 0.08, 0.07, 0.06, 0.05]; XF=[1, 1, 1, 1, 1, 1, 1]
          SoilCrop SunflowerSoil: LL=[0.28, 0.29, 0.31, 0.33, 0.35, 0.36, 0.365]; KL=[0.08, 0.08, 0.08, 0.08, 0.07, 0.06, 0.05]; XF=[1, 1, 1, 1, 1, 1, 1]
          SoilCrop MaizeSoil: LL=[0.3, 0.305, 0.315, 0.325, 0.34, 0.355, 0.36]; KL=[0.1, 0.1, 0.08, 0.06, 0.05, 0.03, 0.01]; XF=[1, 1, 1, 1, 1, 1, 1]
          SoilCrop SorghumSoil: LL=[0.3, 0.305, 0.315, 0.325, 0.34, 0.355, 0.36]; KL=[0.08, 0.08, 0.08, 0.08, 0.06, 0.04, 0.02]; XF=[1, 1, 1, 1, 1, 1, 1]
          SoilCrop CottonSoil: LL=[0.28, 0.29, 0.31, 0.33, 0.35, 0.36, 0.365]; KL=[0.08, 0.08, 0.08, 0.08, 0.07, 0.06, 0.05]; XF=[1, 1, 1, 1, 1, 1, 1]
          SoilCrop MungbeanSoil: LL=[0.28, 0.29, 0.31, 0.33, 0.35, 0.36, 0.365]; KL=[0.08, 0.08, 0.08, 0.08, 0.07, 0.06, 0.05]; XF=[1, 1, 1, 1, 1, 1, 1]
          SoilCrop ChickpeaSoil: LL=[0.28, 0.29, 0.31, 0.33, 0.35, 0.36, 0.365]; KL=[0.08, 0.08, 0.08, 0.08, 0.07, 0.06, 0.05]; XF=[1, 1, 1, 1, 1, 1, 1]
          SoilCrop RiceSoil: LL=[0.28, 0.29, 0.31, 0.33, 0.35, 0.36, 0.365]; KL=[0.08, 0.08, 0.08, 0.08, 0.07, 0.06, 0.05]; XF=[1, 1, 1, 1, 1, 1, 1]
          SoilCrop CanolaSoil: LL=[0.28, 0.29, 0.31, 0.33, 0.35, 0.36, 0.365]; KL=[0.08, 0.08, 0.08, 0.08, 0.07, 0.06, 0.05]; XF=[1, 1, 1, 1, 1, 1, 1]
          SoilCrop SoybeanSoil: LL=[0.28, 0.29, 0.31, 0.33, 0.35, 0.36, 0.365]; KL=[0.08, 0.08, 0.08, 0.08, 0.07, 0.06, 0.05]; XF=[1, 1, 1, 1, 1, 1, 1]
        SoilWater: SummerDate=1-Nov; SummerU=6; SummerCona=3.5; WinterDate=1-Apr; WinterU=4; WinterCona=2.5; DiffusConst=40; DiffusSlope=16; Salb=0.12; CN2Bare=73; CNRed=20; CNCov=0.8; max_pond=0; Thickness=[150, 150, 300, 300, 300, 300, 300]; SWCON=[0.5, 0.5, 0.5, 0.5, 0.5, 0.5, 0.5]; PrecipitationInterception=0
        SoilNitrogen: same as Soil_Regions.CQ_Soils.north_vertosol_10oc_80_PAWC.SoilNitrogen
        Organic: FOMCNRatio=50
          Thickness  Carbon  SoilCNRatio  FBiom  FInert  FOM
          150        1.3     12.5         0.025  0.4     347.129
          150        1.04    12.5         0.012  0.5     270.344
          300        0.78    12.5         0.005  0.6     163.972
          300        0.65    12.5         0.005  0.8     99.4541
          300        0.52    12.5         0.005  0.9     60.322
          300        0.52    12.5         0.005  0.9     36.5871
          300        0.52    12.5         0.005  0.9     22.1912
        Chemical
          Thickness  NO3N  NH4N  PH   EC
          150        0     1     8.2  0.2
          150        0     0.5   8.7  0.3
          300        0     0.3   8.9  0.3
          300        0     0.2   8.1  0.4
          300        0     0.2   8    0.6
          300        0     0.2   8    0.8
          300        0     0.2   8    0.9
        InitialWater: PercentMethod=0; FractionFull=0; RelativeTo=LL15
        Sample InitialNitrogen: Thickness=[150, 150, 300, 300, 300, 300, 300]; SWUnits=Volumetric; OCUnits=Total; PHUnits=Water
        CERESSoilTemperature
    Folder NQld_Soils
      Soil NQld_yellow_dermosol_135_PAWC: ASCOrder=Dermosol; ASCSubOrder=Yellow; SoilType=?; Site=Tully; NearestTown=Tully; Region=North Tropical Coast and Tablelands; State=Queensland; Country=Australia; ApsoilNumber=647; Latitude=-17.935; Longitude=145.923; LocationAccuracy=Regional Soil Type; DataSource=M.G. Cannon
        Comments=74656 reference site. TU-03; Cannon etal 1992, Soils of the Cardwell-Tully Area, North Queensland; 1. Thorburn, P.J., Jakku, E., Webster, A.J. and Everingham, Y.L. (2011). Agricultural decision support systems facilitating co-learning: a case study on environmental impacts of sugarcane production. International Journal of Agricultural Sustainability, 9, 322-333 (doi: 10.1080/14735903.2011. 582359).
        Physical
          Thickness  BD    AirDry  LL15   DUL    SAT
          150        1.62  0.05    0.1    0.22   0.363
          150        1.57  0.05    0.135  0.24   0.38
          150        1.53  0.05    0.175  0.26   0.395
          150        1.52  0.05    0.188  0.265  0.395
          300        1.52  0.05    0.18   0.265  0.397
          300        1.6   0.05    0.14   0.22   0.37
          300        1.58  0.05    0.145  0.235  0.375
          SoilCrop SugarSoil: LL=[0.1, 0.135, 0.175, 0.188, 0.18, 0.14, 0.145]; KL=[0.1, 0.1, 0.1, 0.1, 0.08, 0.08, 0.04]; XF=[1, 1, 1, 1, 1, 0.5, 0.2]
            LL source: Estimated based on local knowledge
          SoilCrop RiceSoil: LL=[0.1, 0.135, 0.175, 0.188, 0.18, 0.14, 0.145]; KL=[0.1, 0.1, 0.1, 0.1, 0.08, 0.08, 0.04]; XF=[1, 1, 1, 1, 1, 0.5, 0.2]
          SoilCrop MungbeanSoil: LL=[0.1, 0.135, 0.175, 0.188, 0.18, 0.14, 0.145]; KL=[0.1, 0.1, 0.1, 0.1, 0.08, 0.08, 0.04]; XF=[1, 1, 1, 1, 1, 0.5, 0.2]
          SoilCrop ChickpeaSoil: LL=[0.1, 0.135, 0.175, 0.188, 0.18, 0.14, 0.145]; KL=[0.1, 0.1, 0.1, 0.1, 0.08, 0.08, 0.04]; XF=[1, 1, 1, 1, 1, 0.5, 0.2]
          SoilCrop SoybeanSoil: LL=[0.1, 0.135, 0.175, 0.188, 0.18, 0.14, 0.145]; KL=[0.1, 0.1, 0.1, 0.1, 0.08, 0.08, 0.04]; XF=[1, 1, 1, 1, 1, 0.5, 0.2]
          SoilCrop SorghumSoil: LL=[0.1, 0.135, 0.175, 0.188, 0.18, 0.14, 0.145]; KL=[0.1, 0.1, 0.1, 0.1, 0.08, 0.08, 0.04]; XF=[1, 1, 1, 1, 1, 0.5, 0.2]
          SoilCrop MaizeSoil: LL=[0.1, 0.135, 0.175, 0.188, 0.18, 0.14, 0.145]; KL=[0.1, 0.1, 0.1, 0.1, 0.08, 0.08, 0.04]; XF=[1, 1, 1, 1, 1, 0.5, 0.2]
          SoilCrop WheatSoil: LL=[0.1, 0.135, 0.175, 0.188, 0.18, 0.14, 0.145]; KL=[0.1, 0.1, 0.1, 0.1, 0.08, 0.08, 0.04]; XF=[1, 1, 1, 1, 1, 0.5, 0.2]
          SoilCrop PeanutSoil: LL=[0.1, 0.135, 0.175, 0.188, 0.18, 0.14, 0.145]; KL=[0.1, 0.1, 0.1, 0.1, 0.08, 0.08, 0.04]; XF=[1, 1, 1, 1, 1, 0.5, 0.2]
        SoilWater: SummerDate=1-Nov; SummerU=4; SummerCona=3; WinterDate=1-Apr; WinterU=4; WinterCona=3; DiffusConst=88; DiffusSlope=35.4; Salb=0.28; CN2Bare=64; CNRed=10; CNCov=0.8; max_pond=0; Thickness=[150, 150, 150, 150, 300, 300, 300]; SWCON=[0.4, 0.4, 0.4, 0.5, 0.6, 0.6, 0.7]; PrecipitationInterception=0
        SoilNitrogen: same as Soil_Regions.CQ_Soils.north_vertosol_10oc_80_PAWC.SoilNitrogen
        Organic: FOMCNRatio=70
          Thickness  Carbon  SoilCNRatio  FBiom  FInert  FOM
          150        1.5     18           0.12   0.3     964.943
          150        0.7     18           0.1    0.4     714.847
          150        0.37    18           0.05   0.6     529.572
          150        0.21    18           0.01   0.9     392.317
          300        0.21    18           0.01   0.9     215.308
          300        0.21    18           0.01   0.9     118.163
          300        0.21    18           0.01   0.9     64.8495
        Chemical
          Thickness  NO3N  NH4N  PH
          150        0     1.5   6.35
          150        0     1     6.75
          150        0     0.8   6.25
          150        0     0.7   6.2
          300        0     0.6   6.1
          300        0     0.5   5.9
          300        0     0.5   6
        InitialWater: PercentMethod=0; FractionFull=0; RelativeTo=LL15
        Sample InitialNitrogen: Thickness=[150, 150, 150, 150, 300, 300, 300]; SWUnits=Volumetric; OCUnits=Total; PHUnits=Water
        CERESSoilTemperature
      Soil NQld_brown_dermosol_200_PAWC: ASCOrder=Dermosol; ASCSubOrder=Brown; SoilType=?; Site=Tully; NearestTown=Tully; Region=North Tropical Coast and Tablelands; State=Queensland; Country=Australia; ApsoilNumber=648; Latitude=-17.935; Longitude=145.923; LocationAccuracy=Regional Soil Type; DataSource=M.G. Cannon
        Comments=Coom site. TU-02; Cannon etal 1992, Soils of the Cardwell-Tully Area, North Queensland; 1. Thorburn, P.J., Jakku, E., Webster, A.J. and Everingham, Y.L. (2011). Agricultural decision support systems facilitating co-learning: a case study on environmental impacts of sugarcane production. International Journal of Agricultural Sustainability, 9, 322-333 (doi: 10.1080/14735903.2011. 582359).; 1. Thorburn, P.J., Jakku, E., Webster, A.J. and Everingham, Y.L. (2011). Agricultural decision support systems facilitating co-learning: a case study on environmental impacts of sugarcane production. International Journal of Agricultural Sustainability, 9, 322-333 (doi: 10.1080/14735903.2011. 582359).
        Physical
          Thickness  BD    AirDry  LL15  DUL   SAT
          100        1.3   0.05    0.23  0.37  0.46
          150        1.33  0.05    0.22  0.36  0.45
          250        1.37  0.05    0.22  0.35  0.43
          250        1.33  0.05    0.22  0.36  0.45
          250        1.36  0.05    0.22  0.35  0.44
          250        1.33  0.05    0.22  0.36  0.45
          250        1.37  0.05    0.22  0.35  0.43
          SoilCrop SugarSoil: LL=[0.23, 0.22, 0.22, 0.22, 0.22, 0.22, 0.22]; KL=[0.16, 0.16, 0.16, 0.16, 0.12, 0.08, 0.04]; XF=[1, 1, 1, 1, 1, 0.5, 0.2]
            LL source: Estimated based on local knowledge
          SoilCrop RiceSoil: LL=[0.23, 0.22, 0.22, 0.22, 0.22, 0.22, 0.22]; KL=[0.16, 0.16, 0.16, 0.16, 0.12, 0.08, 0.04]; XF=[1, 1, 1, 1, 1, 0.5, 0.2]
          SoilCrop MungbeanSoil: LL=[0.23, 0.22, 0.22, 0.22, 0.22, 0.22, 0.22]; KL=[0.16, 0.16, 0.16, 0.16, 0.12, 0.08, 0.04]; XF=[1, 1, 1, 1, 1, 0.5, 0.2]
          SoilCrop ChickpeaSoil: LL=[0.23, 0.22, 0.22, 0.22, 0.22, 0.22, 0.22]; KL=[0.16, 0.16, 0.16, 0.16, 0.12, 0.08, 0.04]; XF=[1, 1, 1, 1, 1, 0.5, 0.2]
          SoilCrop SoybeanSoil: LL=[0.23, 0.22, 0.22, 0.22, 0.22, 0.22, 0.22]; KL=[0.16, 0.16, 0.16, 0.16, 0.12, 0.08, 0.04]; XF=[1, 1, 1, 1, 1, 0.5, 0.2]
          SoilCrop MaizeSoil: LL=[0.23, 0.22, 0.22, 0.22, 0.22, 0.22, 0.22]; KL=[0.16, 0.16, 0.16, 0.16, 0.12, 0.08, 0.04]; XF=[1, 1, 1, 1, 1, 0.5, 0.2]
          SoilCrop WheatSoil: LL=[0.23, 0.22, 0.22, 0.22, 0.22, 0.22, 0.22]; KL=[0.16, 0.16, 0.16, 0.16, 0.12, 0.08, 0.04]; XF=[1, 1, 1, 1, 1, 0.5, 0.2]
          SoilCrop PeanutSoil: LL=[0.23, 0.22, 0.22, 0.22, 0.22, 0.22, 0.22]; KL=[0.16, 0.16, 0.16, 0.16, 0.12, 0.08, 0.04]; XF=[1, 1, 1, 1, 1, 0.5, 0.2]
        SoilWater: SummerDate=1-Nov; SummerU=4; SummerCona=3; WinterDate=1-Apr; WinterU=4; WinterCona=3; DiffusConst=40; DiffusSlope=16; Salb=0.1; CN2Bare=82; CNRed=6; CNCov=0.8; max_pond=0; Thickness=[100, 150, 250, 250, 250, 250, 250]; SWCON=[0.6, 0.4, 0.4, 0.4, 0.4, 0.4, 0.4]; PrecipitationInterception=0
        SoilNitrogen: same as Soil_Regions.CQ_Soils.north_vertosol_10oc_80_PAWC.SoilNitrogen
        Organic: FOMCNRatio=70
          Thickness  Carbon  SoilCNRatio  FBiom  FInert  FOM
          100        1.33    10.3         0.1    0.2     1075.64
          150        1.06    10.3         0.07   0.4     796.851
          250        0.66    10.3         0.05   0.55    483.315
          250        0.35    10.3         0.025  0.85    293.145
          250        0.24    10.3         0.015  0.95    177.801
          250        0.2     10.3         0.01   0.95    107.842
          250        0.16    10.3         0.01   0.99    65.4095
        Chemical
          Thickness  NO3N  NH4N  PH
          100        0     1.5   5
          150        0     1     5
          250        0     0.8   5
          250        0     0.7   5.5
          250        0     0.6   6
          250        0     0.5   6
          250        0     0.5   6
        InitialWater: PercentMethod=0; FractionFull=0; RelativeTo=LL15
        Sample InitialNitrogen: Thickness=[100, 150, 250, 250, 250, 250, 250]; SWUnits=Volumetric; OCUnits=Total; PHUnits=Water
        CERESSoilTemperature
      Soil NQld_ferrosol_80_PAWC: ASCOrder=Ferrosol; SoilType=?; Site=Babinda; NearestTown=Babinda; Region=North Tropical Coast and Tablelands; State=Queensland; Country=Australia; ApsoilNumber=649; Latitude=-17.457; Longitude=145.992; LocationAccuracy=+/- 200m; DataSource=CSIRO Sustainable Ecosystems, Brisbane
        Comments=BA-01; Meier, E.A., Thorburn, P.J., Probert, M.E., 2006. Occurrence and simulation of nitrification in two contrasting sugarcane soils from the Australian wet tropics. Aust. J. Soil Res. 44, 1–9.
        Physical
          Thickness  BD     AirDry  LL15  DUL   SAT
          150        1.4    0.05    0.3   0.38  0.47
          150        1.43   0.05    0.33  0.39  0.46
          150        1.351  0.05    0.31  0.39  0.49
          150        1.351  0.05    0.32  0.39  0.49
          300        1.43   0.05    0.34  0.39  0.46
          300        1.377  0.05    0.32  0.38  0.48
          300        1.536  0.05    0.38  0.4   0.42
          SoilCrop SugarSoil: LL=[0.3, 0.33, 0.31, 0.32, 0.34, 0.32, 0.38]; KL=[0.1, 0.1, 0.1, 0.1, 0.08, 0.08, 0.04]; XF=[1, 1, 1, 1, 1, 0.5, 0.2]
            LL source: Estimated based on local knowledge
          SoilCrop RiceSoil: LL=[0.3, 0.33, 0.31, 0.32, 0.34, 0.32, 0.38]; KL=[0.1, 0.1, 0.1, 0.1, 0.08, 0.08, 0.04]; XF=[1, 1, 1, 1, 1, 0.5, 0.2]
          SoilCrop MungbeanSoil: LL=[0.3, 0.33, 0.31, 0.32, 0.34, 0.32, 0.38]; KL=[0.1, 0.1, 0.1, 0.1, 0.08, 0.08, 0.04]; XF=[1, 1, 1, 1, 1, 0.5, 0.2]
          SoilCrop ChickpeaSoil: LL=[0.3, 0.33, 0.31, 0.32, 0.34, 0.32, 0.38]; KL=[0.1, 0.1, 0.1, 0.1, 0.08, 0.08, 0.04]; XF=[1, 1, 1, 1, 1, 0.5, 0.2]
          SoilCrop SoybeanSoil: LL=[0.3, 0.33, 0.31, 0.32, 0.34, 0.32, 0.38]; KL=[0.1, 0.1, 0.1, 0.1, 0.08, 0.08, 0.04]; XF=[1, 1, 1, 1, 1, 0.5, 0.2]
          SoilCrop MaizeSoil: LL=[0.3, 0.33, 0.31, 0.32, 0.34, 0.32, 0.38]; KL=[0.1, 0.1, 0.1, 0.1, 0.08, 0.08, 0.04]; XF=[1, 1, 1, 1, 1, 0.5, 0.2]
          SoilCrop WheatSoil: LL=[0.3, 0.33, 0.31, 0.32, 0.34, 0.32, 0.38]; KL=[0.1, 0.1, 0.1, 0.1, 0.08, 0.08, 0.04]; XF=[1, 1, 1, 1, 1, 0.5, 0.2]
          SoilCrop PeanutSoil: LL=[0.3, 0.33, 0.31, 0.32, 0.34, 0.32, 0.38]; KL=[0.1, 0.1, 0.1, 0.1, 0.08, 0.08, 0.04]; XF=[1, 1, 1, 1, 1, 0.5, 0.2]
        SoilWater: SummerDate=1-Nov; SummerU=4; SummerCona=3; WinterDate=1-Apr; WinterU=4; WinterCona=3; DiffusConst=88; DiffusSlope=35.4; Salb=0.11; CN2Bare=75; CNRed=6; CNCov=0.8; max_pond=0; Thickness=[150, 150, 150, 150, 300, 300, 300]; SWCON=[0.3, 0.3, 0.3, 0.25, 0.25, 0.25, 0.25]; PrecipitationInterception=0
        SoilNitrogen: same as Soil_Regions.CQ_Soils.north_vertosol_10oc_80_PAWC.SoilNitrogen
        Organic: FOMCNRatio=70
          Thickness  Carbon  SoilCNRatio  FBiom  FInert  FOM
          150        2.54    16.7         0.08   0.3     964.943
          150        2.11    16.7         0.07   0.35    714.847
          150        1.47    16.7         0.04   0.55    529.572
          150        1.07    16.7         0.01   0.9     392.317
          300        0.97    16.7         0.01   0.95    215.308
          300        0.81    16.7         0.01   0.95    118.163
          300        0.45    16.7         0.01   0.99    64.8495
        Chemical
          Thickness  NO3N  NH4N  PH
          150        0     1.5   4.9
          150        0     1     4.9
          150        0     0.8   4.9
          150        0     0.7   4.9
          300        0     0.6   4.9
          300        0     0.5   4.9
          300        0     0.5   4.9
        InitialWater: PercentMethod=0; FractionFull=0; RelativeTo=LL15
        Sample InitialNitrogen: Thickness=[150, 150, 150, 150, 300, 300, 300]; SWUnits=Volumetric; OCUnits=Total; PHUnits=Water
        CERESSoilTemperature
    Folder VIC_Soils
      Soil southern_clay_loam_70cm: SoilType=Clay loam; Site=VIC; NearestTown=Jil Jil; Region=Mallee; State=Victoria; Country=Australia; ApsoilNumber=728; Latitude=-35.8822; Longitude=142.99226; LocationAccuracy=+/- 1000m; Comments=Medium SSC; GPS at paddock scale only; BCG systems trial
        DataSource=Based on Soil Characterisation undertaken by Birchip Cropping Group during 2005
        Physical
          Thickness  BD    AirDry  LL15  DUL   SAT
          100        1.36  0.07    0.12  0.33  0.44
          150        1.29  0.15    0.17  0.34  0.46
          150        1.29  0.16    0.17  0.34  0.46
          150        1.37  0.21    0.21  0.35  0.43
          150        1.37  0.21    0.21  0.35  0.43
          SoilCrop WheatSoil: LL=[0.17, 0.21, 0.25, 0.26, 0.28]; KL=[0.06, 0.06, 0.04, 0.04, 0.04]; XF=[1, 1, 0.28, 0.22, 0.17]
            LL source: Field measured and checked for sensibility
        SoilWater: SummerDate=1-Nov; SummerU=6; SummerCona=3.5; WinterDate=1-Apr; WinterU=2; WinterCona=2; DiffusConst=40; DiffusSlope=16; Salb=0.13; CN2Bare=73; CNRed=20; CNCov=0.8; max_pond=0; Thickness=[100, 150, 150, 150, 150]; SWCON=[0.3, 0.3, 0.3, 0.3, 0.3]; PrecipitationInterception=0
        SoilNitrogen: same as Soil_Regions.CQ_Soils.north_vertosol_10oc_80_PAWC.SoilNitrogen
        Organic: FOMCNRatio=45
          Thickness  Carbon  SoilCNRatio  FBiom  FInert  FOM
          100        1.3     12.5         0.03   0.4     741.098
          150        0.65    12.5         0.02   0.6     389.661
          150        0.65    12.5         0.02   0.7     204.879
          150        0.65    12.5         0.02   0.8     107.723
          150        0.65    12.5         0.01   0.85    56.6394
        Chemical
          Thickness  NO3N  NH4N  PH   EC
          100        8.27  1.24  7.2  0.3
          150        3.87  0.18  7.9  0.7
          150        1.03  0.18  8.4  1.1
          150        0.61  0.18  8.6  1.3
          150        0.61  0.18  8.6  1.5
        InitialWater: PercentMethod=0; FractionFull=0; RelativeTo=LL15
        Sample InitialNitrogen: Thickness=[100, 150, 150, 150, 150]; SWUnits=Volumetric; OCUnits=Total; PHUnits=Water
        CERESSoilTemperature
      Soil southern_clay_loam_130cm: SoilType=Clay loam; Site=VIC; NearestTown=Jil Jil; Region=Mallee; State=Victoria; Country=Australia; ApsoilNumber=728; Latitude=-35.8822; Longitude=142.99226; LocationAccuracy=+/- 1000m; Comments=Medium SSC; GPS at paddock scale only; BCG systems trial
        DataSource=Based on Soil Characterisation undertaken by Birchip Cropping Group during 2005
        Physical
          Thickness  BD    AirDry  LL15  DUL   SAT
          100        1.36  0.07    0.12  0.33  0.44
          150        1.29  0.15    0.17  0.34  0.46
          150        1.29  0.16    0.17  0.34  0.46
          150        1.37  0.21    0.21  0.35  0.43
          150        1.37  0.21    0.21  0.35  0.43
          300        1.41  0.24    0.24  0.35  0.42
          300        1.42  0.25    0.25  0.35  0.41
          SoilCrop WheatSoil: LL=[0.17, 0.21, 0.25, 0.26, 0.28, 0.34, 0.46]; KL=[0.06, 0.06, 0.04, 0.04, 0.04, 0.04, 0.02]; XF=[1, 1, 0.28, 0.22, 0.17, 0.16, 0]
            LL source: Field measured and checked for sensibility
        SoilWater: SummerDate=1-Nov; SummerU=6; SummerCona=3.5; WinterDate=1-Apr; WinterU=2; WinterCona=2; DiffusConst=40; DiffusSlope=16; Salb=0.13; CN2Bare=73; CNRed=20; CNCov=0.8; max_pond=0; Thickness=[100, 150, 150, 150, 150, 300, 300]; SWCON=[0.3, 0.3, 0.3, 0.3, 0.3, 0.3, 0.3]; PrecipitationInterception=0
        SoilNitrogen: same as Soil_Regions.CQ_Soils.north_vertosol_10oc_80_PAWC.SoilNitrogen
        Organic: FOMCNRatio=45
          Thickness  Carbon  SoilCNRatio  FBiom  FInert  FOM
          100        1.3     12.5         0.03   0.4     499.955
          150        0.65    12.5         0.02   0.6     353.67
          150        0.65    12.5         0.02   0.7     250.188
          150        0.65    12.5         0.02   0.8     176.984
          150        0.65    12.5         0.01   0.85    125.199
          300        0.65    12.5         0.01   0.9     62.652
          300        0.65    12.5         0.01   0.95    31.3523
        Chemical
          Thickness  NO3N  NH4N  PH   EC
          100        8.27  1.24  7.2  0.3
          150        3.87  0.18  7.9  0.7
          150        1.03  0.18  8.4  1.1
          150        0.61  0.18  8.6  1.3
          150        0.61  0.18  8.6  1.5
          300        0.3   0.13  8.8  1.5
          300        0.12  0.13  8.8  1.5
        InitialWater: PercentMethod=0; FractionFull=0; RelativeTo=LL15
        Sample InitialNitrogen: Thickness=[100, 150, 150, 150, 150, 300, 300]; SWUnits=Volumetric; OCUnits=Total; PHUnits=Water
        CERESSoilTemperature
      Soil southerrn_sandy_clay_loam_70cm: SoilType=Sandy clay loam; Site=Birchip; NearestTown=Birchip; Region=Mallee; State=Victoria; Country=Australia; ApsoilNumber=720; Latitude=-35.821659; Longitude=142.99226; LocationAccuracy=+/- 1000m
        DataSource=Based on Soil Characterisation undertaken by Birchip Cropping Group during 2005
        Comments=2005 Birchip main site; CLL field measured; Observed rooting depth 100cm
        Physical
          Thickness  BD    AirDry  LL15  DUL   SAT
          100        1.51  0.055   0.12  0.29  0.38
          150        1.62  0.112   0.18  0.29  0.34
          150        1.62  0.18    0.18  0.29  0.34
          150        1.57  0.18    0.18  0.33  0.36
          150        1.57  0.18    0.18  0.33  0.36
          SoilCrop WheatSoil: LL=[0.11, 0.14, 0.19, 0.19, 0.19]; KL=[0.06, 0.06, 0.04, 0.04, 0.04]; XF=[1, 1, 1, 1, 1]
            LL source: Field measured and checked for sensibility
        SoilWater: SummerDate=1-Nov; SummerU=6; SummerCona=3.5; WinterDate=1-Apr; WinterU=2; WinterCona=2; DiffusConst=140; DiffusSlope=30; Salb=0.13; CN2Bare=73; CNRed=20; CNCov=0.8; max_pond=0; Thickness=[100, 150, 150, 150, 150]; SWCON=[0.4, 0.4, 0.4, 0.4, 0.4]; PrecipitationInterception=0
        SoilNitrogen: same as Soil_Regions.CQ_Soils.north_vertosol_10oc_80_PAWC.SoilNitrogen
        Organic: same as Soil_Regions.VIC_Soils.southern_clay_loam_70cm.Organic
        Chemical
          Thickness  NO3N  NH4N  PH   EC
          100        1     1     7    0.3
          150        1     1     7.7  0.7
          150        1     0.5   8.3  1.1
          150        1     0.1   8.6  1.3
          150        1     0.1   8.8  1.5
        InitialWater: PercentMethod=0; FractionFull=0; RelativeTo=LL15
        Sample InitialNitrogen: Thickness=[100, 150, 150, 150, 150]; SWUnits=Volumetric; OCUnits=Total; PHUnits=Water
        CERESSoilTemperature
      Soil southern_sandy_clay_loam_130cm: SoilType=Sandy clay loam; Site=Birchip; NearestTown=Birchip; Region=Mallee; State=Victoria; Country=Australia; ApsoilNumber=720; Latitude=-35.821659; Longitude=142.99226; LocationAccuracy=+/- 1000m
        DataSource=Based on Soil Characterisation undertaken by Birchip Cropping Group during 2005
        Comments=2005 Birchip main site; CLL field measured; Observed rooting depth 100cm
        Physical
          Thickness  BD    AirDry  LL15  DUL   SAT
          100        1.51  0.055   0.12  0.29  0.38
          150        1.62  0.112   0.18  0.29  0.34
          150        1.62  0.18    0.18  0.29  0.34
          150        1.57  0.18    0.18  0.33  0.36
          150        1.57  0.18    0.18  0.33  0.36
          300        1.56  0.18    0.22  0.32  0.36
          300        1.56  0.18    0.27  0.33  0.36
          SoilCrop WheatSoil: LL=[0.11, 0.14, 0.19, 0.19, 0.19, 0.19, 0.26]; KL=[0.06, 0.06, 0.04, 0.04, 0.04, 0.04, 0.04]; XF=[1, 1, 1, 1, 1, 1, 1]
            LL source: Field measured and checked for sensibility (layer 1, 2, 3, 4, 5)
        SoilWater: SummerDate=1-Nov; SummerU=6; SummerCona=3.5; WinterDate=1-Apr; WinterU=2; WinterCona=2; DiffusConst=140; DiffusSlope=30; Salb=0.13; CN2Bare=73; CNRed=20; CNCov=0.8; max_pond=0; Thickness=[100, 150, 150, 150, 150, 300, 300]; SWCON=[0.4, 0.4, 0.4, 0.4, 0.4, 0.4, 0.4]; PrecipitationInterception=0
        SoilNitrogen: same as Soil_Regions.CQ_Soils.north_vertosol_10oc_80_PAWC.SoilNitrogen
        Organic: same as Soil_Regions.VIC_Soils.southern_clay_loam_130cm.Organic
        Chemical
          Thickness  NO3N  NH4N  PH   EC
          100        1     1     7    0.3
          150        1     1     7.7  0.7
          150        1     0.5   8.3  1.1
          150        1     0.1   8.6  1.3
          150        1     0.1   8.8  1.5
          300        1     0.1   8.8  1.5
          300        1     0.1   8.8  1.5
        InitialWater: PercentMethod=0; FractionFull=0; RelativeTo=LL15
        Sample InitialNitrogen: Thickness=[100, 150, 150, 150, 150, 300, 300]; SWUnits=Volumetric; OCUnits=Total; PHUnits=Water
        CERESSoilTemperature
      Soil southern_sandy_loam_130cm: SoilType=Sandy loam; Site=Hopetoun; NearestTown=Hopetoun; Region=Mallee; State=Victoria; Country=Australia; ApsoilNumber=717; Latitude=-35.734; Longitude=142.237; LocationAccuracy=+-1000m; DataSource=Measured by BCG
        Comments=Bulk density and wheat DUL/CLL measured by Birchip Cropping Group 2011. CLL for other crops based on SW measurements at end of 2009 season.
        Physical
          Thickness  BD    AirDry  LL15  DUL   SAT
          100        1.66  0.01    0.05  0.23  0.34
          100        1.57  0.02    0.1   0.27  0.38
          200        1.5   0.03    0.15  0.31  0.41
          300        1.51  0.03    0.15  0.32  0.37
          300        1.73  0.03    0.15  0.28  0.33
          300        1.67  0.03    0.15  0.28  0.33
          SoilCrop WheatSoil: LL=[0.07, 0.11, 0.16, 0.17, 0.21, 0.2]; KL=[0.07, 0.07, 0.07, 0.05, 0.05, 0.05]; XF=[1, 1, 1, 1, 1, 1]
        SoilWater: SummerDate=1-Nov; SummerU=4; SummerCona=2; WinterDate=1-Apr; WinterU=4; WinterCona=2; DiffusConst=250; DiffusSlope=22; Salb=0.13; CN2Bare=73; CNRed=20; CNCov=0.8; max_pond=0; Thickness=[100, 100, 200, 300, 300, 300]; SWCON=[0.6, 0.6, 0.5, 0.5, 0.5, 0.5]; PrecipitationInterception=0
        SoilNitrogen: same as Soil_Regions.CQ_Soils.north_vertosol_10oc_80_PAWC.SoilNitrogen
        Organic: FOMCNRatio=45
          Thickness  Carbon  SoilCNRatio  FBiom  FInert  FOM
          100        1       12.5         0.03   0.4     548.89
          100        0.5     12.5         0.02   0.6     435.776
          200        0.5     12.5         0.02   0.7     274.675
          300        0.5     12.5         0.02   0.8     137.453
          300        0.5     12.5         0.01   0.85    68.7843
          300        0.5     12.5         0.01   0.9     34.421
        Chemical
          Thickness  NO3N  NH4N  PH   EC
          100        0     1.24  7.2  0.3
          100        0     0.18  7.9  0.7
          200        0     0.18  8.4  1.1
          300        0     0.18  8.6  1.3
          300        0     0.18  8.6  1.5
          300        0     0.13  8.8  1.5
        InitialWater: PercentMethod=0; FractionFull=0; RelativeTo=LL15
        Sample InitialNitrogen: Thickness=[100, 100, 200, 300, 300, 300]; SWUnits=Volumetric; OCUnits=Total; PHUnits=Water
        CERESSoilTemperature
      Soil southern_sandy_loam_160cm: SoilType=Sandy loam; Site=Hopetoun; NearestTown=Hopetoun; Region=Mallee; State=Victoria; Country=Australia; ApsoilNumber=717; Latitude=-35.734; Longitude=142.237; LocationAccuracy=+-1000m; DataSource=Measured by BCG
        Comments=Bulk density and wheat DUL/CLL measured by Birchip Cropping Group 2011. CLL for other crops based on SW measurements at end of 2009 season.
        Physical
          Thickness  BD    AirDry  LL15  DUL   SAT
          100        1.66  0.01    0.05  0.23  0.34
          100        1.57  0.02    0.1   0.27  0.38
          200        1.5   0.03    0.15  0.31  0.41
          300        1.51  0.03    0.15  0.32  0.37
          300        1.73  0.03    0.15  0.28  0.33
          300        1.67  0.03    0.15  0.28  0.33
          300        1.67  0.03    0.15  0.28  0.33
          SoilCrop WheatSoil: LL=[0.07, 0.11, 0.16, 0.17, 0.21, 0.2, 0.2]; KL=[0.07, 0.07, 0.07, 0.05, 0.05, 0.05, 0.05]; XF=[1, 1, 1, 1, 1, 1, 1]
        SoilWater: SummerDate=1-Nov; SummerU=4; SummerCona=2; WinterDate=1-Apr; WinterU=4; WinterCona=2; DiffusConst=250; DiffusSlope=22; Salb=0.13; CN2Bare=73; CNRed=20; CNCov=0.8; max_pond=0; Thickness=[100, 100, 200, 300, 300, 300, 300]; SWCON=[0.6, 0.6, 0.5, 0.5, 0.5, 0.5, 0.5]; PrecipitationInterception=0
        SoilNitrogen: same as Soil_Regions.CQ_Soils.north_vertosol_10oc_80_PAWC.SoilNitrogen
        Organic: FOMCNRatio=45
          Thickness  Carbon  SoilCNRatio  FBiom  FInert  FOM
          100        1       12.5         0.03   0.4     487.979
          100        0.5     12.5         0.02   0.6     404.549
          200        0.5     12.5         0.02   0.7     278.042
          300        0.5     12.5         0.02   0.8     158.424
          300        0.5     12.5         0.01   0.85    90.2671
          300        0.5     12.5         0.01   0.9     51.4327
          300        0.5     12.5         0.01   0.95    29.3054
        Chemical
          Thickness  NO3N  NH4N  PH   EC
          100        0     1.24  7.2  0.3
          100        0     0.18  7.9  0.7
          200        0     0.18  8.4  1.1
          300        0     0.18  8.6  1.3
          300        0     0.18  8.6  1.5
          300        0     0.13  8.8  1.5
          300        0     0.13  8.8  1.5
        InitialWater: PercentMethod=0; FractionFull=0; RelativeTo=LL15
        Sample InitialNitrogen: Thickness=[100, 100, 200, 300, 300, 300, 300]; SWUnits=Volumetric; OCUnits=Total; PHUnits=Water
        CERESSoilTemperature
    Folder WideBay_Soils
      Soil WideBay_black_vertosol_100_PAWC: ASCOrder=Vertosol; ASCSubOrder=Black; SoilType=Clay; Site=Generic; NearestTown=Childers; Region=Wide Bay and Burnett; State=Queensland; Country=Australia; ApsoilNumber=1073; Latitude=-25.236343; Longitude=152.27813; LocationAccuracy=Regional Soil Type
        Physical
          Thickness  BD    AirDry  LL15   DUL    SAT
          200        1.15  0.05    0.39   0.552  0.559
          200        1.1   0.05    0.413  0.582  0.583
          100        1.15  0.05    0.404  0.55   0.558
          100        1.15  0.05    0.404  0.55   0.558
          70         1.15  0.05    0.404  0.55   0.558
          100        1.15  0.05    0.404  0.55   0.558
          300        1.15  0.05    0.404  0.55   0.558
          300        1.15  0.05    0.404  0.55   0.558
          300        1.15  0.05    0.404  0.55   0.558
          SoilCrop PeanutSoil
            LL=[0.39, 0.413, 0.404, 0.404, 0.404, 0.404, 0.404, 0.404, 0.404]
            KL=[0.08, 0.07, 0.06, 0.05, 0.04, 0.03, 0.02, 0.02, 0.02]
            XF=[1, 1, 1, 1, 1, 1, 1, 1, 1]
            LL source: Unknown source or quality of data
          SoilCrop SoybeanSoil: same as Soil_Regions.WideBay_Soils.WideBay_black_vertosol_100_PAWC.Physical.PeanutSoil
          SoilCrop SugarSoil
            LL=[0.39, 0.413, 0.404, 0.404, 0.404, 0.404, 0.404, 0.404, 0.404]
            KL=[0.1, 0.1, 0.08, 0.07, 0.06, 0.05, 0.05, 0.05, 0.05]
            XF=[1, 1, 1, 1, 1, 0, 0, 0, 0]
            LL source: Unknown source or quality of data
          SoilCrop RiceSoil
            LL=[0.39, 0.413, 0.404, 0.404, 0.404, 0.404, 0.404, 0.404, 0.404]
            KL=[0.1, 0.1, 0.08, 0.07, 0.06, 0.05, 0.05, 0.05, 0.05]
            XF=[1, 1, 1, 1, 1, 0, 0, 0, 0]
          SoilCrop ChickpeaSoil
            LL=[0.39, 0.413, 0.404, 0.404, 0.404, 0.404, 0.404, 0.404, 0.404]
            KL=[0.1, 0.1, 0.08, 0.07, 0.06, 0.05, 0.05, 0.05, 0.05]
            XF=[1, 1, 1, 1, 1, 0, 0, 0, 0]
          SoilCrop MungbeanSoil
            LL=[0.39, 0.413, 0.404, 0.404, 0.404, 0.404, 0.404, 0.404, 0.404]
            KL=[0.1, 0.1, 0.08, 0.07, 0.06, 0.05, 0.05, 0.05, 0.05]
            XF=[1, 1, 1, 1, 1, 0, 0, 0, 0]
          SoilCrop MaizeSoil
            LL=[0.39, 0.413, 0.404, 0.404, 0.404, 0.404, 0.404, 0.404, 0.404]
            KL=[0.1, 0.1, 0.08, 0.07, 0.06, 0.05, 0.05, 0.05, 0.05]
            XF=[1, 1, 1, 1, 1, 0, 0, 0, 0]
        SoilWater: SummerDate=1-Nov; SummerU=8; SummerCona=3; WinterDate=1-Apr; WinterU=8; WinterCona=3; DiffusConst=40; DiffusSlope=16; Salb=0.1; CN2Bare=85; CNRed=20; CNCov=0.8; max_pond=0; Thickness=[200, 200, 100, 100, 70, 100, 300, 300, 300]; SWCON=[0.5, 0.5, 0.5, 0.5, 0.5, 0.5, 0.5, 0.5, 0.5]; PrecipitationInterception=0
        SoilNitrogen: same as Soil_Regions.CQ_Soils.north_vertosol_10oc_80_PAWC.SoilNitrogen
        Organic: FOMCNRatio=40
          Thickness  Carbon  SoilCNRatio  FBiom  FInert  FOM
          200        1       12           0.015  0.5     252.454
          200        0.8     12           0.01   0.75    176.258
          100        0.8     12           0.01   0.75    147.276
          100        0.7     12           0.005  0.85    123.059
          70         0.6     12           0.005  0.9     108.518
          100        0.6     12           0.005  0.95    90.6747
          300        0.6     12           0.005  0.95    52.8975
          300        0.6     12           0.005  0.95    30.8592
          300        0.6     12           0.005  0.95    18.0025
        Chemical
          Thickness  NO3N  NH4N  PH
          200        0     1.5   6
          200        0     1     6
          100        0     0.8   6
          100        0     0.7   6
          70         0     0.6   6
          100        0     0.5   6
          300        0     0.5   6
          300        0     0.5   6
          300        0     0.5   6
        InitialWater: PercentMethod=0; FractionFull=0; RelativeTo=LL15
        Sample InitialNitrogen: Thickness=[200, 200, 100, 100, 70, 100, 300, 300, 300]; SWUnits=Volumetric; OCUnits=Total; PHUnits=Water
        CERESSoilTemperature
      Soil WideBay_yellow_dermosol_150_PAWC: ASCOrder=Dermosol; ASCSubOrder=Yellow; SoilType=Sandy clay loam; Site=Generic; NearestTown=Childers; Region=Wide Bay and Burnett; State=Queensland; Country=Australia; ApsoilNumber=1070; Latitude=-25.236343; Longitude=152.27813; LocationAccuracy=Regional Soil Type
        Physical
          Thickness  BD    AirDry  LL15   DUL    SAT
          200        1.43  0.05    0.175  0.293  0.377
          200        1.5   0.05    0.2    0.307  0.37
          100        1.5   0.05    0.225  0.326  0.38
          100        1.53  0.05    0.242  0.332  0.378
          200        1.46  0.05    0.222  0.289  0.369
          200        1.46  0.05    0.222  0.289  0.369
          300        1.8   0.05    0.222  0.289  0.305
          300        1.8   0.05    0.222  0.289  0.305
          300        1.8   0.05    0.222  0.289  0.305
          SoilCrop PeanutSoil
            LL=[0.175, 0.2, 0.225, 0.242, 0.222, 0.222, 0.222, 0.222, 0.222]
            KL=[0.08, 0.07, 0.06, 0.05, 0.04, 0.03, 0.02, 0.02, 0.02]
            XF=[1, 1, 1, 1, 1, 1, 1, 1, 1]
            LL source: Unknown source or quality of data
          SoilCrop SoybeanSoil: same as Soil_Regions.WideBay_Soils.WideBay_yellow_dermosol_150_PAWC.Physical.PeanutSoil
          SoilCrop SugarSoil
            LL=[0.175, 0.2, 0.225, 0.242, 0.222, 0.222, 0.222, 0.222, 0.222]
            KL=[0.1, 0.1, 0.08, 0.07, 0.06, 0.05, 0.05, 0.05, 0.05]
            XF=[1, 1, 1, 1, 1, 1, 1, 1, 1]
            LL source: Unknown source or quality of data
          SoilCrop RiceSoil
            LL=[0.175, 0.2, 0.225, 0.242, 0.222, 0.222, 0.222, 0.222, 0.222]
            KL=[0.08, 0.07, 0.06, 0.05, 0.04, 0.03, 0.02, 0.02, 0.02]
            XF=[1, 1, 1, 1, 1, 1, 1, 1, 1]
          SoilCrop ChickpeaSoil
            LL=[0.175, 0.2, 0.225, 0.242, 0.222, 0.222, 0.222, 0.222, 0.222]
            KL=[0.08, 0.07, 0.06, 0.05, 0.04, 0.03, 0.02, 0.02, 0.02]
            XF=[1, 1, 1, 1, 1, 1, 1, 1, 1]
          SoilCrop MungbeanSoil
            LL=[0.175, 0.2, 0.225, 0.242, 0.222, 0.222, 0.222, 0.222, 0.222]
            KL=[0.08, 0.07, 0.06, 0.05, 0.04, 0.03, 0.02, 0.02, 0.02]
            XF=[1, 1, 1, 1, 1, 1, 1, 1, 1]
          SoilCrop MaizeSoil
            LL=[0.175, 0.2, 0.225, 0.242, 0.222, 0.222, 0.222, 0.222, 0.222]
            KL=[0.08, 0.07, 0.06, 0.05, 0.04, 0.03, 0.02, 0.02, 0.02]
            XF=[1, 1, 1, 1, 1, 1, 1, 1, 1]
        SoilWater: SummerDate=1-Nov; SummerU=6; SummerCona=3; WinterDate=1-Apr; WinterU=6; WinterCona=3; DiffusConst=40; DiffusSlope=16; Salb=0.1; CN2Bare=75; CNRed=20; CNCov=0.8; max_pond=0; Thickness=[200, 200, 100, 100, 200, 200, 300, 300, 300]; SWCON=[0.8, 0.8, 0.8, 0.8, 0.8, 0.8, 0.3, 0.3, 0.3]; PrecipitationInterception=0
        SoilNitrogen: same as Soil_Regions.CQ_Soils.north_vertosol_10oc_80_PAWC.SoilNitrogen
        Organic: FOMCNRatio=40
          Thickness  Carbon  SoilCNRatio  FBiom  FInert  FOM
          200        1       12           0.015  0.5     240.729
          100        0.8     12           0.01   0.75    207.197
          100        0.8     12           0.01   0.75    178.336
          200        0.7     12           0.005  0.85    132.115
          200        0.6     12           0.005  0.9     97.873
          300        0.6     12           0.005  0.95    62.4066
          300        0.6     12           0.005  0.95    39.7922
          300        0.6     12           0.005  0.95    25.3726
          300        0.6     12           0.005  0.95    16.1783
        Chemical
          Thickness  NO3N  NH4N  PH
          200        0     1.5   6
          100        0     1     6
          100        0     0.8   6
          200        0     0.7   6
          200        0     0.6   6
          300        0     0.5   6
          300        0     0.5   6
          300        0     0.5   6
          300        0     0.5   6
        InitialWater: PercentMethod=0; FractionFull=0; RelativeTo=LL15
        Sample InitialNitrogen: Thickness=[200, 100, 100, 200, 200, 300, 300, 300, 300]; SWUnits=Volumetric; OCUnits=Total; PHUnits=Water
        CERESSoilTemperature
      Soil WideBay_red_ferrosol_140_PAWC: ASCOrder=Ferrosol; ASCSubOrder=Red; SoilType=Loam; Site=Generic; NearestTown=Kepnock; Region=Wide Bay and Burnett; State=Queensland; Country=Australia; ApsoilNumber=1072; Latitude=-24.8777; Longitude=152.37375; LocationAccuracy=Regional Soil Type
        Comments=Changed SWCON from 0.5 to 0.9 based on local advice about this regions Ferrosols from Mike Bell, Graeme Wright, Yash Chauhan
        Physical
          Thickness  BD   AirDry  LL15   DUL    SAT
          200        1.4  0.05    0.252  0.433  0.452
          200        1.4  0.05    0.263  0.427  0.449
          100        1.4  0.05    0.274  0.424  0.448
          100        1.4  0.05    0.289  0.421  0.446
          200        1.4  0.05    0.301  0.413  0.442
          200        1.4  0.05    0.301  0.413  0.442
          300        1.4  0.05    0.301  0.413  0.442
          300        1.4  0.05    0.301  0.413  0.442
          300        1.4  0.05    0.301  0.413  0.442
          SoilCrop PeanutSoil
            LL=[0.252, 0.263, 0.274, 0.289, 0.301, 0.301, 0.301, 0.301, 0.301]
            KL=[0.08, 0.07, 0.06, 0.05, 0.04, 0.03, 0.02, 0.02, 0.02]
            XF=[1, 1, 1, 1, 1, 1, 1, 1, 1]
            LL source: Unknown source or quality of data
          SoilCrop SoybeanSoil: same as Soil_Regions.WideBay_Soils.WideBay_red_ferrosol_140_PAWC.Physical.PeanutSoil
          SoilCrop SugarSoil
            LL=[0.252, 0.263, 0.274, 0.289, 0.301, 0.301, 0.301, 0.301, 0.301]
            KL=[0.1, 0.1, 0.08, 0.07, 0.06, 0.05, 0.05, 0.05, 0.05]
            XF=[1, 1, 1, 1, 1, 1, 0, 0, 0]
            LL source: Unknown source or quality of data
          SoilCrop RiceSoil
            LL=[0.252, 0.263, 0.274, 0.289, 0.301, 0.301, 0.301, 0.301, 0.301]
            KL=[0.08, 0.07, 0.06, 0.05, 0.04, 0.03, 0.02, 0.02, 0.02]
            XF=[1, 1, 1, 1, 1, 1, 1, 1, 1]
          SoilCrop ChickpeaSoil
            LL=[0.252, 0.263, 0.274, 0.289, 0.301, 0.301, 0.301, 0.301, 0.301]
            KL=[0.08, 0.07, 0.06, 0.05, 0.04, 0.03, 0.02, 0.02, 0.02]
            XF=[1, 1, 1, 1, 1, 1, 1, 1, 1]
          SoilCrop MungbeanSoil
            LL=[0.252, 0.263, 0.274, 0.289, 0.301, 0.301, 0.301, 0.301, 0.301]
            KL=[0.08, 0.07, 0.06, 0.05, 0.04, 0.03, 0.02, 0.02, 0.02]
            XF=[1, 1, 1, 1, 1, 1, 1, 1, 1]
          SoilCrop MaizeSoil
            LL=[0.252, 0.263, 0.274, 0.289, 0.301, 0.301, 0.301, 0.301, 0.301]
            KL=[0.08, 0.07, 0.06, 0.05, 0.04, 0.03, 0.02, 0.02, 0.02]
            XF=[1, 1, 1, 1, 1, 1, 1, 1, 1]
        SoilWater: SummerDate=1-Nov; SummerU=8; SummerCona=3; WinterDate=1-Apr; WinterU=8; WinterCona=3; DiffusConst=40; DiffusSlope=16; Salb=0.1; CN2Bare=75; CNRed=20; CNCov=0.8; max_pond=0; Thickness=[200, 200, 100, 100, 200, 200, 300, 300, 300]; SWCON=[0.9, 0.9, 0.9, 0.9, 0.9, 0.9, 0.9, 0.9, 0.9]; PrecipitationInterception=0
        SoilNitrogen: same as Soil_Regions.CQ_Soils.north_vertosol_10oc_80_PAWC.SoilNitrogen
        Organic: FOMCNRatio=40
          Thickness  Carbon  SoilCNRatio  FBiom  FInert  FOM
          200        1       12           0.015  0.5     255.873
          200        0.8     12           0.01   0.75    186.586
          100        0.8     12           0.01   0.75    159.333
          100        0.7     12           0.005  0.85    136.061
          200        0.6     12           0.005  0.9     99.2175
          200        0.6     12           0.005  0.95    72.3507
          300        0.6     12           0.005  0.95    45.0531
          300        0.6     12           0.005  0.95    28.0547
          300        0.6     12           0.005  0.95    17.4698
        Chemical
          Thickness  NO3N  NH4N  PH
          200        0     1.5   6
          200        0     1     6
          100        0     0.8   6
          100        0     0.7   6
          200        0     0.6   6
          200        0     0.5   6
          300        0     0.5   6
          300        0     0.5   6
          300        0     0.5   6
        InitialWater: PercentMethod=0; FractionFull=0; RelativeTo=LL15
        Sample InitialNitrogen: Thickness=[200, 200, 100, 100, 200, 200, 300, 300, 300]; SWUnits=Volumetric; OCUnits=Total; PHUnits=Water
        CERESSoilTemperature
      Soil WideBay_red_ferrosol_185_PAWC: ASCOrder=Ferrosol; ASCSubOrder=Red; SoilType=Loam; Site=Generic; NearestTown=Kepnock; Region=Wide Bay and Burnett; State=Queensland; Country=Australia; ApsoilNumber=1065; Latitude=-24.8777; Longitude=152.37375; LocationAccuracy=Regional Soil Type
        Comments=Changed SWCON from 0.5 to 0.9 based on local advice about this regions Ferrosols from Mike Bell, Graeme Wright, Yash Chauhan
        Physical
          Thickness  BD   AirDry  LL15   DUL    SAT
          200        1.3  0.05    0.274  0.478  0.494
          200        1.3  0.05    0.286  0.468  0.489
          100        1.3  0.05    0.298  0.46   0.485
          100        1.3  0.05    0.314  0.453  0.481
          200        1.3  0.05    0.331  0.453  0.481
          200        1.3  0.05    0.347  0.452  0.481
          300        1.3  0.05    0.347  0.452  0.481
          300        1.3  0.05    0.347  0.452  0.481
          300        1.3  0.05    0.347  0.452  0.481
          SoilCrop PeanutSoil
            LL=[0.274, 0.286, 0.298, 0.314, 0.331, 0.347, 0.347, 0.347, 0.347]
            KL=[0.08, 0.07, 0.06, 0.05, 0.04, 0.03, 0.02, 0.02, 0.02]
            XF=[1, 1, 1, 1, 1, 1, 1, 1, 1]
            LL source: Unknown source or quality of data
          SoilCrop SoybeanSoil: same as Soil_Regions.WideBay_Soils.WideBay_red_ferrosol_185_PAWC.Physical.PeanutSoil
          SoilCrop SugarSoil
            LL=[0.274, 0.286, 0.298, 0.314, 0.331, 0.347, 0.347, 0.347, 0.347]
            KL=[0.01, 0.01, 0.08, 0.07, 0.06, 0.05, 0.05, 0.05, 0.05]
            XF=[1, 1, 1, 1, 1, 1, 1, 1, 1]
            LL source: Unknown source or quality of data
          SoilCrop RiceSoil
            LL=[0.274, 0.286, 0.298, 0.314, 0.331, 0.347, 0.347, 0.347, 0.347]
            KL=[0.08, 0.07, 0.06, 0.05, 0.04, 0.03, 0.02, 0.02, 0.02]
            XF=[1, 1, 1, 1, 1, 1, 1, 1, 1]
          SoilCrop ChickpeaSoil
            LL=[0.274, 0.286, 0.298, 0.314, 0.331, 0.347, 0.347, 0.347, 0.347]
            KL=[0.08, 0.07, 0.06, 0.05, 0.04, 0.03, 0.02, 0.02, 0.02]
            XF=[1, 1, 1, 1, 1, 1, 1, 1, 1]
          SoilCrop MungbeanSoil
            LL=[0.274, 0.286, 0.298, 0.314, 0.331, 0.347, 0.347, 0.347, 0.347]
            KL=[0.08, 0.07, 0.06, 0.05, 0.04, 0.03, 0.02, 0.02, 0.02]
            XF=[1, 1, 1, 1, 1, 1, 1, 1, 1]
          SoilCrop MaizeSoil
            LL=[0.274, 0.286, 0.298, 0.314, 0.331, 0.347, 0.347, 0.347, 0.347]
            KL=[0.08, 0.07, 0.06, 0.05, 0.04, 0.03, 0.02, 0.02, 0.02]
            XF=[1, 1, 1, 1, 1, 1, 1, 1, 1]
        SoilWater: SummerDate=1-Nov; SummerU=6; SummerCona=3; WinterDate=1-Apr; WinterU=6; WinterCona=3; DiffusConst=40; DiffusSlope=16; Salb=0.1; CN2Bare=75; CNRed=20; CNCov=0.8; max_pond=0; Thickness=[200, 200, 100, 100, 200, 200, 300, 300, 300]; SWCON=[0.9, 0.9, 0.9, 0.9, 0.9, 0.9, 0.9, 0.9, 0.9]; PrecipitationInterception=0
        SoilNitrogen: same as Soil_Regions.CQ_Soils.north_vertosol_10oc_80_PAWC.SoilNitrogen
        Organic: same as Soil_Regions.WideBay_Soils.WideBay_red_ferrosol_140_PAWC.Organic
        Chemical: same as Soil_Regions.WideBay_Soils.WideBay_red_ferrosol_140_PAWC.Chemical
        InitialWater: PercentMethod=0; FractionFull=0; RelativeTo=LL15
        Sample InitialNitrogen: Thickness=[200, 200, 100, 100, 200, 200, 300, 300, 300]; SWUnits=Volumetric; OCUnits=Total; PHUnits=Water
        CERESSoilTemperature
    Manager CQ_Factors3
      soilModule = north_vertosol_10oc_80_PAWC
      surfaceomModule = SurfaceOrganicMatter1000
      pModule =
      resetWater = Yes
      resetN = Yes
      resetSOM = Yes
      resetP =
      outputReport = outputfile_for_passing
      initialN = 3
      initialWater = 30
      crop =
      cultivarNumber = 3
      plant_density_number = 1
      sow_date_number = 1
      sowing_N_number = 1
      row_arrangement_number = 1
      side_dressing_N_number = 1
      irrigation_number = 1
      runOutput = False
      dt_sowDate = 0001-01-01
      myReportPoint =
      total_sw = 0
      total_PAW = 0
      total_LL15 = 0
      water_to_top_up = 0
      sowdate =
      irr_tot = 0
      skiprow = 0
      cult =
      density = 0
      depth = 0
      spacing = 0
      sow_fert_kg_N_ha = 0
      high_temp_threshold = 0
      low_temp_threshold = 0
      grain_moisture_content_percent = 0
      maxPAWClayer = 0
      PAWC = 0
      max_PAWC = 0
      crop_name =
      maturity_type =
      row_arrangement =
      side_fert_kg_N_ha = 0
      irrigation_treat =
      OC_Percent = 0
      swNow = 0
      nh4Now = 0
      no3Now = 0
      LL15pawc = 0
      LL15mm =
      DULmm =
      PAWCmm =
```csharp
using System;
using System.Collections;
using System.Collections.Generic;

using Models.Core;
using Models.PMF;
using Models.Soils;
using Models.Utilities;
using Models.Surface;

using APSIM.Shared.Utilities;


// Central Qld Factors - APSIM-NextGen Script
// ===================
//
//    This script sets up the ARMonline simulations for Central Queensland Crops:  
//         Maize, Wheat
//
//    Properties (Factors) referenced for setting up simulation parameters are:  
//
//
// ==============================================================================
// DBJ  August 2019     Created (conversion from KGP Manager1 Script)
// JS   November 2019   Added soil definitions to support CQld, Wide Bay and Kingaroy soils.
// ==============================================================================
//


namespace Models
{
    [Serializable]
    [System.Xml.Serialization.XmlInclude(typeof(Model))]
    public class Script : Model
    {

        // Define links to simulation model components
        // ?? [Link] Simulation MySimulation;
        // ?? [Link] Paddock MyPaddock;
        
         [Link] Clock Clock;
        [Link] Weather Met;
        [Link] Plant Wheat ;
        [Link] Soil soil;
        [Link] SoilWater SoilWater ;
        [Link] SoilNitrogen SoilN ;
        [Link] SoilNitrogenNH4 SoilNH4;
        [Link] SoilNitrogenNO3 SoilNO3;
        [Link] SurfaceOrganicMatter SOM ;
        [Link] Fertiliser Fertiliser ;
        [Link] Irrigation Irrig ;
        [Link] Summary Summary;  // Summary file for debug output


        
           // Define Parameters (Properties). These appear as enterable values on the 'Properties tab'.
        [Separator("Names of components to be used")]

        [Description("Name of Soil module")]
        public string soilModule {get;set;}        // The module name of this simulation's soil

        [Description("Name of SurfaceOM module")]
        public string surfaceomModule {get;set;}   // The module name of this simulation's surface organic matter module  // needed??

        [Description("Name of Phosphorus module")]
        public string pModule {get;set;}           // Name of your phosphorus module  // needed??

        [Separator("Reset Options")]

        [Description("Reset Water?")]
        public string resetWater {get;set;}

        [Description("Reset Nitrogen?")]
        public string resetN {get;set;}

        [Description("Reset Surface Organic Matter?")]
        public string resetSOM {get;set;}

        [Description("Reset Soil Phosphorus?")]
        public string resetP {get;set;}               //  needed?

        [Separator("Reporting")]

        [Description("Name of report module")]
        public string outputReport {get;set;}        //  needed?

        [Separator("Factor settings")]

        [Description("Starting soil N (kgN/ha)")]
        public int initialN {get;set;}        

        [Description("Starting soil AWC (%)")]
        public int initialWater {get;set;}        

        [Description("Crop")]
        public Plant crop {get;set;}        

        [Description("Cultivar number (factorised alias for cultivar name)")]
        public int cultivarNumber {get;set;}        

        [Description("Plant density number (factorised alias for Planting Density options)")]
        public int plant_density_number {get;set;}        

        [Description("Sow Date number (factorised alias for Sowing Date options)")]
        public int sow_date_number {get;set;}        

        [Description("Sowing N number (factorised alias for N application at sowing options)")]
        public int sowing_N_number {get;set;}        

        [Description("Row arrangement number (factorised alias for skip row options)")]
        public int row_arrangement_number {get;set;}        

        [Description("Side dressings of N number (factorised alias for number of N side dressings)")]
        public int side_dressing_N_number {get;set;}        

        [Description("Irrigation number (factorised alias for number of irrigations / irrigation options)")]
        public int irrigation_number {get;set;}        


          // Define PUBLIC properties that other components can read (get).
     
     
        public bool runOutput { get; set; }
        public DateTime dt_sowDate { get; set; }
        public string myReportPoint { get; set; }
        public double total_sw { get; set; }
        public double total_PAW { get; set; }
        public double total_LL15 { get; set; }
        public double water_to_top_up { get; set; }
        public string sowdate { get; set; }
        public int irr_tot { get; set; }
        public int skiprow { get; set; }
        public string cult {get; set; }
        public double density { get; set; }
        public int depth { get; set; }
        public double spacing { get; set; }
        public double sow_fert_kg_N_ha { get; set; }
        public double high_temp_threshold { get; set; }
        public double low_temp_threshold { get; set; }
        public double grain_moisture_content_percent { get; set; }
        public int maxPAWClayer { get; set; }  // set the max soil layer being considered for this soil PAWC
        public double PAWC { get; set; }
        public double max_PAWC { get; set; }
        public string crop_name { get; set; }
        public string maturity_type { get; set; }
        public string row_arrangement { get; set; }
        public double side_fert_kg_N_ha { get; set; }
        public string irrigation_treat { get; set; }
        public double OC_Percent  { get; set; }

        public double swNow
            {get
                {
                 double totalSW = 0.0;
                 for(int i = 0; i < maxPAWClayer; i++)   //number of layers to accumulate is soil / PAWC specific
                 {
                   totalSW += SoilWater.SWmm[i];
                 }
                 return (totalSW);
                }
             set { }
            }

          
        public double nh4Now
           {
          get
          {
             double totalnh4 = 0.0;
             for (int i = 0; i < maxPAWClayer; i++)   //number of layers to accumulate is soil / PAWC specific
             {
                totalnh4 += SoilNH4.kgha[i];
             }
             return (totalnh4);
          }
          set { }
           }
   
 
          public double no3Now
        {
          get
          {
             double totalno3 = 0.0;
             for (int i = 0; i < maxPAWClayer; i++)   //number of layers to accumulate is soil / PAWC specific
             {
                totalno3 += SoilNO3.kgha[i];
             }
             return (totalno3);
          }
          set { }
        }


          public double LL15pawc
        {
          get
          {
             double ll15total = 0.0;
             for (int i = 0; i < maxPAWClayer; i++)   //number of layers to accumulate is soil / PAWC specific
             {
                ll15total += LL15mm[i];
             }
             return (ll15total);
          }
          set { }
        }


        public double[] LL15mm { get; set; } 
        public double[] DULmm  { get; set; }
        public double[] PAWCmm { get; set; }
     




   // Script level variables

       //!triggers
       //private Outputfile reportReset; //debug

       //!clasification of soil and SOM

       private double total_DUL;
       private double total_nh4;
       private double total_no3;

       private double total_inorganic_N;
       private double [] propNByLayer;
       private double [] applyInitNLayerDep ;
       private double [] layerCapacity;


       //!initial N and water
       private int initial_PAWC_Percent;
       private int initial_soil_mineral_N_kg_ha;
       private double N_to_top_up;
       private int start_SOM_wt_kg_per_ha;

       //!crop specifics
       private string _sowdate = " ";




   //===========================================================================================
   // Event Handlers
   //===========================================================================================

   // The following event handler will be called once at the beginning of the simulation

    [EventSubscribe("Commencing")]
    private void OnSimulationCommencing(object sender, EventArgs e)
    {
       runOutput = true;     // Set default to produce output
      
      // reportReset = (Outputfile) MyPaddock.LinkByName("reportReset");  //debug
      
      // triggers
      // initial irrigation count
      irr_tot = 0;

      // initial N and water
      initial_PAWC_Percent = initialWater;
      initial_soil_mineral_N_kg_ha = initialN;



      //=========================================================================================== 
      // CQld (Central Queensland) Region Soils: For sites: Banana, Clermont, Dululu, Emerald,Richmond and Rolleston
      // Add/Delete/Modify as needed
      // ---------------------------------------------


      // clasification of soil and SOM
      maxPAWClayer = 0;  // number of soil layers to be considered based on PAWC

      switch (soilModule)
      {
         case "north_vertosol_10oc_80_PAWC":
            OC_Percent = 1.0;
            PAWC = 80.0;
            maxPAWClayer = 3;
            propNByLayer = new double[] { 0.35, 0.25, 0.40 };    // proportions should sum to 1.0
            applyInitNLayerDep = new double[] { 75, 225, 525 };  // depth in mm
            break;         

         case "north_vertosol_10oc_120_PAWC":
            OC_Percent = 1.0;
            PAWC = 120.0;
            maxPAWClayer = 4;
            propNByLayer = new double[] { 0.29, 0.23, 0.38, 0.09 };    // proportions should sum to 1.0
            applyInitNLayerDep = new double[] { 75, 225, 525, 675 };  // depth in mm
            break;

         case "north_vertosol_10oc_150_PAWC":
            OC_Percent = 1.0;
            PAWC = 150.0;
            maxPAWClayer = 4;
            propNByLayer = new double[] { 0.27, 0.21, 0.35, 0.17 };    // proportions should sum to 1.0
            applyInitNLayerDep = new double[] { 75, 225, 525, 825 };  // depth in mm
            break;

         case "north_vertosol_10oc_190_PAWC":
            OC_Percent = 1.0;
            PAWC = 190.0;
            maxPAWClayer = 6;
            propNByLayer = new double[] { 0.29, 0.20, 0.32, 0.11, 0.05, 0.02 };    // proportions should sum to 1.0
            applyInitNLayerDep = new double[] { 75, 225, 525, 825, 1125, 1250 };  // depth in mm
            break;

         case "north_vertosol_10oc_240_PAWC":
            OC_Percent = 1.0;
            PAWC = 240.0;
            maxPAWClayer = 7;
            propNByLayer = new double[] { 0.21, 0.16, 0.28, 0.14, 0.10, 0.07, 0.04 };    // proportions should sum to 1.0
            applyInitNLayerDep = new double[] { 75, 225, 525, 825, 1125, 1425, 1725 };  // depth in mm
            break;


         //=========================================================================================== 
                  
         // CQld Kingaroy Region Soil: For site: Kingaroy.  (separated because it requires a red ferrosol)
         // Add/Delete/Modify as needed
         // ---------------------------------------------

                  
         case "ferrosol_10oc_150_PAWC":
            OC_Percent = 1.02;
            PAWC = 150.0;
            maxPAWClayer = 6;
            propNByLayer = new double[] {0.22, 0.17, 0.28, 0.15, 0.11, 0.07};    // proportions should sum to 1.0
            applyInitNLayerDep = new double[]  {50, 150, 350, 650, 950, 1250};  // depth in mm
            break;

         case "ferrosol_10oc_120_PAWC":
            OC_Percent = 1.02;
            PAWC = 120.0;
            maxPAWClayer = 5;
            propNByLayer = new double[] {0.29, 0.21, 0.32, 0.12, 0.06};    // proportions should sum to 1.0
            applyInitNLayerDep = new double[]  {50, 150, 350, 650, 950};  // depth in mm
            break;

         case "ferrosol_10oc_80_PAWC":
            OC_Percent = 1.02;
            PAWC = 80.0;
            maxPAWClayer = 4;
            propNByLayer = new double[] {0.29, 0.23, 0.38, 0.09};    // proportions should sum to 1.0
            applyInitNLayerDep = new double[]  {50, 150, 350, 675};  // depth in mm
            break;
      
        
         //=========================================================================================== 
                  
         // Wide Bay and Burnett Region Soils: For sites: Bundaberg, Childers and Maryborough.
         // Add/Delete/Modify as needed
         // ---------------------------------------------
                  
         case "MidQld_black_vertosol_100_PAWC":
            OC_Percent = 1.0;
            PAWC = 100.0;
            maxPAWClayer = 9;
            propNByLayer = new double[] {0.30, 0.27, 0.18, 0.10, 0.03, 0.03, 0.03, 0.03, 0.03};    // proportions should sum to 1.0
            applyInitNLayerDep = new double[]  {100, 300, 450, 550, 635, 720, 920, 1220, 1520};  // depth in mm
            break;

         case "MidQld_red_ferrosol_140_PAWC":
            OC_Percent = 1.0;
            PAWC = 140.0;
            maxPAWClayer = 9;
            propNByLayer = new double[] {0.30, 0.27, 0.18, 0.10, 0.03, 0.03, 0.03, 0.03, 0.03};    // proportions should sum to 1.0
            applyInitNLayerDep = new double[]  {100, 300, 450, 550, 700, 900, 1150, 1450, 1750};  // depth in mm
            break;

         case "MidQld_yellow_dermosol_150_PAWC":
            OC_Percent = 1.0;
            PAWC = 150.0;
            maxPAWClayer = 9;
            propNByLayer = new double[] {0.30, 0.27, 0.18, 0.10, 0.03, 0.03, 0.03, 0.03, 0.03};    // proportions should sum to 1.0
            applyInitNLayerDep = new double[]  {100, 300, 450, 550, 700, 900, 1150, 1450, 1750};  // depth in mm
            break;        

         case "MidQld_red_ferrosol_185_PAWC":
            OC_Percent = 1.0;
            PAWC = 185.0;
            maxPAWClayer = 9;
            propNByLayer = new double[] {0.30, 0.27, 0.18, 0.10, 0.03, 0.03, 0.03, 0.03, 0.03};    // proportions should sum to 1.0
            applyInitNLayerDep = new double[]  {100, 300, 450, 550, 700, 900, 1150, 1450, 1750};  // depth in mm
            break;


         // The value of soil type is not in the collection for CQ Factors.
         default:
            runOutput = false;         // set flag to stop output for this simualtion run
            //throw new InvalidOperationException("unknown soil type in CQ Factors");
            Console.WriteLine("unknown soil type " + soilmodule + " in CQ Factors");
            break;
  
         
      }
    
      //===========================================================================================


         // The value of soil type is not in the collection for CQ Factors.
         default:
            runOutput = false;         // set flag to stop output for this simualtion run
            //throw new InvalidOperationException("unknown soil type in CQ Factors");
            Console.WriteLine("unknown soil type " + soilModule + " in CQ Factors");
            break;
      }

      start_SOM_wt_kg_per_ha = 1000;  //1000kg is the default, adjust it if necessary.
      if (string.Equals(surfaceomModule, "SurfaceOrganicMatter1000"))
      {
         start_SOM_wt_kg_per_ha = 1000;
      }


      //***********************************************************************************************
      // set up the crop specific values  [Maize, Wheat]
      crop_name = crop.Name.ToLower();

      // Call the CropFactors constructor for selected crop.
      CropFactors simCrop = new CropFactors(crop_name);

      // Non-factored values
      depth = simCrop.sowDepth;
      spacing = simCrop.sowSpacing;
      grain_moisture_content_percent = simCrop.grain_moisture_content_percent;
      high_temp_threshold = simCrop.high_temp_threshold;  // Stone and Nicolas 1994 Porter and Gawith 1994  http://plantsinaction.science.uq.edu.au/book/export/html/158
      low_temp_threshold = simCrop.low_temp_threshold;     // frost threshold see canola modeling paper
         
      // Factored values ( lists are zero based arrays, so subtract 1 from the list entry value )
      // Check list indexes are valid for the lists referenced, then assign the value
      if (cultivarNumber == 0 || cultivarNumber > simCrop.cultivarNameList.Length || cultivarNumber > simCrop.cultivarMaturityList.Length) 
      {
          Summary.WriteError(this, "*** Unknown " + crop_name + " cultivar number  " + cultivarNumber + " in CQ Factors");
          runOutput = false;
      }
      if (sow_date_number == 0 || sow_date_number > simCrop.sowDateList.Length) 
      {
          Summary.WriteError(this, "*** Invalid sowing date number " + sow_date_number + " for crop " + crop_name + " in CQ Factors");
          runOutput = false;
      }
      if (plant_density_number == 0 || plant_density_number > simCrop.plantDensityList.Length) 
      {
          Summary.WriteError(this, "*** Invalid plant_density_number " + plant_density_number + " for crop " + crop_name + " in CQ Factors");
          runOutput = false;
      }
      if (row_arrangement_number == 0 || row_arrangement_number > simCrop.skiprowList.Length || row_arrangement_number > simCrop.rowArrangementList.Length) 
      {
          Summary.WriteError(this, "*** Invalid row configuration " + row_arrangement_number + " for crop " + crop_name + " in CQ Factors");
          runOutput = false;
      }
      if (sowing_N_number == 0 || sowing_N_number > simCrop.sowingNList.Length) 
      {
          Summary.WriteError(this, "*** Invalid sowing_N_number " + sowing_N_number + " for crop " + crop_name + " in CQ Factors");
          runOutput = false;
      }
      if (side_dressing_N_number == 0 || side_dressing_N_number > simCrop.sideDressNList.Length) 
      {
          Summary.WriteError(this, "*** Invalid side_dressing_N_number " + side_dressing_N_number + " for crop " + crop_name + " in CQ Factors");
          runOutput = false;
      }
      if (irrigation_number == 0 || irrigation_number > simCrop.irrigationTypeList.Length) 
      {
          Summary.WriteError(this, "*** Invalid irrigation number " + irrigation_number + " for crop " + crop_name + " in CQ Factors");
          runOutput = false;
      }

      if (runOutput)
      {   // assign the values
          // sowing details
          cult = simCrop.cultivarNameList[cultivarNumber - 1];
          maturity_type = simCrop.cultivarMaturityList[cultivarNumber - 1];
          _sowdate = simCrop.sowDateList[sow_date_number - 1];
          density = simCrop.plantDensityList[plant_density_number - 1];
          skiprow = simCrop.skiprowList[row_arrangement_number - 1];     
          row_arrangement = simCrop.rowArrangementList[row_arrangement_number - 1];
          sow_fert_kg_N_ha = simCrop.sowingNList[sowing_N_number - 1];

          // side dress fertiliser
          side_fert_kg_N_ha = simCrop.sideDressNList[side_dressing_N_number - 1];

          // irrigation
          irrigation_treat = simCrop.irrigationTypeList[irrigation_number - 1];
      
      
          // convert sow date to DateTime format  
          //  must be done after setting of factors for the crop (sets sowdate_number to a sowdate literal)
          dt_sowDate = DateUtilities.GetDate(_sowdate);

          LL15mm = soil.LL15mm;
          DULmm = soil.DULmm;
          PAWCmm = soil.PAWCmm;
      }  // end if factors are okay (runOutput)
 
   } // end "Commencing"



   //==================================================================================

   // The following event handler will be called each day at the beginning of the day
   [EventSubscribe("DoManagement")]
   private void OnDoManagement(object sender, EventArgs e)
   {
      if (runOutput)   //skip the daily processing if any errors were found in the init section (runOutput set to 'false')
      {
         // if this is the day before sowing, then reset for a new season
         if (DateUtilities.Equals((dt_sowDate.DayOfYear - 1), Clock.Today.DayOfYear ))
         {
            ResetForNewSowing();
         }

 
      } // end runOutput


   }  // end "DoManagement"


   //===========================================================================================
   // Private Methods ( Subroutines / Functions )
   //===========================================================================================

          private void ResetForNewSowing()
       {
                total_sw = 0.0;
                total_DUL = 0.0;
                total_LL15 = 0.0;
          
                for (int i = 0; i < maxPAWClayer; i++)   //number of layers to accumulate is soil / PAWC specific
                {
                   total_sw += SoilWater.SWmm[i];
                   total_DUL += DULmm[i];
                   total_LL15 += LL15mm[i];
                }
                max_PAWC = total_DUL - total_LL15;
                total_PAW = total_sw - total_LL15;
                double waterToTopUp1 = (total_DUL - total_LL15) * (initialWater / 100) - total_PAW;
                double water_to_top_up = waterToTopUp1;
          
                myReportPoint = "BeforeReset";
                //reportReset.DoOutput();
          
          
          
          // reseting soil
          if (resetWater.ToLower().Equals("yes")) 
            {
                Summary.WriteMessage(this, "Reset Water");
                SoilWater.Reset();
            }
          if (resetN.ToLower().Equals("yes"))
            {
                Summary.WriteMessage(this, "Reset Nitrogen");
                SoilN.Reset();
            }
          if (resetSOM.ToLower().Equals("yes"))  
            {
                Summary.WriteMessage(this, "Reset Surface OM");
                SOM.Reset();
            }

          //if (resetP.ToLower().Equals("yes"))          soilP.Reset();  //DBJ to Check Phosphorus reset


          
          
          
                   total_sw = 0.0;
                   for (int i = 0; i < maxPAWClayer; i++)   //number of layers to accumulate is soil / PAWC specific
                   {
                      total_sw += SoilWater.SWmm[i];
                   }
                   max_PAWC = total_DUL - total_LL15;
                   total_PAW = total_sw - total_LL15;
                   waterToTopUp1 = (total_DUL - total_LL15) * (initialWater / 100) - total_PAW;
                   water_to_top_up = waterToTopUp1;
                   
                   myReportPoint = "AfterReset";
                   //reportReset.DoOutput();


          // soil calcs
          //Array.Clear(total_DUL, 0, total_DUL.Length); 
          total_DUL = 0.0;
          total_LL15 = 0.0;
          total_sw = 0.0;
          total_nh4 = 0.0;
          total_no3 = 0.0;
          if (layerCapacity == null || layerCapacity.Length == 0)
          {
             layerCapacity = new double[maxPAWClayer];
          }
       
       
          // CHECK INDEXING!!  C# indexes soils from 0:  ie. layer 1 is index 0!
          for (int i = 0; i < maxPAWClayer; i++)   //number of layers to accumulate is soil / PAWC specific
          {
             //Console.WriteLine("dul value {0} {1}" , i.ToString(), dul_dep[i].ToString());
          
             total_DUL += DULmm[i];
             total_LL15 += LL15mm[i];
             total_sw += SoilWater.SWmm[i];
             total_nh4 += SoilNH4.kgha[i];
             total_no3 += SoilNO3.kgha[i];
             //layerCapacity[i] = (dul_dep[i] - ll15_dep[i]);
             layerCapacity[i] = PAWCmm[i];
          }
         
       //Console.WriteLine("dul value  {0}",  dul_dep.ToString());

       Console.WriteLine("total_sw : {0} ", total_sw.ToString());

          // total DUL and total LL15
          max_PAWC = total_DUL - total_LL15;

          // total PAW
          total_PAW = total_sw - total_LL15;
          if (total_PAW > max_PAWC)  total_PAW = max_PAWC;
          if (total_PAW < 0)         total_PAW = 0;

          // total inorganic N
          total_inorganic_N = total_no3 + total_nh4;


          // Need to apply N Fertiliser to achieve 'Initial N' value
          // =======================================================
          N_to_top_up = initialN - total_inorganic_N;
          Fertiliser.Types fertType = Fertiliser.Types.NO3N;
       
          for (int i = 0; i < maxPAWClayer; i++)
          {
             double N_to_apply_Layer = N_to_top_up * propNByLayer[i];  
             Fertiliser.Apply(Amount: N_to_apply_Layer, Type: fertType, Depth: applyInitNLayerDep[i]);

          }
       
       
          // Need to apply Irrigation to achieve Initial Water value (30, 60 or 90% AWC) 
          // NOTE: sw is initialised / reset to 0 each year. PAW should always be 0 at this point,
          //          thus waterToTopUp will always be a positive value.
          //

          double waterToTopUp = (total_DUL - total_LL15) * (initialWater / 100) - total_PAW;
          double waterToApply = 0.0;
          double depthToApply = 0.0;

          for (int i = 0; i < maxPAWClayer; i++)   //number of layers to process is soil / PAWC specific
          {
             // Console.WriteLine("dul value {0} {1}", i.ToString(), dul_dep[i].ToString());
             // Console.WriteLine("waterToTopUp : {0} ", waterToTopUp.ToString());
             // Console.WriteLine("total_DUL : {0} ", total_DUL.ToString());
             // Console.WriteLine("total_LL15 : {0} ", total_LL15.ToString());
             // Console.WriteLine("max_PAWC : {0} ", max_PAWC.ToString());
             // Console.WriteLine("total_PAW : {0} ", total_PAW.ToString());
          
             // debug
             if (waterToTopUp < 0) waterToTopUp = 0.0;  // debug error trap
             
             // short cut any unnecessary processing if there is no water left for top up
             if (waterToTopUp == 0.0) break;
          
             // calc depth at which to apply this layer's water  
             depthToApply = 0.0;
             if (i > 0)
             {
                for (int dl = 0; dl < i; dl++)
                {
                   depthToApply += soil.Thickness[dl];  //depthToApply = sum (dlayers <i) ie. depth of layers above this one
                }
             }
             depthToApply += 1;  // add 1mm to inject water into the first mm of this layer ([layer 1 | index i=0]  = 1mm)

             // calculate how much water is to be applied to this layer
             if (waterToTopUp > layerCapacity[i])
             {
                waterToApply = layerCapacity[i];
                waterToTopUp = waterToTopUp - waterToApply;
             }
             else
             {
                waterToApply = waterToTopUp;
                waterToTopUp = 0.0;
             }

          Console.WriteLine("waterToApply : {0} ", waterToApply.ToString());
          
             // now apply the water to the layer using the Irrigation module
             // old code can be deleted -->(Irrigation apply amount = waterToApply(mm), depth = depthToApply(mm) );
             IrrigationApplicationType irrigData = new IrrigationApplicationType(); //using a type means we can use defaults for values we don't change
             irrigData.Amount = (float) waterToApply;
             irrigData.Depth = (float) depthToApply;
             //MyIrrigation.Set("irrigation_efficiency", eff);
             Irrig.Apply(waterToApply);

          }
             

       } //end ForNewSeason

       

   } // end Manager Script

   // =========================================================================================================================

   // ===================
   // Crop Factors class
   // ===================
    public class CropFactors
    {
        // Class level properties
        public string cropName { get; set; }
        public int sowDepth { get; set; }
        public double sowSpacing { get; set; }
        public double high_temp_threshold { get; set; }
        public double low_temp_threshold { get; set; }
        public double grain_moisture_content_percent { get; set; }
        public string[] cultivarNameList { get; set; }
        public string[] cultivarMaturityList { get; set; }
        public string[] sowDateList { get; set; }
        public double[] plantDensityList { get; set; }
        public int[]    skiprowList { get; set; }
        public string[] rowArrangementList { get; set; }
        public double[] sowingNList { get; set; }
        public double[] sideDressNList { get; set; }
        public string[] irrigationTypeList { get; set; }



        // Maize settings and factors
        private string   maize_cropName = "maize";
        private int      maize_sowDepth = 40;
        private double   maize_sowSpacing = 900.0;
        private double   maize_high_temp_threshold = 38.0;
        private double   maize_low_temp_threshold = 2.0;
        private double   maize_grain_moisture_content_percent = 14.0;
        private string[] maize_cultivarNameList = new string[] {"Pioneer_3527", "Pioneer_3237", "Pioneer_3153"};
        private string[] maize_cultivarMaturityList = new string[] {"CRM 94", "CRM 100", "CRM 114"};
        private string[] maize_sowDateList = new string[] {"15-aug", "15-sep", "15-jan", "15-feb"};
        private double[] maize_plantDensityList = new double[] {2.0, 3.0, 4.0, 5.0, 6.0};
        private int[]    maize_skiprowList = new int[] {0};
        private string[] maize_rowArrangementList = new string[] {"solid"};
        private double[] maize_sowingNList = new double[] {0.0, 25.0, 50.0, 75.0, 100.0, 150.0};
        private double[] maize_sideDressNList = new double[] {0.0};
        private string[] maize_irrigationTypeList = new string[] {"dryland"};
       



        // Wheat settings and factors
        private string   wheat_cropName = "wheat";
        private int      wheat_sowDepth = 20;
        private double   wheat_sowSpacing = 250.0;
        private double   wheat_high_temp_threshold = 30.0;
        private double   wheat_low_temp_threshold = 2.0;
        private double   wheat_grain_moisture_content_percent = 12.5;
        private string[] wheat_cultivarNameList = new string[] {"janz", "sunco", "ellison"};
        private string[] wheat_cultivarMaturityList = new string[] {"Quick", "Medium", "Slow"};
        private string[] wheat_sowDateList = new string[] {"15-apr", "30-apr", "15-may", "30-may", "15-jun"};
        private double[] wheat_plantDensityList = new double[] {50.0, 75.0, 100.0, 140.0};
        private int[]    wheat_skiprowList = new int[] {0};
        private string[] wheat_rowArrangementList = new string[] {"solid"};
        private double[] wheat_sowingNList = new double[] {0.0, 25.0, 50.0, 75.0, 100.0, 150.0};
        private double[] wheat_sideDressNList = new double[] {0.0};
        private string[] wheat_irrigationTypeList = new string[] {"dryland"};



        // Constructor for each crop:
        public CropFactors (string crop)
        {

               switch (crop.ToLower())
            {
                 case "maize":
                   this.cropName = maize_cropName;
                   this.sowDepth = maize_sowDepth;
                   this.sowSpacing = maize_sowSpacing;
                   this.high_temp_threshold = maize_high_temp_threshold;
                   this.low_temp_threshold = maize_low_temp_threshold;
                   this.grain_moisture_content_percent = maize_grain_moisture_content_percent;
                   this.cultivarNameList = maize_cultivarNameList;
                   this.cultivarMaturityList = maize_cultivarMaturityList;
                   this.sowDateList = maize_sowDateList;
                   this.plantDensityList = maize_plantDensityList;
                   this.skiprowList = maize_skiprowList;
                   this.rowArrangementList = maize_rowArrangementList;
                   this.sowingNList = maize_sowingNList;
                   this.sideDressNList = maize_sideDressNList;
                   this.irrigationTypeList = maize_irrigationTypeList;
                   break;

                 case "wheat":
                   this.cropName = wheat_cropName;
                   this.sowDepth = wheat_sowDepth;
                   this.sowSpacing = wheat_sowSpacing;
                   this.high_temp_threshold = wheat_high_temp_threshold;
                   this.low_temp_threshold = wheat_low_temp_threshold;
                   this.grain_moisture_content_percent = wheat_grain_moisture_content_percent;
                   this.cultivarNameList = wheat_cultivarNameList;
                   this.cultivarMaturityList = wheat_cultivarMaturityList;
                   this.sowDateList = wheat_sowDateList;
                   this.plantDensityList = wheat_plantDensityList;
                   this.skiprowList = maize_skiprowList;
                   this.rowArrangementList = wheat_rowArrangementList;
                   this.sowingNList = wheat_sowingNList;
                   this.sideDressNList = wheat_sideDressNList;
                   this.irrigationTypeList = wheat_irrigationTypeList;
                   break;



                   // The value of crop type is not in the collection for CQ Factors.
                default:
                    //runOutput = false;         // set flag to stop output for this simualtion run
                    //throw new InvalidOperationException("unknown crop type in CQ Factors");
                    //Console.WriteLine("unknown crop type " + crop + " in CQ Factors");
                    break;


            }  //end switch crop
         
        }  // end CropFactors constructor


    }   // end CropFactors class

} // end namespace
```
  Simulation SingleSim_Clermont wheat 80 PAW
    Weather: FileName=Clermont.met
    Clock: Start=1998-01-01; End=2015-12-31
    Summary summaryfile
    SoilArbitrator
    Zone paddock: Area=1; Slope=0; AspectAngle=0; Altitude=50
      MicroClimate: a_interception=0; b_interception=0; c_interception=0; d_interception=0; soil_albedo=0; SoilHeatFluxFraction=0; NightInterceptionFraction=0; ReferenceHeight=0
      SurfaceOrganicMatter SurfaceOrganicMatter1000: InitialResidueName=wheat_stubble; InitialResidueType=wheat; InitialResidueMass=1000; InitialStandingFraction=0; InitialCPR=0; InitialCNR=80; FractionFaecesAdded=0.5
      Fertiliser
      Irrigation
      Plant wheat: CropType=Wheat; IsEnding=false; DaysAfterEnding=0; ResourceName=Wheat
      Report outputfile_for_passing: same as Outputfiles.outputfile_for_passing
      Report outputfile_full: same as Outputfiles.outputfile_full
      Report SoilWaterReport
        VariableNames:
          [Clock].Today
          [north_vertosol_10oc_80_PAWC].LL15mm
          [north_vertosol_10oc_80_PAWC].PAWCmm
          [north_vertosol_10oc_80_PAWC].PAWmm
          [north_vertosol_10oc_80_PAWC].SoilWater.SWmm
          [north_vertosol_10oc_80_PAWC].SoilWater.Thickness
        EventNames:
          [wheat].Harvesting
          [wheat].Sowing
      Manager CQ_Factors
        soilModule = MidQld_black_vertosol_100_PAWC
        surfaceomModule = SurfaceOrganicMatter1000
        pModule =
        resetWater = Yes
        resetN = Yes
        resetSOM = Yes
        resetP =
        outputReport = outputfile_for_passing
        initialN = 25
        initialWater = 90
        crop = [wheat]
        cultivarNumber = 2
        plant_density_number = 2
        sow_date_number = 3
        sowing_N_number = 2
        row_arrangement_number = 1
        side_dressing_N_number = 1
        irrigation_number = 1
        runOutput = False
        dt_sowDate = 01/01/0001 00:00:00
        myReportPoint =
        total_sw = 0
        total_PAW = 0
        total_soil_PAW = 0
        total_LL15 = 0
        water_to_top_up = 0
        sowdate =
        irr_tot = 0
        skiprow = 0
        cult =
        density = 0
        depth = 0
        spacing = 0
        sow_fert_kg_N_ha = 0
        high_temp_threshold = 0
        low_temp_threshold = 0
        grain_moisture_content_percent = 0
        maxPAWClayer = 0
        PAWC = 0
        max_PAWC = 0
        crop_name =
        maturity_type =
        row_arrangement =
        side_fert_kg_N_ha = 0
        irrigation_treat =
        OC_Percent = 0
        initial_soil_mineral_N_kg_ha = 0
        LL15mm =
        DULmm =
        PAWCmm =
        swNow = 0
        PAWNow = 0
        nh4Now = 0
        no3Now = 0
        LL15pawc = 0
```csharp
using System;
using System.Collections;
using System.Collections.Generic;

using Models.Core;
using Models.PMF;
using Models.Soils;
using Models.Utilities;
using Models.Surface;

using APSIM.Shared.Utilities;


// Central Qld Factors - APSIM-NextGen Script
// ===================
//
//    This script sets up the ARMonline simulations for Central Queensland Crops:  
//         Maize, Wheat
//
//    Properties (Factors) referenced for setting up simulation parameters are:  
//
//
// ==============================================================================
// DBJ  August 2019     Created (conversion from KGP Manager1 Script)
// ==============================================================================
//


namespace Models
{
    [Serializable]
    [System.Xml.Serialization.XmlInclude(typeof(Model))]
    public class Script : Model
    {

        // Define links to simulation model components
        
         [Link] Clock Clock;
        [Link] Weather Met;
        [Link] Plant Wheat ;
        [Link] Soil soil;
        [Link] SoilWater SoilWater ;
        [Link] SoilNitrogen SoilN ;
        [Link] SoilNitrogenNH4 SoilNH4;
        [Link] SoilNitrogenNO3 SoilNO3;
        [Link] SurfaceOrganicMatter SOM ;
        [Link] Fertiliser Fertiliser ;
        [Link] Irrigation Irrig ;
        [Link] Summary Summary;  // Summary file for debug output


        
           // Define Parameters (Properties). These appear as enterable values on the 'Properties tab'.
        [Separator("Names of components to be used")]

        [Description("Name of Soil module")]
        public string soilModule {get;set;}        // The module name of this simulation's soil

        [Description("Name of SurfaceOM module")]
        public string surfaceomModule {get;set;}   // The module name of this simulation's surface organic matter module  // needed??

        [Description("Name of Phosphorus module")]
        public string pModule {get;set;}           // Name of your phosphorus module  // needed??

        [Separator("Reset Options")]

        [Description("Reset Water?")]
        public string resetWater {get;set;}

        [Description("Reset Nitrogen?")]
        public string resetN {get;set;}

        [Description("Reset Surface Organic Matter?")]
        public string resetSOM {get;set;}

        [Description("Reset Soil Phosphorus?")]
        public string resetP {get;set;}               //  needed?

        [Separator("Reporting")]

        [Description("Name of report module")]
        public string outputReport {get;set;}        //  needed?

        [Separator("Factor settings")]

        [Description("Starting soil N (kgN/ha)")]
        public int initialN {get;set;}        

        [Description("Starting soil AWC (%)")]
        public int initialWater {get;set;}        

        [Description("Crop")]
        public Plant crop {get;set;}        

        [Description("Cultivar number (factorised alias for cultivar name)")]
        public int cultivarNumber {get;set;}        

        [Description("Plant density number (factorised alias for Planting Density options)")]
        public int plant_density_number {get;set;}        

        [Description("Sow Date number (factorised alias for Sowing Date options)")]
        public int sow_date_number {get;set;}        

        [Description("Sowing N number (factorised alias for N application at sowing options)")]
        public int sowing_N_number {get;set;}        

        [Description("Row arrangement number (factorised alias for skip row options)")]
        public int row_arrangement_number {get;set;}        

        [Description("Side dressings of N number (factorised alias for number of N side dressings)")]
        public int side_dressing_N_number {get;set;}        

        [Description("Irrigation number (factorised alias for number of irrigations / irrigation options)")]
        public int irrigation_number {get;set;}        


          // Define PUBLIC properties that other components can read (get).
     
     
        public bool runOutput { get; set; }
        public DateTime dt_sowDate { get; set; }
        public string myReportPoint { get; set; }
        public double total_sw { get; set; }
        public double total_PAW { get; set; }
        public double total_soil_PAW { get; set; }
        public double total_LL15 { get; set; }
        public double water_to_top_up { get; set; }
        public string sowdate { get; set; }
        public int irr_tot { get; set; }
        public int skiprow { get; set; }
        public string cult {get; set; }
        public double density { get; set; }
        public int depth { get; set; }
        public double spacing { get; set; }
        public double sow_fert_kg_N_ha { get; set; }
        public double high_temp_threshold { get; set; }
        public double low_temp_threshold { get; set; }
        public double grain_moisture_content_percent { get; set; }
        public int maxPAWClayer { get; set; }  // set the max soil layer being considered for this soil PAWC
        public double PAWC { get; set; }
        public double max_PAWC { get; set; }
        public string crop_name { get; set; }
        public string maturity_type { get; set; }
        public string row_arrangement { get; set; }
        public double side_fert_kg_N_ha { get; set; }
        public string irrigation_treat { get; set; }
        public double OC_Percent  { get; set; }
        public int initial_soil_mineral_N_kg_ha { get; set; }
    

        // Constant Soil values
        public double[] LL15mm { get; set; } 
        public double[] DULmm  { get; set; }
        public double[] PAWCmm { get; set; }
     
        // Soil values which change 
        public double swNow
            {get
                {
                 double totalSW = 0.0;
                 for(int i = 0; i < maxPAWClayer; i++)   //number of layers to accumulate is soil / PAWC specific
                 {
                   totalSW += SoilWater.SWmm[i];
                 }
                 return (totalSW);
                }
             set { }
            }

        public double PAWNow
            {get
                {
                 double totalPAW = 0.0;
                 for(int i = 0; i < maxPAWClayer; i++)   //number of layers to accumulate is soil / PAWC specific
                 {
                   totalPAW += soil.PAWmm[i];
                 }
                 return (totalPAW);
                }
             set { }
            }

          
        public double nh4Now
           {
          get
          {
             double totalnh4 = 0.0;
             for (int i = 0; i < maxPAWClayer; i++)   //number of layers to accumulate is soil / PAWC specific
             {
                totalnh4 += SoilNH4.kgha[i];
             }
             return (totalnh4);
          }
          set { }
           }
   
 
          public double no3Now
        {
          get
          {
             double totalno3 = 0.0;
             for (int i = 0; i < maxPAWClayer; i++)   //number of layers to accumulate is soil / PAWC specific
             {
                totalno3 += SoilNO3.kgha[i];
             }
             return (totalno3);
          }
          set { }
        }


          public double LL15pawc
        {
          get
          {
             double ll15total = 0.0;
             for (int i = 0; i < maxPAWClayer; i++)   //number of layers to accumulate is soil / PAWC specific
             {
                ll15total += LL15mm[i];
             }
             return (ll15total);
          }
          set { }
        }





   // Script level variables

       // triggers
       //private Outputfile reportReset; //debug

       // clasification of soil and SOM

       private double total_DUL;
       private double total_nh4;
       private double total_no3;

       private double total_inorganic_N;
       private double [] propNByLayer;
       private double [] applyInitNLayerDep ;
       private double [] layerCapacity;


       // initial N and water
      
       private double N_to_top_up;
       private int start_SOM_wt_kg_per_ha;




   //===========================================================================================
   // Event Handlers
   //===========================================================================================

   // The following event handler will be called once at the beginning of the simulation

    [EventSubscribe("Commencing")]
    private void OnSimulationCommencing(object sender, EventArgs e)
    {
       runOutput = true;     // Set default to produce output
      
      // reportReset = (Outputfile) MyPaddock.LinkByName("reportReset");  //debug
      
      // triggers
      // initial irrigation count
      irr_tot = 0;

      // initial N and water
      initial_soil_mineral_N_kg_ha = initialN;

      // clasification of soil and SOM
      maxPAWClayer = 0;  // number of soil layers to be considered based on PAWC

      switch (soilModule)
      {
         case "north_vertosol_10oc_80_PAWC":
            OC_Percent = 1.0;
            PAWC = 80.0;
            maxPAWClayer = 3;
            propNByLayer = new double[] { 0.35, 0.25, 0.40 };    // proportions should sum to 1.0
            applyInitNLayerDep = new double[] { 75, 225, 525 };  // depth in mm
            break;         

         case "north_vertosol_10oc_120_PAWC":
            OC_Percent = 1.0;
            PAWC = 120.0;
            maxPAWClayer = 4;
            propNByLayer = new double[] { 0.29, 0.23, 0.38, 0.09 };    // proportions should sum to 1.0
            applyInitNLayerDep = new double[] { 75, 225, 525, 675 };  // depth in mm
            break;

         case "north_vertosol_10oc_150_PAWC":
            OC_Percent = 1.0;
            PAWC = 150.0;
            maxPAWClayer = 4;
            propNByLayer = new double[] { 0.27, 0.21, 0.35, 0.17 };    // proportions should sum to 1.0
            applyInitNLayerDep = new double[] { 75, 225, 525, 825 };  // depth in mm
            break;

         case "north_vertosol_10oc_190_PAWC":
            OC_Percent = 1.0;
            PAWC = 190.0;
            maxPAWClayer = 6;
            propNByLayer = new double[] { 0.29, 0.20, 0.32, 0.11, 0.05, 0.02 };    // proportions should sum to 1.0
            applyInitNLayerDep = new double[] { 75, 225, 525, 825, 1125, 1250 };  // depth in mm
            break;

         case "north_vertosol_10oc_240_PAWC":
            OC_Percent = 1.0;
            PAWC = 240.0;
            maxPAWClayer = 7;
            propNByLayer = new double[] { 0.21, 0.16, 0.28, 0.14, 0.10, 0.07, 0.04 };    // proportions should sum to 1.0
            applyInitNLayerDep = new double[] { 75, 225, 525, 825, 1125, 1425, 1725 };  // depth in mm
            break;


         case "south_vertisol_10oc_100_PAWC":
            OC_Percent = 1.0;
            PAWC = 100.0;
            maxPAWClayer = 3;
            propNByLayer = new double[] {0.35, 0.25, 0.40};    // proportions should sum to 1.0
            applyInitNLayerDep = new double[]  {75, 225, 525};  // depth in mm
            break;


         case "MidQld_black_vertosol_100_PAWC":
            OC_Percent = 1.0;
            PAWC = 100.0;
            maxPAWClayer = 3;
            propNByLayer = new double[] {0.35, 0.25, 0.40};    // proportions should sum to 1.0
            applyInitNLayerDep = new double[]  {75, 225, 525};  // depth in mm
            break;



         // The value of soil type is not in the collection for CQ Factors.
         //  No factor combinations are going to be valid  - so abort this run
         default:
            runOutput = false;         // set flag to stop output for this simualtion run
            throw new InvalidOperationException("unknown soil type " + soilModule + " in CQ Factors");
            // break;
      }

      start_SOM_wt_kg_per_ha = 1000;  //1000kg is the default, adjust it if necessary.
      if (string.Equals(surfaceomModule, "SurfaceOrganicMatter1000"))
      {
         start_SOM_wt_kg_per_ha = 1000;
      }


      //***********************************************************************************************
      // set up the crop specific values  [Maize, Wheat]
      crop_name = crop.Name.ToLower();

      // Call the CropFactors constructor for selected crop.
      CropFactors simCrop = new CropFactors(crop_name);

      // Non-factored values
      depth = simCrop.sowDepth;
      spacing = simCrop.sowSpacing;
      grain_moisture_content_percent = simCrop.grain_moisture_content_percent;
      high_temp_threshold = simCrop.high_temp_threshold;  // Stone and Nicolas 1994 Porter and Gawith 1994  http://plantsinaction.science.uq.edu.au/book/export/html/158
      low_temp_threshold = simCrop.low_temp_threshold;     // frost threshold see canola modeling paper
         
      // Factored values ( lists are zero based arrays, so subtract 1 from the list entry value )
      // Check list indexes are valid for the lists referenced, then assign the value
      if (cultivarNumber == 0 || cultivarNumber > simCrop.cultivarNameList.Length || cultivarNumber > simCrop.cultivarMaturityList.Length) 
      {
          Summary.WriteError(this, "*** Unknown " + crop_name + " cultivar number  " + cultivarNumber + " in CQ Factors");
          runOutput = false;
      }
      if (sow_date_number == 0 || sow_date_number > simCrop.sowDateList.Length) 
      {
          Summary.WriteError(this, "*** Invalid sowing date number " + sow_date_number + " for crop " + crop_name + " in CQ Factors");
          runOutput = false;
      }
      if (plant_density_number == 0 || plant_density_number > simCrop.plantDensityList.Length) 
      {
          Summary.WriteError(this, "*** Invalid plant_density_number " + plant_density_number + " for crop " + crop_name + " in CQ Factors");
          runOutput = false;
      }
      if (row_arrangement_number == 0 || row_arrangement_number > simCrop.skiprowList.Length || row_arrangement_number > simCrop.rowArrangementList.Length) 
      {
          Summary.WriteError(this, "*** Invalid row configuration " + row_arrangement_number + " for crop " + crop_name + " in CQ Factors");
          runOutput = false;
      }
      if (sowing_N_number == 0 || sowing_N_number > simCrop.sowingNList.Length) 
      {
          Summary.WriteError(this, "*** Invalid sowing_N_number " + sowing_N_number + " for crop " + crop_name + " in CQ Factors");
          runOutput = false;
      }
      if (side_dressing_N_number == 0 || side_dressing_N_number > simCrop.sideDressNList.Length) 
      {
          Summary.WriteError(this, "*** Invalid side_dressing_N_number " + side_dressing_N_number + " for crop " + crop_name + " in CQ Factors");
          runOutput = false;
      }
      if (irrigation_number == 0 || irrigation_number > simCrop.irrigationTypeList.Length) 
      {
          Summary.WriteError(this, "*** Invalid irrigation number " + irrigation_number + " for crop " + crop_name + " in CQ Factors");
          runOutput = false;
      }

      if (runOutput)
      {   // assign the values
          // sowing details
          cult = simCrop.cultivarNameList[cultivarNumber - 1];
          maturity_type = simCrop.cultivarMaturityList[cultivarNumber - 1];
          sowdate = simCrop.sowDateList[sow_date_number - 1];
          density = simCrop.plantDensityList[plant_density_number - 1];
          skiprow = simCrop.skiprowList[row_arrangement_number - 1];     
          row_arrangement = simCrop.rowArrangementList[row_arrangement_number - 1];
          sow_fert_kg_N_ha = simCrop.sowingNList[sowing_N_number - 1];

          // side dress fertiliser
          side_fert_kg_N_ha = simCrop.sideDressNList[side_dressing_N_number - 1];

          // irrigation
          irrigation_treat = simCrop.irrigationTypeList[irrigation_number - 1];
      
      
          // convert sow date to DateTime format  
          //  must be done after setting of factors for the crop (sets sowdate_number to a sowdate literal)
          dt_sowDate = DateUtilities.GetDate(sowdate);

          LL15mm = soil.LL15mm;
          DULmm = soil.DULmm;
          PAWCmm = soil.PAWCmm;

          max_PAWC = 0.0;
          for(int i = 0; i < maxPAWClayer; i++)   //number of layers to accumulate is soil / PAWC specific
          {
            max_PAWC += PAWCmm[i];
          }


      }  // end if factors are okay (runOutput)
 
   } // end "Commencing"



   //==================================================================================

   // The following event handler will be called each day at the beginning of the day
   [EventSubscribe("DoManagement")]
   private void OnDoManagement(object sender, EventArgs e)
   {
      if (runOutput)   //skip the daily processing if any errors were found in the init section (runOutput set to 'false')
      {
         // if this is the day before sowing, then reset for a new season
         if (DateUtilities.Equals((dt_sowDate.DayOfYear - 1), Clock.Today.DayOfYear ))
         {
            ResetForNewSowing();
         }
 
      } // end runOutput

   }  // end "DoManagement"


   //===========================================================================================
   // Private Methods ( Subroutines / Functions )
   //===========================================================================================

          private void ResetForNewSowing()
       {

          // reseting soil
          if (resetWater.ToLower().Equals("yes")) 
            {
                SoilWater.Reset();
            }
          if (resetN.ToLower().Equals("yes"))
            {
                SoilN.Reset();
            }
          if (resetSOM.ToLower().Equals("yes"))  
            {
                SOM.Reset();
            }

          //if (resetP.ToLower().Equals("yes"))          soilP.Reset();  //Add Phosphorus reset if needed

          // --------------------------------------------------------------------------------
          // Adjusting 'Starting' water (day before sowing each year) to % of AWC set for this soils PAWC.
          // This is done by calculating the mm of water needed to add to the soil from a starting point of LL15 (RESET effect) 
          //  to bring the total up to the %AWC. This amount is split over each layer by adding water to each layer 
          //  from the top until the layer reaches DUL or the total water-to-apply is exhausted.
          // A direct application of the total amount of irrigation is not applied to the surface as this would 
          //  cause too much leaching of Nitrates.
          // Setting each layer to DUL until the water-to-apply is exhausted avoids this unwanted side-effect.
          //
          // Nitrogen levels are then Reset as well.
          //

          // Need to set Soil water values to DUL to achieve Initial Water value (30, 60 or 90% AWC) 
          // NOTE: sw is initialised / reset to LL15 each year. PAW should always be 0 at this point,
          //          thus waterToTopUp should always be a positive value.
          //

          double waterToApply = 0.0;
          double depthToApply = 0.0;
          double waterToTopUp = PAWC * ((double)initialWater / 100.0) ;

          //Summary.WriteMessage(this,"PAW calc at Reset: Soil.PAW = " + total_soil_PAW + " Calc waterToTopUp  = " + waterToTopUp  );
          //Summary.WriteMessage(this,"PAWC calc at Reset: PAWC = " + PAWC + " initialWater  = " + initialWater  );

          for (int i = 0; i < maxPAWClayer; i++)   //number of layers to process is soil / PAWC specific
          {
             waterToApply = 0.0;

             if (waterToTopUp < 0)  // error trap
             { waterToTopUp = 0.0; 
             } 

             if (waterToTopUp == 0.0)  // if there is no water left for top up - break out of loop 
             { break;   
             }
          
             // calculate how much water is to be applied to this layer
             if (waterToTopUp > PAWCmm[i])
             {
                waterToApply = PAWCmm[i];
                SoilWater.SetSWmm(i,(LL15mm[i] + waterToApply));
                waterToTopUp = waterToTopUp - waterToApply;
             }
             else
             {
                waterToApply = waterToTopUp;
                SoilWater.SetSWmm(i,(LL15mm[i] + waterToApply));
                waterToTopUp = 0.0;
             }
          }


          // Need to apply N Fertiliser to achieve 'Initial N' value
          // =======================================================
          // soil N calcs
          total_sw = 0.0;
          total_nh4 = 0.0;
          total_no3 = 0.0;
          N_to_top_up = initialN - total_inorganic_N;
          Fertiliser.Types fertType = Fertiliser.Types.NO3N;

             //  C# indexes soils from 0:  ie. layer 1 is index 0!
          for (int i = 0; i < maxPAWClayer; i++)   //number of layers to accumulate is soil / PAWC specific
          {
             total_nh4 += SoilNH4.kgha[i];
             total_no3 += SoilNO3.kgha[i];
          }
          // total inorganic N
          total_inorganic_N = total_no3 + total_nh4;
       
          for (int i = 0; i < maxPAWClayer; i++)
          {
             double N_to_apply_Layer = N_to_top_up * propNByLayer[i];  
             Fertiliser.Apply(Amount: N_to_apply_Layer, Type: fertType, Depth: applyInitNLayerDep[i]);
          }
       
       } //end ForNewSeason

    } // end Manager Script

    // =========================================================================================================================

    // ===================
    // Crop Factors class
    // ===================
    public class CropFactors
    {
        // Class level properties
        public string cropName { get; set; }
        public int sowDepth { get; set; }
        public double sowSpacing { get; set; }
        public double high_temp_threshold { get; set; }
        public double low_temp_threshold { get; set; }
        public double grain_moisture_content_percent { get; set; }
        public string[] cultivarNameList { get; set; }
        public string[] cultivarMaturityList { get; set; }
        public string[] sowDateList { get; set; }
        public double[] plantDensityList { get; set; }
        public int[]    skiprowList { get; set; }
        public string[] rowArrangementList { get; set; }
        public double[] sowingNList { get; set; }
        public double[] sideDressNList { get; set; }
        public string[] irrigationTypeList { get; set; }



        // Maize settings and factors
        private string   maize_cropName = "maize";
        private int      maize_sowDepth = 40;
        private double   maize_sowSpacing = 900.0;
        private double   maize_high_temp_threshold = 38.0;
        private double   maize_low_temp_threshold = 2.0;
        private double   maize_grain_moisture_content_percent = 14.0;
        private string[] maize_cultivarNameList = new string[] {"Pioneer_3527", "Pioneer_3237", "Pioneer_3153"};
        private string[] maize_cultivarMaturityList = new string[] {"CRM 94", "CRM 100", "CRM 114"};
        private string[] maize_sowDateList = new string[] {"15-aug", "15-sep", "15-jan", "15-feb"};
        private double[] maize_plantDensityList = new double[] {2.0, 3.0, 4.0, 5.0, 6.0};
        private int[]    maize_skiprowList = new int[] {0};
        private string[] maize_rowArrangementList = new string[] {"solid"};
        private double[] maize_sowingNList = new double[] {0.0, 25.0, 50.0, 75.0, 100.0, 150.0};
        private double[] maize_sideDressNList = new double[] {0.0};
        private string[] maize_irrigationTypeList = new string[] {"dryland"};
       



        // Wheat settings and factors
        private string   wheat_cropName = "wheat";
        private int      wheat_sowDepth = 20;
        private double   wheat_sowSpacing = 250.0;
        private double   wheat_high_temp_threshold = 30.0;
        private double   wheat_low_temp_threshold = 2.0;
        private double   wheat_grain_moisture_content_percent = 12.5;
        private string[] wheat_cultivarNameList = new string[] {"janz", "sunco", "ellison"};
        private string[] wheat_cultivarMaturityList = new string[] {"Quick", "Medium", "Slow"};
        private string[] wheat_sowDateList = new string[] {"15-apr", "30-apr", "15-may", "30-may", "15-jun"};
        private double[] wheat_plantDensityList = new double[] {50.0, 75.0, 100.0, 140.0};
        private int[]    wheat_skiprowList = new int[] {0};
        private string[] wheat_rowArrangementList = new string[] {"solid"};
        private double[] wheat_sowingNList = new double[] {0.0, 25.0, 50.0, 75.0, 100.0, 150.0};
        private double[] wheat_sideDressNList = new double[] {0.0};
        private string[] wheat_irrigationTypeList = new string[] {"dryland"};



        // Constructor for each crop:
        public CropFactors (string crop)
        {

               switch (crop.ToLower())
            {
                 case "maize":
                   this.cropName = maize_cropName;
                   this.sowDepth = maize_sowDepth;
                   this.sowSpacing = maize_sowSpacing;
                   this.high_temp_threshold = maize_high_temp_threshold;
                   this.low_temp_threshold = maize_low_temp_threshold;
                   this.grain_moisture_content_percent = maize_grain_moisture_content_percent;
                   this.cultivarNameList = maize_cultivarNameList;
                   this.cultivarMaturityList = maize_cultivarMaturityList;
                   this.sowDateList = maize_sowDateList;
                   this.plantDensityList = maize_plantDensityList;
                   this.skiprowList = maize_skiprowList;
                   this.rowArrangementList = maize_rowArrangementList;
                   this.sowingNList = maize_sowingNList;
                   this.sideDressNList = maize_sideDressNList;
                   this.irrigationTypeList = maize_irrigationTypeList;
                   break;

                 case "wheat":
                   this.cropName = wheat_cropName;
                   this.sowDepth = wheat_sowDepth;
                   this.sowSpacing = wheat_sowSpacing;
                   this.high_temp_threshold = wheat_high_temp_threshold;
                   this.low_temp_threshold = wheat_low_temp_threshold;
                   this.grain_moisture_content_percent = wheat_grain_moisture_content_percent;
                   this.cultivarNameList = wheat_cultivarNameList;
                   this.cultivarMaturityList = wheat_cultivarMaturityList;
                   this.sowDateList = wheat_sowDateList;
                   this.plantDensityList = wheat_plantDensityList;
                   this.skiprowList = maize_skiprowList;
                   this.rowArrangementList = wheat_rowArrangementList;
                   this.sowingNList = wheat_sowingNList;
                   this.sideDressNList = wheat_sideDressNList;
                   this.irrigationTypeList = wheat_irrigationTypeList;
                   break;



                   // The value of crop type is not in the collection for CQ Factors.
                default:
                    //Summary.WriteMessage(this, "*** Unknown crop type " + crop + " in CQ Factors"  );
                    throw new InvalidOperationException("unknown crop type in CQ Factors");

            }  //end switch crop
         
        }  // end CropFactors constructor


    }   // end CropFactors class

} // end namespace
```
      Manager CQ_Wheat
        incropMinTemp = 0
        total_sw_at_sowing = 0
        av_max_temp_4_weeks_after_sowing_deg_C = 0
        av_min_temp_4_weeks_after_sowing_deg_C = 0
        av_max_temp_2_weeks_pre_and_post_flowering_deg_C =
        av_min_temp_2_weeks_pre_and_post_flowering_deg_C =
        av_max_temp_4_weeks_prior_to_harvest_C = 0
        av_min_temp_4_weeks_prior_to_harvest_C = 0
        dry_grain_or_lint_yield_t_ha_or_ba_ha = 0
        wet_grain_or_lint_yield_t_ha_or_ba_ha = 0
        grain_protein_percent =
        biomass_at_harvest_t_ha = 0
        mineral_N_at_harvest_kg_ha = 0
        in_crop_rain_mm = 0
        PAW_at_harvest_mm = 0
        incrop_min_temp_deg_C = 0
        incrop_min_temp = 0
        number_of_days_frost_stress_2_weeks_pre_and_post_flowering =
        number_of_days_heat_stress_2_weeks_pre_and_post_flowering =
        water_used_mm = 0
        irrigation_water_applied = 0
        WUE_yield_kg_or_ba_per_mm = 0
        WUE_biomass_kg_per_mm = 0
        days_of_high_temp = 0
        days_of_frost_temp = 0
        days_to_harvevst = 0
        cropName =
        crop_failure_flag = False
```csharp
using System;
using System.Collections;
using System.Collections.Generic;

using Models.Core;
using Models.PMF;
using Models.PMF.Organs;
using Models.PMF.Phen;
using Models.Soils;
using Models.Utilities;
using Models.Surface;

using APSIM.Shared.Utilities;




// CQ Wheat Manager - APSIM-NextGen Script
// ================
//
//    This script sets up the ARMonline simulations for Central Queensland Crops:   
//                                             WHEAT
//       
//
//    Properties (Factors) referenced for setting up simulation parameters are
//      passed in from CQ_Factors script  
//
//
// ==============================================================================
// DBJ  August 2019     Created (conversion from KGP Manager1 Script)
// ==============================================================================
//

namespace Models
{
    [Serializable]
    [System.Xml.Serialization.XmlInclude(typeof(Model))]
    public class Script : Model
    {
        [Link] Clock Clock;
        [Link] Weather Met;
        [Link] Plant Wheat;
        ReproductiveOrgan Grain;
        [Link] Soil soil;
        [Link] SoilWater SoilWater ;
        [Link] SoilNitrogen SoilN ;
        [Link] SoilNitrogenNH4 SoilNH4;
        [Link] SoilNitrogenNO3 SoilNO3;
        [Link] SurfaceOrganicMatter SOM ;
        [Link] Fertiliser Fertiliser ;
        [Link] Irrigation Irrig ;
        [Link] Summary Summary;  // Summary file for debug output
        [Link(ByName = true)] Report.Report outputfile_full;
        [Link(ByName = true)] Report.Report outputfile_for_passing ;


           // Define Parameters (Properties). These appear as enterable values on the 'Properties tab'.
    
    

          // Define PUBLIC properties that other components can read (get).
      
       // Reporting variables
       public double incropMinTemp {get;set;}
       public double total_sw_at_sowing {get;set;}
       public double av_max_temp_4_weeks_after_sowing_deg_C {get;set;}
       public double av_min_temp_4_weeks_after_sowing_deg_C {get;set;}
       public string av_max_temp_2_weeks_pre_and_post_flowering_deg_C {get;set;}
       public string av_min_temp_2_weeks_pre_and_post_flowering_deg_C {get;set;}
       public double av_max_temp_4_weeks_prior_to_harvest_C {get;set;}
       public double av_min_temp_4_weeks_prior_to_harvest_C {get;set;}
       public double dry_grain_or_lint_yield_t_ha_or_ba_ha {get;set;}
       public double wet_grain_or_lint_yield_t_ha_or_ba_ha {get;set;}
       public string grain_protein_percent {get;set;}
       public double biomass_at_harvest_t_ha {get;set;}
       public double mineral_N_at_harvest_kg_ha {get;set;}
       public double in_crop_rain_mm {get;set;}
       public double PAW_at_harvest_mm {get;set;}
       public double incrop_min_temp_deg_C {get;set;}
       public double incrop_min_temp {get;set;}
       public string number_of_days_frost_stress_2_weeks_pre_and_post_flowering {get;set;}
       public string number_of_days_heat_stress_2_weeks_pre_and_post_flowering {get;set;} 
       public double water_used_mm {get;set;}
       public double irrigation_water_applied {get;set;}
       public double WUE_yield_kg_or_ba_per_mm {get;set;}
       public double WUE_biomass_kg_per_mm {get;set;}
       public int    days_of_high_temp {get;set;}
       public int    days_of_frost_temp {get;set;}
       public int    days_to_harvevst {get;set;}
       public string cropName {get;set;}              // name of the crop set by CentralQldFactors
       public bool   crop_failure_flag {get;set;}



       // Script level variables
       // Properties from System modules
       private DateTime today;            // from clock

       // Properties from Manager Factors script
       private bool     runOutput;            // flag from CQFactors to allow or block running of crop scripts
       private DateTime dt_sowDate;       // sow date of the crop set by CentralQldFactors
       private double   sow_fert_kg_N_ha;
       private int      skiprow;
       private string   cult;
       private double   density;
       private int      depth;
       private double   spacing;
       private double   high_temp_threshold;
       private double   low_temp_threshold;
       private double   max_PAWC;
       private double   grain_moisture_content_percent;  



       // Local variables

       // temperature accumulation queues. 
       //   These hold up to the last 28 days of temperature values.
       Queue qMaxT = new Queue();
       Queue qMinT = new Queue();

       private bool   tempTracking;
       private bool   rainCounterFlag = false;  // trigger to accumulate rainfall values
       private bool   inputsLoaded ;
       private bool   floweringStage;
       private bool   harvestRipe;
       private double av_max_temp_28DAS;
       private double av_min_temp_28DAS;
       private double cumRain;
       private double cumRunOff;
       private double cumDrain;
       private double total_sw;
       private double total_LL15;
       private double total_PAW;
       private double total_soilPAW;
       private double total_inorganic_N;
       private double total_nh4;
       private double total_no3;
       private double drain;              // value of drainage value from ??  soilw?
       private int    days_post_flowering;
       private int    irr_tot;  //not currently used/set


   //===========================================================================================
   // Event Handlers
   //===========================================================================================

   // The following event handler will be called once at the beginning of the simulation
   [EventSubscribe("Commencing")]
   private void OnSimulationCommencing(object sender, EventArgs e)
   {

      // inital temperature value queues. These hold up to the last 28 days of temperature values.
      qMaxT.Clear();   // this queue will be used to hold 28 days of temperatures
      qMinT.Clear();   // this queue will be used to hold 28 days of temperatures
      
      days_of_high_temp = 0;
      days_of_frost_temp = 0;
      crop_failure_flag = false;
      floweringStage = false;
      harvestRipe = false;

      inputsLoaded = false;

      // Link to the Grain submodel of Wheat. The 'Plant' model hides its submodels!!
      IModel plant = Apsim.Find(this, typeof(Plant));
      Grain = Apsim.Find(plant, typeof(ReproductiveOrgan)) as ReproductiveOrgan;


   }


   //===========================================================================================
   // The following event handler will be called on a crop flowering event
   [EventSubscribe("PhaseChanged")]
   private void OnPhaseChanged(object sender, PhaseChangedType e)
   {
       if (e.StageName == "Flowering")
       {
          floweringStage = true;
          //Summary.WriteMessage(this,"Flowering stage trigger set to 1 on Event");
       }
       if (e.StageName == "HarvestRipe")
       {
          harvestRipe = true;
          //Summary.WriteMessage(this,"HarvestRipe stage trigger set to 1 on Event");
       }
   }

   //===========================================================================================
   // The following event handler will be called each day at the beginning of the day
   [EventSubscribe("DoManagement")]
   private void OnDoManagement(object sender, EventArgs e)
   {
      // read values from the Factors script. These properties only need to be read once.
      if (!inputsLoaded)
      {
         runOutput = (bool)Apsim.Get(this, "[CQ_Factors].Script.runOutput");
         cropName = (string)Apsim.Get(this, "[CQ_Factors].Script.crop_name");           // name of the crop set by CentralQldFactors
         dt_sowDate = (DateTime)Apsim.Get(this, "[CQ_Factors].Script.dt_sowDate");       // sow date of the crop set by CentralQldFactors
         sow_fert_kg_N_ha = (double)Apsim.Get(this, "[CQ_Factors].Script.sow_fert_kg_N_ha");
         skiprow = (int)Apsim.Get(this, "[CQ_Factors].Script.skiprow");
         cult = (string)Apsim.Get(this, "[CQ_Factors].Script.cult");
         density = (double)Apsim.Get(this, "[CQ_Factors].Script.density");
         depth = (int)Apsim.Get(this, "[CQ_Factors].Script.depth");
         spacing = (double)Apsim.Get(this, "[CQ_Factors].Script.spacing");
         high_temp_threshold = (double)Apsim.Get(this, "[CQ_Factors].Script.high_temp_threshold");
         low_temp_threshold = (double)Apsim.Get(this, "[CQ_Factors].Script.low_temp_threshold");
         max_PAWC = (double)Apsim.Get(this, "[CQ_Factors].Script.max_PAWC");
         grain_moisture_content_percent = (double)Apsim.Get(this, "[CQ_Factors].Script.grain_moisture_content_percent");

         inputsLoaded = true;

          //Summary.WriteMessage(this,"Completed loading factor inputs");
          //Summary.WriteMessage(this,"cropName = " + cropName.ToString());
      }


      if (runOutput)
      {
         // if this is the day before sowing, then reset for a new season
         if((dt_sowDate.DayOfYear - 1) == Clock.Today.DayOfYear)
         {
            // ResetForNewSowing();
            qMaxT.Clear();
            qMinT.Clear();
            tempTracking = true;  //restart the temperature tracking
         }
         
         //sowing today?
         if (dt_sowDate.DayOfYear == Clock.Today.DayOfYear)
         {
            // Summary.WriteMessage(this,"sowDate.DayOfYear found = " + Clock.Today.DayOfYear.ToString());

            //sowing soil water
            total_sw_at_sowing = (double)Apsim.Get(this, "[CQ_Factors].Script.swNow");  //from CQFactors

            if (string.Equals(cropName, "wheat"))
            {
               SowCrop_Wheat();
            }

            // inialise accumulators and set flags
            rainCounterFlag = true;
            cumRain = 0.0;
            cumRunOff = 0.0;
            cumDrain = 0.0;
            incropMinTemp = Met.MinT;

         }

         
         //temperature tracking
         //max and min temp tracking.  Rolling list of up to last 28 days
         if (tempTracking)
         {
            qMaxT.Enqueue(Met.MaxT);
            qMinT.Enqueue(Met.MinT);
            if (qMaxT.Count > 28)
            {
               qMaxT.Dequeue();
               qMinT.Dequeue();
            }

         }

         // average temperatures post sowing
         if (Wheat.Phenology.DaysAfterSowing == 28)
         {
               av_max_temp_28DAS = MaxT28dayAvg();
               av_min_temp_28DAS = MinT28dayAvg();
         }

         //rain runoff drainage min temp counter
         if (rainCounterFlag == true)
         {
            cumRain += Met.Rain;
            cumRunOff += SoilWater.Runoff;
            cumDrain += SoilWater.Drainage;
            incropMinTemp = Math.Min(incropMinTemp, Met.MinT);  // record the lowest minT that the crop experiences
         }

         // temps around flowering
         if (floweringStage == true) 
         {
            days_post_flowering +=  1;
         }

         
         //temperatures pre and post flowering
         if (days_post_flowering == 20)          //TODO: DBJ should this be 14 days?
         {
            av_max_temp_2_weeks_pre_and_post_flowering_deg_C = MaxT28dayAvg().ToString("#.##");
            av_min_temp_2_weeks_pre_and_post_flowering_deg_C = MinT28dayAvg().ToString("#.##");

            days_of_high_temp = 0;
            days_of_frost_temp = 0;
            
            days_of_high_temp = CntDaysHighTemp(high_temp_threshold);  
            days_of_frost_temp = CntDaysFrostTemp(low_temp_threshold);  
            
            // Reset flags for accumulation
            floweringStage = false;
            days_post_flowering = 0;

         }


         //harvest  // is this test working as intended??
         if ((string.Equals(Wheat.Phenology.CurrentStageName,"HarvestRipe")) || harvestRipe == true ||
             // (!Wheat.IsAlive) ||
             ( Wheat.Phenology.DaysAfterSowing == 250) ) 
         {
               //soil water
               total_sw = (double)Apsim.Get(this, "[CQ_Factors].Script.swNow");       // from CQ_Factors
               total_LL15 = (double)Apsim.Get(this, "[CQ_Factors].Script.LL15pawc");  // from CQ_Factors
               total_soilPAW = (double)Apsim.Get(this, "[CQ_Factors].Script.PAWNow");  // from CQ_Factors

               total_PAW = total_soilPAW;

               if (total_PAW > max_PAWC)
               {
                 total_PAW = max_PAWC;
               }

               if (total_PAW < 0.0) 
               {
                 total_PAW = 0.0;
               }

               //soil N
               total_nh4 = (double)Apsim.Get(this, "[CQ_Factors].Script.nh4Now");
               total_no3 = (double)Apsim.Get(this, "[CQ_Factors].Script.no3Now");
               total_inorganic_N = total_no3 + total_nh4;


               // setup output values
               dry_grain_or_lint_yield_t_ha_or_ba_ha = (Grain.Total.Wt * 10) /1000;
               wet_grain_or_lint_yield_t_ha_or_ba_ha = ((Grain.Total.Wt * 10) /1000)/(1-(grain_moisture_content_percent/100));
               grain_protein_percent = ((Grain.Live.N + Grain.Dead.N)/(Grain.Live.Wt + Grain.Dead.Wt) * 100 * 5.71).ToString("##.##");
               biomass_at_harvest_t_ha = Wheat.AboveGround.Wt*10 / 1000;
               in_crop_rain_mm = cumRain;
               days_to_harvevst = Wheat.Phenology.DaysAfterSowing;
               PAW_at_harvest_mm = total_soilPAW;
               mineral_N_at_harvest_kg_ha = total_inorganic_N;
               av_max_temp_4_weeks_after_sowing_deg_C = av_max_temp_28DAS;
               av_min_temp_4_weeks_after_sowing_deg_C = av_min_temp_28DAS;
               av_max_temp_2_weeks_pre_and_post_flowering_deg_C = av_max_temp_2_weeks_pre_and_post_flowering_deg_C;
               av_min_temp_2_weeks_pre_and_post_flowering_deg_C = av_min_temp_2_weeks_pre_and_post_flowering_deg_C;
               av_max_temp_4_weeks_prior_to_harvest_C = MaxT28dayAvg();
               av_min_temp_4_weeks_prior_to_harvest_C = MinT28dayAvg();
               incrop_min_temp_deg_C = incropMinTemp;
               number_of_days_frost_stress_2_weeks_pre_and_post_flowering = days_of_frost_temp.ToString();
               number_of_days_heat_stress_2_weeks_pre_and_post_flowering = days_of_high_temp.ToString();
               irrigation_water_applied = irr_tot;
               water_used_mm = (total_sw_at_sowing - total_sw) + cumRain - cumDrain - cumRunOff;
               
               if (water_used_mm <= 0.0)  water_used_mm = 0.001;      // to avoid divide by zero errors

               WUE_yield_kg_or_ba_per_mm = (Grain.Total.Wt * 10)/water_used_mm;
               WUE_biomass_kg_per_mm = Wheat.AboveGround.Wt*10/water_used_mm;
               crop_failure_flag = false;
               if ((days_to_harvevst < 50) && (dry_grain_or_lint_yield_t_ha_or_ba_ha == 0.0)) crop_failure_flag = true;

               // call the reports
               outputfile_full.DoOutput();
               outputfile_for_passing.DoOutput();

               Wheat.Harvest();
               Wheat.EndCrop();

               //Reset triggers and counters ready for the next crop
               rainCounterFlag = false;
               cumRain = 0.0;
               cumRunOff = 0.0;
               cumDrain = 0.0;
               tempTracking = false;
               days_of_high_temp = 0;
               days_of_frost_temp = 0;
               harvestRipe = false;

         }  // StageName = 'harvest_ripe'

      } // end runOutput

   }   // end OnPrepare



   //===========================================================================================
   // Private Methods ( Subroutines / Functions )
   //===========================================================================================

   // Methods for setting crop specifics

   //-------------------------------------------------------------------------------------------
   private void SowCrop_Wheat()
   {
      // Get sowing settings from Factors script
      double sow_density = (double)Apsim.Get(this, "[CQ_Factors].Script.density");           //from CQFactors
      int sow_depth =      (int)Apsim.Get(this, "[CQ_Factors].Script.depth");                //from CQFactors
      string sow_cult =    (string)Apsim.Get(this, "[CQ_Factors].Script.cult");              //from CQFactors
      double row_spacing = (double)Apsim.Get(this, "[CQ_Factors].Script.spacing");           //from CQFactors
      double sow_fert =    (double)Apsim.Get(this, "[CQ_Factors].Script.sow_fert_kg_N_ha");  //from CQFactors
      int sow_skip =       (int)Apsim.Get(this, "[CQ_Factors].Script.skiprow");              //from CQFactors

      //Summary.WriteMessage(this,"About to sow wheat");

      Wheat.Sow(population: sow_density, cultivar: sow_cult, depth: sow_depth, rowSpacing: row_spacing);    


      // Apply sowing fertiliser
      Fertiliser.Types fertType = Fertiliser.Types.UreaN;
      Fertiliser.Apply(Amount: sow_fert_kg_N_ha, Type: fertType, Depth: 50);

   } //end Sow Wheat



   private double MaxT28dayAvg()
   {
      double maxAvg = 0.0;
      foreach( double maxTemp in qMaxT )
      {
         maxAvg += maxTemp;
      }
      maxAvg = maxAvg / qMaxT.Count;
      return (maxAvg);
   }

   
   private double MinT28dayAvg()
   {
      double minAvg = 0.0;
      foreach( double minTemp in qMinT )
      {
         minAvg += minTemp;
      }
      minAvg = minAvg / qMinT.Count;
      return (minAvg);
   }
      


   
         
   private int CntDaysHighTemp(double highTempThreshold)
   {
      int dayCount = 0;
      foreach( double maxTemp in qMaxT )
      {
         if (maxTemp > highTempThreshold) dayCount += 1;
      }
      return (dayCount);
   }
   
   private int CntDaysFrostTemp(double lowTempThreshold)
   {
      int dayCount = 0;
      foreach( double minTemp in qMinT )
      {
         if (minTemp < lowTempThreshold) dayCount += 1;
      }
      return (dayCount);
   }
   

 } // end script
} // end NameSpace
```
      Soil MidQld_black_vertosol_100_PAWC: ASCOrder=Vertosol; ASCSubOrder=Black; SoilType=Clay; Site=Generic; NearestTown=Childers; Region=Wide Bay and Burnett; State=Queensland; Country=Australia; ApsoilNumber=1073; Latitude=-25.236343; Longitude=152.27813; LocationAccuracy=Regional Soil Type
        Physical
          Thickness  BD    AirDry  LL15   DUL    SAT
          200        1.15  0.05    0.39   0.552  0.559
          200        1.1   0.05    0.413  0.582  0.583
          100        1.15  0.05    0.404  0.55   0.558
          100        1.15  0.05    0.404  0.55   0.558
          70         1.15  0.05    0.404  0.55   0.558
          100        1.15  0.05    0.404  0.55   0.558
          300        1.15  0.05    0.404  0.55   0.558
          300        1.15  0.05    0.404  0.55   0.558
          300        1.15  0.05    0.404  0.55   0.558
          SoilCrop PeanutSoil: same as Soil_Regions.WideBay_Soils.WideBay_black_vertosol_100_PAWC.Physical.PeanutSoil
          SoilCrop SoybeanSoil: same as Soil_Regions.WideBay_Soils.WideBay_black_vertosol_100_PAWC.Physical.PeanutSoil
          SoilCrop SugarSoil: same as Soil_Regions.WideBay_Soils.WideBay_black_vertosol_100_PAWC.Physical.SugarSoil
          SoilCrop RiceSoil
            LL=[0.39, 0.413, 0.404, 0.404, 0.404, 0.404, 0.404, 0.404, 0.404]
            KL=[0.1, 0.1, 0.08, 0.07, 0.06, 0.05, 0.05, 0.05, 0.05]
            XF=[1, 1, 1, 1, 1, 0, 0, 0, 0]
          SoilCrop ChickpeaSoil
            LL=[0.39, 0.413, 0.404, 0.404, 0.404, 0.404, 0.404, 0.404, 0.404]
            KL=[0.1, 0.1, 0.08, 0.07, 0.06, 0.05, 0.05, 0.05, 0.05]
            XF=[1, 1, 1, 1, 1, 0, 0, 0, 0]
          SoilCrop MungbeanSoil
            LL=[0.39, 0.413, 0.404, 0.404, 0.404, 0.404, 0.404, 0.404, 0.404]
            KL=[0.1, 0.1, 0.08, 0.07, 0.06, 0.05, 0.05, 0.05, 0.05]
            XF=[1, 1, 1, 1, 1, 0, 0, 0, 0]
          SoilCrop MaizeSoil
            LL=[0.39, 0.413, 0.404, 0.404, 0.404, 0.404, 0.404, 0.404, 0.404]
            KL=[0.1, 0.1, 0.08, 0.07, 0.06, 0.05, 0.05, 0.05, 0.05]
            XF=[1, 1, 1, 1, 1, 0, 0, 0, 0]
          SoilCrop WheatSoil
            LL=[0.39, 0.413, 0.404, 0.404, 0.404, 0.404, 0.404, 0.404, 0.404]
            KL=[0.1, 0.1, 0.08, 0.07, 0.06, 0.05, 0.05, 0.05, 0.05]
            XF=[1, 1, 1, 1, 1, 0, 0, 0, 0]
        SoilWater: same as Soil_Regions.WideBay_Soils.WideBay_black_vertosol_100_PAWC.SoilWater
        SoilNitrogen: same as Soil_Regions.CQ_Soils.north_vertosol_10oc_80_PAWC.SoilNitrogen
        Organic: same as Soil_Regions.WideBay_Soils.WideBay_black_vertosol_100_PAWC.Organic
        Chemical: same as Soil_Regions.WideBay_Soils.WideBay_black_vertosol_100_PAWC.Chemical
        InitialWater: PercentMethod=0; FractionFull=0; RelativeTo=LL15
        Sample InitialNitrogen: Thickness=[200, 200, 100, 100, 70, 100, 300, 300, 300]; SWUnits=Volumetric; OCUnits=Total; PHUnits=Water
        CERESSoilTemperature
